# OpenSim document version 40600
Model Subject_1106151_hipdoubled:
  gravity: 0 -9.80665 0
  length_units: meters
  force_units: N
  credits:
    Elena J. Caruthers, Robert A. Siston,... Arnold, E.M., Ward, S.R., Lieber, R. L., and Delp, S.L.,... Nur Adila Faruk Senan, Miguel Christophy, Moe Curtrin ,... Katherine R. Saul, Wendy M. Murray, Craig M. Goehler, Melissa Daly, Meghan E. Vidt, Dustin L. Crouch,... Anita Vasavada, Jessica Jahn, Liying Zheng, Chiriac Marian
  publications:
    Arnold, EM, SR Ward, RL Lieber, and SL Delp. "A Model of the Lower Limb for Analysis of Human Movement." Annals of Biomedical Engineering. 38.2 (2010): 269-79. Print. Christophy, M, Senan N. A. Faruk, JC Lotz, and OM O'Reilly. "A Musculoskeletal Model for the Lumbar Spine." Biomechanics and Modeling in Mechanobiology. 11 (2012): 1-2. Print. Vasavada, AN, S Li, and SL Delp. "Influence of Muscle Morphometry and Moment Arms on the Moment-Generating Capacity of Human Neck Muscles." Spine. 23.4 (1998): 412-22. Print.
  Ground
  BodySet:
    Body pelvis: mass=8.46219 [kg] mass_center=(-0.0668702 0 0) inertia=(0.0660797 0.0559877 0.037218 0 0 0)
        meshes=(r_pelvis.vtp l_pelvis.vtp)
      WrapEllipsoid PS_at_brim_r: translation=(-0.0754773 -0.0618573 0.0620464) quadrant=all
          dimensions=(0.0491833 0.0465349 0.067154)
      WrapEllipsoid IL_at_brim_r: translation=(-0.0647894 -0.0526828 0.0715049) quadrant=all
          dimensions=(0.0519261 0.0628978 0.067154)
      WrapEllipsoid Gmax_at_pelvis_r: xyz_body_rotation=(-0.637045 0.383623 -0.684867)
          translation=(-0.0751936 -0.0780309 0.0628978) quadrant=all dimensions=(0.0378332 0.0378332 0.0567499)
      WrapEllipsoid PS_at_brim_l: translation=(-0.0754773 -0.0618573 -0.0620464) quadrant=all
          dimensions=(0.0491833 0.0465349 0.067154)
      WrapEllipsoid IL_at_brim_l: translation=(-0.0647894 -0.0526828 -0.0715049) quadrant=all
          dimensions=(0.0519261 0.0628978 0.067154)
      WrapEllipsoid Gmax_at_pelvis_l: xyz_body_rotation=(0.637045 -0.383623 -0.684867)
          translation=(-0.0751936 -0.0780309 -0.0628978) quadrant=all dimensions=(0.0378332 0.0378332 0.0567499)
    Body sacrum: mass=0 mass_center=(0 0 0) inertia=(0 0 0 0 0 0) meshes=sacrum.vtp
    Body femur_r: mass=6.683384 mass_center=(0 -0.175059 0) inertia=(0.103345 0.0293875 0.103345 0 0 0)
        meshes=r_femur.vtp
      WrapEllipsoid Gastroc_at_condyles_r: xyz_body_rotation=(0.0589921 -0.0937242 0.0232129)
          translation=(0.00494285 -0.419626 0.000339463) quadrant=all dimensions=(0.0309215 0.0257525 0.0565178)
    Body femur_wlkr_r: mass=0 mass_center=(0 0 0) inertia=(0 0 0 0 0 0)
    Body tibia_wlkr_r: mass=0 mass_center=(0 0 0) inertia=(0 0 0 0 0 0)
    Body tibia_r: mass=2.663969 mass_center=(0 -0.192104 0) inertia=(0.0382293 0.00365639 0.0382293 0 0 0)
        meshes=(r_tibialoan.vtp r_fibula.vtp)
      WrapEllipsoid GR_at_condyles_r: xyz_body_rotation=(0 0 -0.18326) translation=(0 0 0) quadrant=all
          dimensions=(0.0370421 0.065338 0.0516856)
      WrapEllipsoid SM_at_condyles_r: xyz_body_rotation=(0 0 -0.296706) translation=(0 0 0) quadrant=all
          dimensions=(0.036219 0.0619425 0.0474188)
      WrapEllipsoid ST_at_condyles_r: xyz_body_rotation=(0 0 -0.270526) translation=(0 0 0) quadrant=all
          dimensions=(0.0437302 0.0709971 0.0554674)
      WrapEllipsoid BFLH_at_gastroc_r: xyz_body_rotation=(0 0 0.270526) translation=(-0.0636916 -0.0514472 0.000678796)
          quadrant=y dimensions=(0.0344697 0.0205788 0.0807768)
      WrapCylinder Gastroc_at_shank_r: xyz_body_rotation=(2.96723 0.0289725 -1.47812)
          translation=(-0.00761419 -0.0761419 -0.00320005) quadrant=-y radius=0.05654285 length=0.0971588
    Body shaft_axis_r: mass=0 mass_center=(0 0 0) inertia=(0 0 0 0 0 0)
      WrapEllipsoid AB_at_femshaft_r: xyz_body_rotation=(0 0 0.139626) translation=(0.0268 -0.0843 0) quadrant=all
          dimensions=(0.0165 0.07 0.021)
      WrapEllipsoid AL_at_femshaft_r: xyz_body_rotation=(0 0 0.0174533) translation=(0.0386 -0.2064 0) quadrant=all
          dimensions=(0.0201 0.1 0.018)
      WrapEllipsoid AMprox_at_femshaft_r: xyz_body_rotation=(0 0 0.174533) translation=(0.0197 -0.0442 0) quadrant=all
          dimensions=(0.0211 0.07 0.032)
      WrapEllipsoid AMmid_at_femshaft_r: xyz_body_rotation=(0 0 0.0872665) translation=(0.0336 -0.1284 0) quadrant=all
          dimensions=(0.0214 0.12 0.031)
      WrapEllipsoid AMdist_at_femshaft_r: xyz_body_rotation=(0 0 0.139626) translation=(0.0376 -0.2293 0) quadrant=all
          dimensions=(0.0218 0.2 0.0215)
      WrapEllipsoid AMisch_at_condyles_r: xyz_body_rotation=(0 0 -0.471239) translation=(-0.026 -0.344 0) quadrant=all
          dimensions=(0.05 0.24 0.0402)
      WrapEllipsoid PECT_at_femshaft_r: xyz_body_rotation=(0 0 0.174533) translation=(0.021 -0.052 0) quadrant=all
          dimensions=(0.0166 0.05 0.0131)
      WrapCylinder KnExt_at_fem_r: xyz_body_rotation=(-0.172089 0.0570723 -0.92869) translation=(0.0053 -0.3701 0.0086)
          quadrant=all radius=0.025 length=0.1
    Body patella_r: mass=0.06193774 mass_center=(0.0018521 0.0271641 0) inertia=(2.1833e-6 9.97321e-6 9.97321e-6 0 0 0)
        meshes=r_pat.vtp
    Body talus_r: mass=0.07185353 mass_center=(0 0 0) inertia=(0.000760733 0.000760733 0.000760733 0 0 0)
        meshes=r_talus.vtp
    Body calcn_r: mass=0.8981691 mass_center=(0.105727 0.0317181 0) inertia=(0.00112447 0.00313245 0.00329309 0 0 0)
        meshes=r_foot.vtp
    Body toes_r: mass=0.1556347 mass_center=(0.0365816 0.00634362 -0.0185022)
        inertia=(8.03192e-5 0.000160638 0.000803192 0 0 0) meshes=r_bofoot.vtp
    Body femur_l: mass=6.683384 mass_center=(0 -0.175059 0) inertia=(0.103345 0.0293875 0.103345 0 0 0)
        meshes=l_femur.vtp
      WrapEllipsoid Gastroc_at_condyles_l: xyz_body_rotation=(-0.0589921 0.0937242 0.0232129)
          translation=(0.00494285 -0.419626 -0.000339463) quadrant=all dimensions=(0.0309215 0.0257525 0.0565178)
    Body femur_wlkr_l: mass=0 mass_center=(0 0 0) inertia=(0 0 0 0 0 0)
    Body tibia_wlkr_l: mass=0 mass_center=(0 0 0) inertia=(0 0 0 0 0 0)
    Body tibia_l: mass=2.663969 mass_center=(0 -0.192104 0) inertia=(0.0382293 0.00365639 0.0382293 0 0 0)
        meshes=(l_tibialoan.vtp l_fibula.vtp)
      WrapEllipsoid GR_at_condyles_l: xyz_body_rotation=(0 0 -0.18326) translation=(0 0 0) quadrant=all
          dimensions=(0.0370421 0.065338 0.0516856)
      WrapEllipsoid SM_at_condyles_l: xyz_body_rotation=(0 0 -0.296706) translation=(0 0 0) quadrant=all
          dimensions=(0.036219 0.0619425 0.0474188)
      WrapEllipsoid ST_at_condyles_l: xyz_body_rotation=(0 0 -0.270526) translation=(0 0 0) quadrant=all
          dimensions=(0.0437302 0.0709971 0.0554674)
      WrapEllipsoid BFLH_at_gastroc_l: xyz_body_rotation=(0 0 0.270526)
          translation=(-0.0636916 -0.0514472 -0.000678796) quadrant=y dimensions=(0.0344697 0.0205788 0.0807768)
      WrapCylinder Gastroc_at_shank_l: xyz_body_rotation=(-2.96723 -0.0289725 -1.47812)
          translation=(-0.00761419 -0.0761419 0.00320005) quadrant=-y radius=0.05654285 length=0.0971588
    Body shaft_axis_l: mass=0 mass_center=(0 0 0) inertia=(0 0 0 0 0 0)
      WrapEllipsoid AB_at_femshaft_l: xyz_body_rotation=(0 0 0.139626) translation=(0.0268 -0.0843 0) quadrant=all
          dimensions=(0.0165 0.07 0.021)
      WrapEllipsoid AL_at_femshaft_l: xyz_body_rotation=(0 0 0.0174533) translation=(0.0386 -0.2064 0) quadrant=all
          dimensions=(0.0201 0.1 0.018)
      WrapEllipsoid AMprox_at_femshaft_l: xyz_body_rotation=(0 0 0.174533) translation=(0.0197 -0.0442 0) quadrant=all
          dimensions=(0.0211 0.07 0.032)
      WrapEllipsoid AMmid_at_femshaft_l: xyz_body_rotation=(0 0 0.0872665) translation=(0.0336 -0.1284 0) quadrant=all
          dimensions=(0.0214 0.12 0.031)
      WrapEllipsoid AMdist_at_femshaft_l: xyz_body_rotation=(0 0 0.139626) translation=(0.0376 -0.2293 0) quadrant=all
          dimensions=(0.0218 0.2 0.0215)
      WrapEllipsoid AMisch_at_condyles_l: xyz_body_rotation=(0 0 -0.471239) translation=(-0.026 -0.344 0) quadrant=all
          dimensions=(0.05 0.24 0.0402)
      WrapEllipsoid PECT_at_femshaft_l: xyz_body_rotation=(0 0 0.174533) translation=(0.021 -0.052 0) quadrant=all
          dimensions=(0.0166 0.05 0.0131)
      WrapCylinder KnExt_at_fem_l: xyz_body_rotation=(0.172089 -0.0570723 0.92869) translation=(0.0053 -0.3701 -0.0086)
          quadrant=all radius=0.025 length=0.1
    Body patella_l: mass=0.06193774 mass_center=(0.0018521 0.0271641 0) inertia=(2.1833e-6 9.97321e-6 9.97321e-6 0 0 0)
        meshes=l_pat.vtp
    Body talus_l: mass=0.07185353 mass_center=(0 0 0) inertia=(0.000760733 0.000760733 0.000760733 0 0 0)
        meshes=l_talus.vtp
    Body calcn_l: mass=0.8981691 mass_center=(0.105727 0.0317181 0) inertia=(0.00112447 0.00313245 0.00329309 0 0 0)
        meshes=l_foot.vtp
    Body toes_l: mass=0.1556347 mass_center=(0.0365816 0.00634362 0.0185022)
        inertia=(8.03192e-5 0.000160638 0.000803192 0 0 0) meshes=l_bofoot.vtp
    Body lumbar5: mass=1.299175 mass_center=(0.0488486 0.0181782 0) inertia=(0.00717282 0.0103856 0.00321276 0 0 0)
        meshes=lumbar5.vtp
    Body lumbar4: mass=1.299175 mass_center=(0.0154784 0.0163604 0) inertia=(0.00669976 0.00980206 0.00310229 0 0 0)
        meshes=lumbar4.vtp
    Body lumbar3: mass=1.245043 mass_center=(0.0124382 0.0163604 0) inertia=(0.00656551 0.00990369 0.00339362 0 0 0)
        meshes=lumbar3.vtp
    Body lumbar2: mass=1.40744 mass_center=(0.0222931 0.0163604 0) inertia=(0.00751049 0.011579 0.00406847 0 0 0)
        meshes=lumbar2.vtp
    Body lumbar1: mass=1.40744 mass_center=(0.0354477 0.0154515 0) inertia=(0.00771676 0.0121541 0.00443731 0 0 0)
        meshes=lumbar1.vtp
    Body torso: mass=10.01447 mass_center=(0.004181 0.223593 0) inertia=(0.073316 0.0666509 0.0555424 0 0 0)
        meshes=(thoracic12_s.vtp thoracic11_s.vtp thoracic10_s.vtp thoracic9_s.vtp thoracic8_s.vtp thoracic7_s.vtp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)
      WrapEllipsoid Abdomen: translation=(0.072713 0.0181782 0) quadrant=x dimensions=(0.00908912 0.072713 0.0454455)
    Body thorax: mass=0 mass_center=(0 0 0) inertia=(0 0 0 0 0 0) meshes=thorax.vtp
      WrapEllipsoid Thorax: xyz_body_rotation=(0.0434587 -0.331962 0.189892)
          translation=(-0.0350839 -0.115704 0.0644418) quadrant=all dimensions=(0.0908912 0.122703 0.072713)
      WrapEllipsoid Thorax_l: xyz_body_rotation=(-0.0434587 0.331962 0.189892)
          translation=(-0.0350839 -0.115704 -0.0644418) quadrant=all dimensions=(0.0908912 0.122703 0.072713)
    Body clavicle: mass=0.1125952 mass_center=(-0.0128638 0.00738755 0.0627983)
        inertia=(0.000255109 0.000268433 4.67123e-5 -1.99595e-5 -7.35493e-5 5.64817e-5) meshes=clavicle.vtp
    Body clavphant: mass=7.217615e-5 mass_center=(0 0 0) inertia=(0.721764 0.721764 0.721764 0 0 0)
    Body scapula: mass=0.5080929 mass_center=(-0.052531 -0.0336466 -0.0420044)
        inertia=(0.00089708 0.000830317 0.00098528 0.00032436 0.00029536 0.000174017) meshes=scapula.vtp
      WrapEllipsoid Deltoid2: xyz_body_rotation=(3.13042 -1.54881 -1.31423)
          translation=(-0.00557061 -0.036305 0.00922032) quadrant=-y dimensions=(0.0316948 0.038418 0.0336158)
      WrapTorus Delt3: xyz_body_rotation=(0.620988 0.32882 -0.560774) translation=(-0.0934518 -0.0411073 -0.0355367)
          quadrant=all inner_radius=0.038418 outer_radius=0.057627
      WrapTorus INFSP: xyz_body_rotation=(0.0253073 0.58835 0.151844) translation=(-0.0538812 -0.019113 -0.010757)
          quadrant=all inner_radius=0.0076836 outer_radius=0.01824855
      WrapEllipsoid TMIN: xyz_body_rotation=(-2.09754 -0.280823 -1.76348)
          translation=(-0.0401468 -0.0498474 -0.0344802) quadrant=x dimensions=(0.0288135 0.0288135 0.0480225)
      WrapCylinder TRIlongglen: xyz_body_rotation=(1.37532 -0.294612 2.43596)
          translation=(-0.0344802 -0.0296779 -0.0126779) quadrant=x radius=0.00288135 length=0.0288135
    Body scapphant: mass=7.217615e-5 mass_center=(0 0 0) inertia=(0.721764 0.721764 0.721764 0 0 0)
    Body humphant: mass=7.217615e-5 mass_center=(0 0 0) inertia=(0.721764 0.721764 0.721764 0 0 0)
    Body humphant1: mass=7.217615e-5 mass_center=(0 0 0) inertia=(0.721764 0.721764 0.721764 0 0 0)
    Body humerus: mass=1.441774 mass_center=(0.0135094 -0.104806 -0.00953232)
        inertia=(0.00537287 0.0011165 0.0055047 -0.000152032 -0.000101746 0.00053796) meshes=humerus.vtp
      WrapEllipsoid DELT1hh: xyz_body_rotation=(0.0584685 1.00461 0.570374)
          translation=(-0.0103954 -0.0094979 -0.019594) quadrant=z dimensions=(0.0224358 0.0747865 0.0373932)
      WrapCylinder delt2hum: xyz_body_rotation=(1.55093 -0.0199582 0.0596618)
          translation=(0.00127138 -0.0716453 0.000822655) quadrant=all radius=0.008151728 length=0.08974379
      WrapEllipsoid delt3hum: xyz_body_rotation=(1.72735 0.0759218 -2.74313)
          translation=(0.00142094 -0.0442735 0.000822655) quadrant=x dimensions=(0.00747865 0.00747865 0.0373932)
      WrapEllipsoid SUPSP: xyz_body_rotation=(0.0380482 0.00855211 -1.30673)
          translation=(0.000149574 0.00575856 0.00321582) quadrant=all dimensions=(0.0149574 0.0149574 0.0149574)
      WrapEllipsoid INFSP_and_TMIN_hum_head: xyz_body_rotation=(-0.286583 -0.00907571 -0.0684169)
          translation=(-0.000224358 0.00194446 0.00284189) quadrant=all dimensions=(0.0149574 0.0186967 0.0149574)
      WrapEllipsoid SUBSCAP: xyz_body_rotation=(-0.924501 0.288852 0.381529)
          translation=(-0.00186967 0.000523507 -0.0033654) quadrant=all dimensions=(0.0149574 0.0127137 0.0209402)
      WrapCylinder TMINhum: xyz_body_rotation=(1.75353 0.0692896 2.74628) translation=(-0.00104701 -0.0340279 0)
          quadrant=x radius=0.005235055 length=0.05235055
      WrapCylinder TMAJ_LAThum: xyz_body_rotation=(1.53641 -0.0637045 1.41424)
          translation=(0.000523507 -0.0331304 -0.00411326) quadrant=-x radius=0.005235055 length=0.0299146
      WrapCylinder PEC12hum: xyz_body_rotation=(1.55928 -0.0774926 -0.925897)
          translation=(0.00149574 -0.0379917 -0.00127138) quadrant=x radius=0.006730784 length=0.05235055
      WrapSphere PEC23hh: translation=(-0.00643164 0.00157052 -0.000299146) quadrant=all radius=0.0149573
      WrapEllipsoid PEC1hh: xyz_body_rotation=(-0.620465 -0.310494 0.363727)
          translation=(-0.00276711 0.000373932 -0.00186967) quadrant=-z dimensions=(0.0224358 0.0149574 0.0149574)
      WrapCylinder PEC3hum: xyz_body_rotation=(1.44094 -0.0561996 1.75196)
          translation=(0.000673078 -0.0412073 -0.000299146) quadrant=-x radius=0.00598292 length=0.07478649
      WrapCylinder LAT_TMAJhh: xyz_body_rotation=(-0.305084 -0.018326 -0.686613)
          translation=(-0.0167523 0.00762823 0.00702993) quadrant=-y radius=0.005235055 length=0.03365392
      WrapSphere LAT_TMAJ2hh: xyz_body_rotation=(-0.127235 0.276111 0.0197222)
          translation=(-0.00119659 0.00688035 0.00388889) quadrant=-z radius=0.02243595
      WrapEllipsoid Elbow_BIC_BRD: xyz_body_rotation=(-0.128631 0.137532 0.0307178)
          translation=(0.00142094 -0.216133 -0.0104701) quadrant=x dimensions=(0.011218 0.011218 0.0747865)
      WrapEllipsoid TRIlonghh: xyz_body_rotation=(3.00162 -0.853466 2.57419)
          translation=(-0.00583336 -0.00306624 -0.00104701) quadrant=z dimensions=(0.0261753 0.0149574 0.0149574)
      WrapCylinder TRI: xyz_body_rotation=(-0.14015 -0.00628319 0.154985)
          translation=(0.00209402 -0.218302 -0.00889964) quadrant=all radius=0.01196584 length=0.07478649
      WrapEllipsoid ANC: xyz_body_rotation=(0.00750492 -0.196699 1.04929)
          translation=(0.0100215 -0.213964 -0.000598292) quadrant=-x dimensions=(0.0149574 0.0149574 0.0149574)
      WrapEllipsoid BIClong: xyz_body_rotation=(-2.00434 -1.00164 0.975465)
          translation=(0.00246795 0.00545942 0.000224358) quadrant=-y dimensions=(0.0186967 0.0149574 0.0149574)
      WrapSphere TMAJ_LAT_PEC_CORBhh: translation=(0.000523507 0 0.0044872) quadrant=all radius=0.02243595
      WrapSphere DELT_TMAJ_LAT_PEC_CORBhh: translation=(0.000523507 0 0.0044872) quadrant=all radius=0.02243595
      WrapCylinder CORBhum: xyz_body_rotation=(-1.60832 0.0959931 0.875283)
          translation=(0.00201925 -0.0898933 -0.00441241) quadrant=x radius=0.00598292 length=0.07478649
      WrapEllipsoid Elbow_PT_ECRL: xyz_body_rotation=(-0.161094 -0.110828 0.61453)
          translation=(0.00224358 -0.214787 -0.00516027) quadrant=x dimensions=(0.0134617 0.0186967 0.0261753)
    Body DELT2pt2a: mass=7.217615e-5 mass_center=(0 0 0) inertia=(7.21761e-6 7.21761e-6 7.21761e-6 0 0 0)
    Body ulna: mass=0.7977656 mass_center=(0.0101596 -0.100312 0.0253901)
        inertia=(0.00462921 0.000986187 0.00422772 0.000270975 -6.51226e-5 0.000933601) meshes=ulna.vtp
      WrapCylinder PQ2: xyz_body_rotation=(1.39138 0.0689405 1.52245) translation=(-0.00117092 -0.218712 0.0447458)
          quadrant=all radius=0.007318233 length=0.1045462
    Body radius: mass=0.1685968 mass_center=(0.0351632 -0.189813 0.0163093)
        inertia=(0.000375043 7.57612e-5 0.000344282 2.57754e-5 -3.626e-6 5.4886e-5) meshes=radius.vtp
      WrapCylinder SUP: xyz_body_rotation=(1.44775 0.304036 -2.44102) translation=(0.00470459 -0.0456867 0.00616823)
          quadrant=-x radius=0.008363694 length=0.04181847
      WrapTorus ECU: xyz_body_rotation=(-0.986635 -0.148877 0.222704) translation=(-0.017041 -0.252687 0.0364866)
          quadrant=all inner_radius=0.006272771 outer_radius=0.009409156
      WrapCylinder PQ1: xyz_body_rotation=(-1.60762 -0.0127409 -2.69025) translation=(0.0293773 -0.207628 0.0301093)
          quadrant=all radius=0.01045462 length=0.1045462
    Body BICpt: mass=7.217615e-5 mass_center=(0 0 0) inertia=(7.21761e-6 7.21761e-6 7.21761e-6 0 0 0)
    Body proximal_row: mass=7.217615e-5 mass_center=(0 0 0) inertia=(7.21761e-6 7.21761e-6 7.21761e-6 0 0 0)
        meshes=(lunate.vtp sdfastSCAPHOIDw.vtp sdfastPISIFORMw.vtp sdfastTRIQUETRALw.vtp)
      WrapEllipsoid Extensor_ellipse: xyz_body_rotation=(-0.250804 0.285536 0.232827)
          translation=(0.000672315 -0.0129661 0.00451412) quadrant=z dimensions=(0.0480225 0.019209 0.0124859)
      WrapTorus ECRL: xyz_body_rotation=(1.53833 0.234398 0.731118) translation=(0.021322 -0.00922032 0.0199774)
          quadrant=all inner_radius=0.0076836 outer_radius=0.0153672
      WrapTorus ECRB: xyz_body_rotation=(1.31266 -0.11781 -0.116239) translation=(0.0121017 -0.00912427 0.0178644)
          quadrant=all inner_radius=0.0076836 outer_radius=0.0096045
      WrapTorus FCR: xyz_body_rotation=(-1.55596 -0.15324 -0.100007) translation=(0.00307344 -0.00432203 -0.0182485)
          quadrant=all inner_radius=0.00096045 outer_radius=0.002401125
      WrapTorus FCU: xyz_body_rotation=(-1.57376 -0.0797616 0.39235) translation=(-0.0118135 -0.0119096 -0.0164237)
          quadrant=all inner_radius=0.00653106 outer_radius=0.0076836
      WrapEllipsoid PL: xyz_body_rotation=(-0.0315905 0.0996583 0.0633554)
          translation=(0.00547456 -0.0172881 -0.00393785) quadrant=-z dimensions=(0.0240113 0.0134463 0.0115254)
      WrapEllipsoid FDS: xyz_body_rotation=(0.00837758 -0.0816814 -0.0171042)
          translation=(0.00115254 -0.00547456 -0.000288135) quadrant=-z dimensions=(0.0240113 0.0124859 0.0115254)
      WrapEllipsoid FDP: xyz_body_rotation=(-1.46747 -0.194604 0.121824)
          translation=(-0.00211299 -0.0066271 0.00307344) quadrant=y dimensions=(0.0240113 0.0124859 0.0115254)
      WrapTorus EDCL: xyz_body_rotation=(2.36318 0.193033 -0.26913) translation=(-0.0122938 -0.012774 0.0142147)
          quadrant=all inner_radius=0.0076836 outer_radius=0.0115254
      WrapTorus EDCR: xyz_body_rotation=(1.98392 0.100531 0.523075) translation=(-0.00941241 -0.0131582 0.0159435)
          quadrant=all inner_radius=0.01008472 outer_radius=0.01056495
      WrapTorus EDCM: xyz_body_rotation=(1.99317 0.19792 0.368264) translation=(-0.000672315 -0.0112373 0.0183446)
          quadrant=all inner_radius=0.00864405 outer_radius=0.0115254
      WrapTorus EDCI: xyz_body_rotation=(1.69768 0.0897099 0.00767945) translation=(0.00864405 -0.0143107 0.0202655)
          quadrant=all inner_radius=0.00864405 outer_radius=0.0115254
      WrapEllipsoid EDM: xyz_body_rotation=(2.9627 0.159349 0.117984) translation=(-0.0160395 -0.00211299 0.00461016)
          quadrant=-z dimensions=(0.0172881 0.0134463 0.0076836)
      WrapEllipsoid FPL: xyz_body_rotation=(-0.16633 -0.082205 -0.0659735)
          translation=(0.0163276 -0.0240113 -0.00316948) quadrant=-z dimensions=(0.0153672 0.0096045 0.0096045)
    Body hand: mass=0.4199944 mass_center=(-0.00289398 -0.0408185 -0.00107767)
        inertia=(7.93938e-5 4.33058e-5 0.000108265 6.49587e-7 -1.44353e-7 8.66115e-6)
        meshes=(sdfast_1seg_hand_fr_c_5mc.vtp sdfast_1seg_hand_fr_c_4mc.vtp sdfast_1seg_hand_fr_c_3mc.vtp sdfast_1seg_hand_fr_c_2mc.vtp sdfast_1seg_hand_fr_c_trapezium.vtp sdfast_1seg_hand_fr_c_trapezoid.vtp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)
      WrapCylinder _2rdmcp_FDS: xyz_body_rotation=(0.593936 1.50011 -2.16578)
          translation=(0.0174802 -0.0632937 0.00835592) quadrant=y radius=0.01248585 length=0.0096045
      WrapCylinder _2rdmcp_FDP: xyz_body_rotation=(0.593936 1.50011 -2.23559)
          translation=(0.0174802 -0.0632937 0.00835592) quadrant=y radius=0.01008472 length=0.0096045
      WrapCylinder _2rdmcp_ext: xyz_body_rotation=(0.593936 1.50011 -1.99125)
          translation=(0.0174802 -0.0632937 0.00835592) quadrant=-y radius=0.0096045 length=0.0096045
      WrapEllipsoid _2ndmcp: active=false xyz_body_rotation=(1.48667 -1.29661 2.43072)
          translation=(0.0197853 -0.0653106 0.00422598) quadrant=-x dimensions=(0.00480225 0.00480225 0.0288135)
      WrapCylinder _3rdmcp_FDS: xyz_body_rotation=(0.770388 1.32837 1.5708)
          translation=(0.000672315 -0.0629095 0.00883614) quadrant=-x radius=0.01248585 length=0.0096045
      WrapCylinder _3rdmcp_FDP: xyz_body_rotation=(0.770388 1.32837 1.5708)
          translation=(0.00441807 -0.0635818 0.00950846) quadrant=-x radius=0.01008472 length=0.0096045
      WrapCylinder _3rdmcp_ext: xyz_body_rotation=(0.770388 1.32837 1.46608)
          translation=(0.000672315 -0.0629095 0.00883614) quadrant=y radius=0.0096045 length=0.0096045
      WrapCylinder _4rdmcp_FDS: xyz_body_rotation=(0.858527 1.10165 -2.48535)
          translation=(-0.0133503 -0.0616609 0.00316948) quadrant=y radius=0.01248585 length=0.0096045
      WrapCylinder _4rdmcp_FDP: xyz_body_rotation=(0.858527 1.10165 -2.48535)
          translation=(-0.0133503 -0.0616609 0.00316948) quadrant=y radius=0.01008472 length=0.0096045
      WrapCylinder _4rdmcp_ext: xyz_body_rotation=(0.858527 1.10165 -3.09621)
          translation=(-0.0133503 -0.0616609 0.00316948) quadrant=x radius=0.0096045 length=0.0096045
      WrapCylinder _5rdmcp_FDS: xyz_body_rotation=(0.470541 0.975639 -2.12162)
          translation=(-0.0225706 -0.0538812 -0.00547456) quadrant=y radius=0.01248585 length=0.0115254
      WrapCylinder _5rdmcp_FDP: xyz_body_rotation=(0.470541 0.975639 -2.34852)
          translation=(-0.0225706 -0.0538812 -0.00547456) quadrant=y radius=0.01008472 length=0.0096045
      WrapCylinder _5rdmcp_ext: xyz_body_rotation=(0.470541 0.975639 -1.68529)
          translation=(-0.0225706 -0.0538812 -0.00547456) quadrant=-y radius=0.0096045 length=0.0115254
      WrapCylinder Secondpm_FDS: xyz_body_rotation=(-1.57813 1.24808 1.0259)
          translation=(0.0294858 -0.0887456 -0.021322) quadrant=y radius=0.007203375 length=0.0096045
      WrapCylinder Secondpm_FDP: xyz_body_rotation=(-1.57813 1.24808 1.0259)
          translation=(0.0294858 -0.0887456 -0.021322) quadrant=y radius=0.0076836 length=0.0096045
      WrapCylinder Secondpm_ext: xyz_body_rotation=(-1.57813 1.24808 1.0259)
          translation=(0.0294858 -0.0887456 -0.021322) quadrant=-y radius=0.005282475 length=0.0115254
      WrapCylinder Secondmd_flex: xyz_body_rotation=(-1.63171 1.34286 2.11639)
          translation=(0.0279491 -0.0788529 -0.0432203) quadrant=y radius=0.00480225 length=0.0096045
      WrapCylinder Secondmd_ext: xyz_body_rotation=(-1.63171 1.34286 2.11639)
          translation=(0.0279491 -0.0788529 -0.0432203) quadrant=-y radius=0.0019209 length=0.0096045
      WrapCylinder Secondpm: active=false xyz_body_rotation=(2.2513 -1.37008 1.18159)
          translation=(0.0293898 -0.087497 -0.021418) quadrant=all radius=0.0038418 length=0.0096045
      WrapCylinder Secondmd: active=false xyz_body_rotation=(1.35525 -1.38387 -0.557109)
          translation=(0.0283333 -0.0782767 -0.0423558) quadrant=x radius=0.00288135 length=0.0096045
      WrapCylinder MPthumb: xyz_body_rotation=(0.321315 0.11013 -0.834791)
          translation=(0.0386101 -0.0388982 -0.0260282) quadrant=all radius=0.008163825 length=0.019209
      WrapCylinder IPthumb: xyz_body_rotation=(0.332136 -0.026529 -0.257611)
          translation=(0.0380338 -0.0684801 -0.0350564) quadrant=-x radius=0.004322025 length=0.0096045
      WrapCylinder Thirdpm_FDS: xyz_body_rotation=(-0.407883 1.45246 -0.145386)
          translation=(0.0117175 -0.089706 -0.0228587) quadrant=y radius=0.007203375 length=0.0096045
      WrapCylinder Thirdpm_FDP: xyz_body_rotation=(-0.407883 1.45246 -0.145386)
          translation=(0.0117175 -0.089706 -0.0228587) quadrant=y radius=0.0076836 length=0.0096045
      WrapCylinder Thirdpm_ext: xyz_body_rotation=(-0.407883 1.45246 -0.145386)
          translation=(0.0117175 -0.089706 -0.0228587) quadrant=-y radius=0.005282475 length=0.0096045
      WrapCylinder Thirdmd_flex: xyz_body_rotation=(0.714189 1.28282 -0.203331)
          translation=(0.0182485 -0.0781806 -0.0474462) quadrant=y radius=0.00480225 length=0.0096045
      WrapCylinder Thirdmd_ext: xyz_body_rotation=(0.714189 1.28282 -0.203331)
          translation=(0.0182485 -0.0781806 -0.0474462) quadrant=-y radius=0.0019209 length=0.0096045
      WrapCylinder Fourthpm_FDS: xyz_body_rotation=(0.696212 0.976861 -1.21876)
          translation=(-0.00480225 -0.0836552 -0.027757) quadrant=y radius=0.007203375 length=0.0096045
      WrapCylinder Fourthpm_FDP: xyz_body_rotation=(0.696212 0.976861 -1.21876)
          translation=(-0.00480225 -0.0836552 -0.027757) quadrant=y radius=0.0076836 length=0.0096045
      WrapCylinder Fourthpm_ext: xyz_body_rotation=(0.696212 0.976861 -1.21876)
          translation=(-0.00480225 -0.0836552 -0.027757) quadrant=-y radius=0.005282475 length=0.0096045
      WrapCylinder Fourthmd_flex: xyz_body_rotation=(0.75311 0.925897 -0.167377)
          translation=(0.00902823 -0.074723 -0.0450451) quadrant=y radius=0.00480225 length=0.0096045
      WrapCylinder Fourthmd_ext: xyz_body_rotation=(0.75311 0.925897 -0.167377)
          translation=(0.00902823 -0.074723 -0.0450451) quadrant=-y radius=0.0019209 length=0.0096045
      WrapCylinder Fifthpm_FDS: xyz_body_rotation=(0.977035 0.825192 -1.51687)
          translation=(-0.0147909 -0.0752993 -0.0315988) quadrant=y radius=0.007203375 length=0.0096045
      WrapCylinder Fifthpm_FDP: xyz_body_rotation=(0.977035 0.825192 -1.79612)
          translation=(-0.0146949 -0.0754914 -0.0315988) quadrant=y radius=0.0076836 length=0.0096045
      WrapCylinder Fifthpm_ext: xyz_body_rotation=(0.977035 0.825192 -1.08053)
          translation=(-0.0145988 -0.0753953 -0.0315028) quadrant=-y radius=0.005282475 length=0.0096045
      WrapCylinder Fifthmd_flex: xyz_body_rotation=(0.979304 0.65031 -0.620814)
          translation=(0.000672315 -0.0711693 -0.0438926) quadrant=y radius=0.00480225 length=0.0096045
      WrapCylinder Fifthmd_ext: xyz_body_rotation=(0.979304 0.65031 -0.620814)
          translation=(0.000672315 -0.0711693 -0.0438926) quadrant=-y radius=0.0019209 length=0.0096045
    Body clavicle_l: mass=0.1125952 mass_center=(-0.0128638 0.00738755 -0.0627983)
        inertia=(0.000255109 0.000268433 4.67123e-5 -1.99595e-5 -7.35493e-5 5.64817e-5) meshes=lclavicle.vtp
    Body clavphant_l: mass=7.217615e-5 mass_center=(0 0 0) inertia=(0.721764 0.721764 0.721764 0 0 0)
    Body scapula_l: mass=0.5080929 mass_center=(-0.052531 -0.0336466 0.0420044)
        inertia=(0.00089708 0.000830317 0.00098528 0.00032436 0.00029536 0.000174017) meshes=lscapula.vtp
      WrapEllipsoid Deltoid2_l: xyz_body_rotation=(-3.13042 1.54881 -1.31423)
          translation=(-0.00557061 -0.036305 -0.00922032) quadrant=-y dimensions=(0.0316948 0.038418 0.0336158)
      WrapTorus Delt3_l: xyz_body_rotation=(-0.620988 -0.32882 -0.560774) translation=(-0.0934518 -0.0411073 0.0355367)
          quadrant=all inner_radius=0.038418 outer_radius=0.057627
      WrapTorus INFSP_l: xyz_body_rotation=(-0.0253073 -0.58835 0.151844) translation=(-0.0538812 -0.019113 0.010757)
          quadrant=all inner_radius=0.0076836 outer_radius=0.01824855
      WrapEllipsoid TMIN_l: xyz_body_rotation=(2.09754 0.280823 -1.76348) translation=(-0.0401468 -0.0498474 0.0344802)
          quadrant=x dimensions=(0.0288135 0.0288135 0.0480225)
      WrapCylinder TRIlongglen_l: xyz_body_rotation=(-1.37532 0.294612 2.43596)
          translation=(-0.0344802 -0.0296779 0.0126779) quadrant=x radius=0.00288135 length=0.0288135
    Body scapphant_l: mass=7.217615e-5 mass_center=(0 0 0) inertia=(0.721764 0.721764 0.721764 0 0 0)
    Body humphant_l: mass=7.217615e-5 mass_center=(0 0 0) inertia=(0.721764 0.721764 0.721764 0 0 0)
    Body humphant1_l: mass=7.217615e-5 mass_center=(0 0 0) inertia=(0.721764 0.721764 0.721764 0 0 0)
    Body humerus_l: mass=1.441774 mass_center=(0.0135094 -0.104806 0.00953232)
        inertia=(0.00537287 0.0011165 0.0055047 -0.000152032 -0.000101746 0.00053796) meshes=lhumerus.vtp
      WrapEllipsoid DELT1hh_l: xyz_body_rotation=(-0.0584685 -1.00461 0.570374)
          translation=(-0.0103954 -0.0094979 0.019594) quadrant=-z dimensions=(0.0224358 0.0747865 0.0373932)
      WrapCylinder delt2hum_l: xyz_body_rotation=(-1.55093 0.0199582 0.0596618)
          translation=(0.00127138 -0.0716453 -0.000852565) quadrant=all radius=0.008151728 length=0.08974379
      WrapEllipsoid delt3hum_l: xyz_body_rotation=(-1.72735 -0.0759218 -2.74313)
          translation=(0.00142094 -0.0442735 -0.000822655) quadrant=x dimensions=(0.00747865 0.00747865 0.0373932)
      WrapEllipsoid SUPSP_l: xyz_body_rotation=(-0.0380482 -0.00855211 -1.30673)
          translation=(0.000149574 0.00575856 -0.00321582) quadrant=all dimensions=(0.0149574 0.0149574 0.0149574)
      WrapEllipsoid INFSP_and_TMIN_hum_head_l: xyz_body_rotation=(0.286583 0.00907571 -0.0684169)
          translation=(-0.000224358 0.00194446 -0.00284189) quadrant=all dimensions=(0.0149574 0.0186967 0.0149574)
      WrapEllipsoid SUBSCAP_l: xyz_body_rotation=(0.924501 -0.288852 0.381529)
          translation=(-0.00186967 0.000523507 0.0033654) quadrant=all dimensions=(0.0149574 0.0127137 0.0209402)
      WrapCylinder TMINhum_l: xyz_body_rotation=(-1.75353 -0.0692896 2.74628) translation=(-0.00104701 -0.0340279 0)
          quadrant=x radius=0.005235055 length=0.05235055
      WrapCylinder TMAJ_LAThum_l: xyz_body_rotation=(-1.53641 0.0637045 1.41424)
          translation=(0.00523507 -0.0331304 0.00411326) quadrant=-x radius=0.005235055 length=0.0299146
      WrapCylinder PEC12hum_l: xyz_body_rotation=(-1.55928 0.0774926 -0.925897)
          translation=(0.00149574 -0.0379917 0.00127138) quadrant=x radius=0.006730784 length=0.05235055
      WrapSphere PEC23hh_l: translation=(-0.00643164 0.00157052 0.000299146) quadrant=all radius=0.0149573
      WrapEllipsoid PEC1hh_l: xyz_body_rotation=(0.620465 0.310494 0.363727)
          translation=(-0.00276711 0.000373932 0.00186967) quadrant=-z dimensions=(0.0224358 0.0149574 0.0149574)
      WrapCylinder PEC3hum_l: xyz_body_rotation=(-1.44094 0.0561996 1.75196)
          translation=(0.000673078 -0.0412073 0.000299146) quadrant=-x radius=0.00598292 length=0.07478649
      WrapCylinder LAT_TMAJhh_l: xyz_body_rotation=(0.305084 0.018326 -0.686613)
          translation=(-0.0167523 0.00762823 -0.00702993) quadrant=-y radius=0.005235055 length=0.03365392
      WrapSphere LAT_TMAJ2hh_l: xyz_body_rotation=(0.127235 -0.276111 0.0197222)
          translation=(-0.00119659 0.00688035 -0.00388889) quadrant=-z radius=0.02243595
      WrapEllipsoid Elbow_BIC_BRD_l: xyz_body_rotation=(0.128631 -0.137532 0.0307178)
          translation=(0.00142094 -0.216133 0.0104701) quadrant=x dimensions=(0.011218 0.011218 0.0747865)
      WrapEllipsoid TRIlonghh_l: xyz_body_rotation=(-3.00162 0.853466 2.57419)
          translation=(-0.00583336 -0.00306624 0.00104701) quadrant=z dimensions=(0.0261753 0.0149574 0.0149574)
      WrapCylinder TRI_l: xyz_body_rotation=(0.14015 0.00628319 0.154985) translation=(0.00209402 -0.218302 0.00889964)
          quadrant=all radius=0.01196584 length=0.07478649
      WrapEllipsoid ANC_l: xyz_body_rotation=(-0.00750492 0.196699 1.04929)
          translation=(0.0100215 -0.213964 0.000598292) quadrant=-x dimensions=(0.0149574 0.0149574 0.0149574)
      WrapEllipsoid BIClong_l: xyz_body_rotation=(2.00434 1.00164 0.975465)
          translation=(0.00246795 0.00545942 -0.000224358) quadrant=y dimensions=(0.0186967 0.0149574 0.0149574)
      WrapSphere TMAJ_LAT_PEC_CORBhh_l: translation=(0.000523507 0 -0.0044872) quadrant=all radius=0.02243595
      WrapSphere DELT_TMAJ_LAT_PEC_CORBhh_l: translation=(0.000523507 0 -0.0044872) quadrant=all radius=0.02243595
      WrapCylinder CORBhum_l: xyz_body_rotation=(1.60832 -0.0959931 0.875283)
          translation=(0.00201925 -0.0898933 0.00441241) quadrant=x radius=0.00598292 length=0.07478649
      WrapEllipsoid Elbow_PT_ECRL_l: xyz_body_rotation=(0.161094 0.110828 0.61453)
          translation=(0.00224358 -0.214787 0.00516027) quadrant=x dimensions=(0.0134617 0.0186967 0.0261753)
    Body DELT2pt2a_l: mass=7.217615e-5 mass_center=(0 0 0) inertia=(7.21761e-6 7.21761e-6 7.21761e-6 0 0 0)
    Body ulna_l: mass=0.7977656 mass_center=(0.0101596 -0.100312 -0.0253901)
        inertia=(0.00462921 0.000986187 0.00422772 0.000270975 -6.51226e-5 0.000933601) meshes=lulna.vtp
      WrapCylinder PQ2_l: xyz_body_rotation=(-1.39138 -0.0689405 1.52245)
          translation=(-0.00117092 -0.218712 -0.0447458) quadrant=all radius=0.007318233 length=0.1045462
    Body radius_l: mass=0.1685968 mass_center=(0.0351632 -0.189813 -0.0163093)
        inertia=(0.000375043 7.57612e-5 0.000344282 2.57754e-5 -3.626e-6 5.4886e-5) meshes=lradius.vtp
      WrapCylinder SUP_l: xyz_body_rotation=(-1.44775 -0.304036 -2.44102)
          translation=(0.00470459 -0.0456867 -0.00616823) quadrant=-x radius=0.008363694 length=0.04181847
      WrapTorus ECU_l: xyz_body_rotation=(0.986635 0.148877 0.222704) translation=(-0.017041 -0.252687 -0.0364866)
          quadrant=all inner_radius=0.006272771 outer_radius=0.009409156
      WrapCylinder PQ1_l: xyz_body_rotation=(1.60762 0.0127409 -2.69025) translation=(0.0293773 -0.207628 -0.0301093)
          quadrant=all radius=0.01045462 length=0.1045462
    Body BICpt_l: mass=7.217615e-5 mass_center=(0 0 0) inertia=(7.21761e-6 7.21761e-6 7.21761e-6 0 0 0)
    Body proximal_row_l: mass=7.217615e-5 mass_center=(0 0 0) inertia=(7.21761e-6 7.21761e-6 7.21761e-6 0 0 0)
        meshes=(llunate.vtp lsdfastSCAPHOIDw.vtp lsdfastPISIFORMw.vtp lsdfastTRIQUETRALw.vtp)
      WrapEllipsoid Extensor_ellipse_l: xyz_body_rotation=(0.250804 -0.285536 0.232827)
          translation=(0.000672315 -0.0129661 -0.00451412) quadrant=z dimensions=(0.0480225 0.019209 0.0124859)
      WrapTorus ECRL_l: xyz_body_rotation=(-1.53833 -0.234398 0.731118) translation=(0.021322 -0.00922032 -0.0199774)
          quadrant=all inner_radius=0.0076836 outer_radius=0.0153672
      WrapTorus ECRB_l: xyz_body_rotation=(-1.31266 0.11781 -0.116239) translation=(0.0121017 -0.00912427 -0.0178644)
          quadrant=all inner_radius=0.0076836 outer_radius=0.0096045
      WrapTorus FCR_l: xyz_body_rotation=(1.55596 0.15324 -0.100007) translation=(0.00307344 -0.00432203 0.0182485)
          quadrant=all inner_radius=0.00096045 outer_radius=0.002401125
      WrapTorus FCU_l: xyz_body_rotation=(1.57376 0.0797616 0.39235) translation=(-0.0118135 -0.0119096 0.0164237)
          quadrant=all inner_radius=0.00653106 outer_radius=0.0076836
      WrapEllipsoid PL_l: xyz_body_rotation=(0.0315905 -0.0996583 0.0633554)
          translation=(0.00547456 -0.0172881 0.00393785) quadrant=-z dimensions=(0.0240113 0.0134463 0.0115254)
      WrapEllipsoid FDS_l: xyz_body_rotation=(-0.00837758 0.0816814 -0.0171042)
          translation=(0.00115254 -0.00547456 0.000288135) quadrant=-z dimensions=(0.0240113 0.0124859 0.0115254)
      WrapEllipsoid FDP_l: xyz_body_rotation=(1.46747 0.194604 0.121824)
          translation=(-0.00211299 -0.0066271 -0.00307344) quadrant=y dimensions=(0.0240113 0.0124859 0.0115254)
      WrapTorus EDCL_l: xyz_body_rotation=(-2.36318 -0.193033 -0.26913) translation=(-0.0122938 -0.012774 -0.0142147)
          quadrant=all inner_radius=0.0076836 outer_radius=0.0115254
      WrapTorus EDCR_l: xyz_body_rotation=(-1.98392 -0.100531 0.523075) translation=(-0.00941241 -0.0131582 -0.0159435)
          quadrant=all inner_radius=0.01008472 outer_radius=0.01056495
      WrapTorus EDCM_l: xyz_body_rotation=(-1.99317 -0.19792 0.368264) translation=(-0.000672315 -0.0112373 -0.0183446)
          quadrant=all inner_radius=0.00864405 outer_radius=0.0115254
      WrapTorus EDCI_l: xyz_body_rotation=(-1.69768 -0.0897099 0.00767945)
          translation=(0.00864405 -0.0143107 -0.0202655) quadrant=all inner_radius=0.00864405 outer_radius=0.0115254
      WrapEllipsoid EDM_l: xyz_body_rotation=(-2.9627 -0.159349 0.117984)
          translation=(-0.0160395 -0.00211299 -0.00461016) quadrant=-z dimensions=(0.0172881 0.0134463 0.0076836)
      WrapEllipsoid FPL_l: xyz_body_rotation=(0.16633 0.082205 -0.0659735)
          translation=(0.0163276 -0.0240113 0.00316948) quadrant=-z dimensions=(0.0153672 0.0096045 0.0096045)
    Body hand_l: mass=0.4199944 mass_center=(-0.00289398 -0.0408185 0.00107767)
        inertia=(7.93938e-5 4.33058e-5 0.000108265 6.49587e-7 -1.44353e-7 8.66115e-6)
        meshes=(lsdfast_1seg_hand_fr_c_5mc.vtp lsdfast_1seg_hand_fr_c_4mc.vtp lsdfast_1seg_hand_fr_c_3mc.vtp lsdfast_1seg_hand_fr_c_2mc.vtp lsdfast_1seg_hand_fr_c_trapezium.vtp lsdfast_1seg_hand_fr_c_trapezoid.vtp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)
      WrapCylinder _2rdmcp_FDS_l: xyz_body_rotation=(-0.593936 -1.50011 -2.16578)
          translation=(0.0174802 -0.0632937 -0.00835592) quadrant=y radius=0.01248585 length=0.0096045
      WrapCylinder _2rdmcp_FDP_l: xyz_body_rotation=(-0.593936 -1.50011 -2.23559)
          translation=(0.0174802 -0.0632937 -0.00835592) quadrant=y radius=0.01008472 length=0.0096045
      WrapCylinder _2rdmcp_ext_l: xyz_body_rotation=(-0.593936 -1.50011 -1.99125)
          translation=(0.0174802 -0.0632937 -0.00835592) quadrant=-y radius=0.0096045 length=0.0096045
      WrapEllipsoid _2ndmcp_l: active=false xyz_body_rotation=(-1.48667 1.29661 2.43072)
          translation=(0.0197853 -0.0653106 -0.00422598) quadrant=-x dimensions=(0.00480225 0.00480225 0.0288135)
      WrapCylinder _3rdmcp_FDS_l: xyz_body_rotation=(-0.770388 -1.32837 1.5708)
          translation=(0.000672315 -0.0629095 -0.00883614) quadrant=-x radius=0.01248585 length=0.0096045
      WrapCylinder _3rdmcp_FDP_l: xyz_body_rotation=(-0.770388 -1.32837 1.5708)
          translation=(0.00441807 -0.0635818 -0.00950846) quadrant=-x radius=0.01008472 length=0.0096045
      WrapCylinder _3rdmcp_ext_l: xyz_body_rotation=(-0.770388 -1.32837 1.46608)
          translation=(0.000672315 -0.0629095 -0.00883614) quadrant=y radius=0.0096045 length=0.0096045
      WrapCylinder _4rdmcp_FDS_l: xyz_body_rotation=(-0.858527 -1.10165 -2.48535)
          translation=(-0.0133503 -0.0616609 -0.00316948) quadrant=y radius=0.01248585 length=0.0096045
      WrapCylinder _4rdmcp_FDP_l: xyz_body_rotation=(-0.858527 -1.10165 -2.48535)
          translation=(-0.0133503 -0.0616609 -0.00316948) quadrant=y radius=0.01008472 length=0.0096045
      WrapCylinder _4rdmcp_ext_l: xyz_body_rotation=(-0.858527 -1.10165 -3.09621)
          translation=(-0.0133503 -0.0616609 -0.00316948) quadrant=x radius=0.0096045 length=0.0096045
      WrapCylinder _5rdmcp_FDS_l: xyz_body_rotation=(-0.470541 -0.975639 -2.12162)
          translation=(-0.0225706 -0.0538812 0.00547456) quadrant=y radius=0.01248585 length=0.0115254
      WrapCylinder _5rdmcp_FDP_l: xyz_body_rotation=(-0.470541 -0.975639 -2.34852)
          translation=(-0.0225706 -0.0538812 0.00547456) quadrant=y radius=0.01008472 length=0.0096045
      WrapCylinder _5rdmcp_ext_l: xyz_body_rotation=(-0.470541 -0.975639 -1.68529)
          translation=(-0.0225706 -0.0538812 0.00547456) quadrant=-y radius=0.0096045 length=0.0115254
      WrapCylinder Secondpm_FDS_l: xyz_body_rotation=(1.57813 -1.24808 1.0259)
          translation=(0.0294858 -0.0887456 0.021322) quadrant=y radius=0.007203375 length=0.0096045
      WrapCylinder Secondpm_FDP_l: xyz_body_rotation=(1.57813 -1.24808 1.0259)
          translation=(0.0294858 -0.0887456 0.021322) quadrant=y radius=0.0076836 length=0.0096045
      WrapCylinder Secondpm_ext_l: xyz_body_rotation=(1.57813 -1.24808 1.0259)
          translation=(0.0294858 -0.0887456 0.021322) quadrant=-y radius=0.005282475 length=0.0115254
      WrapCylinder Secondmd_flex_l: xyz_body_rotation=(1.63171 -1.34286 2.11639)
          translation=(0.0279491 -0.0788529 0.0432203) quadrant=y radius=0.00480225 length=0.0096045
      WrapCylinder Secondmd_ext_l: xyz_body_rotation=(1.63171 -1.34286 2.11639)
          translation=(0.0279491 -0.0788529 0.0432203) quadrant=-y radius=0.0019209 length=0.0096045
      WrapCylinder Secondpm_l: active=false xyz_body_rotation=(-2.2513 1.37008 1.18159)
          translation=(0.0293898 -0.087497 0.021418) quadrant=all radius=0.0038418 length=0.0096045
      WrapCylinder Secondmd_l: active=false xyz_body_rotation=(-1.35525 1.38387 -0.557109)
          translation=(0.0283333 -0.0782767 0.0423558) quadrant=x radius=0.00288135 length=0.0096045
      WrapCylinder MPthumb_l: xyz_body_rotation=(-0.321315 -0.11013 -0.834791)
          translation=(0.0386101 -0.0388982 0.0260282) quadrant=all radius=0.008163825 length=0.019209
      WrapCylinder IPthumb_l: xyz_body_rotation=(-0.332136 0.026529 -0.257611)
          translation=(0.0380338 -0.0684801 0.0350564) quadrant=-x radius=0.004322025 length=0.0096045
      WrapCylinder Thirdpm_FDS_l: xyz_body_rotation=(0.407883 -1.45246 -0.145386)
          translation=(0.0117175 -0.089706 0.0228587) quadrant=y radius=0.007203375 length=0.0096045
      WrapCylinder Thirdpm_FDP_l: xyz_body_rotation=(0.407883 -1.45246 -0.145386)
          translation=(0.0117175 -0.089706 0.0228587) quadrant=y radius=0.0076836 length=0.0096045
      WrapCylinder Thirdpm_ext_l: xyz_body_rotation=(0.407883 -1.45246 -0.145386)
          translation=(0.0117175 -0.089706 0.0228587) quadrant=-y radius=0.005282475 length=0.0096045
      WrapCylinder Thirdmd_flex_l: xyz_body_rotation=(-0.714189 -1.28282 -0.203331)
          translation=(0.0182485 -0.0781806 0.0474462) quadrant=y radius=0.00480225 length=0.0096045
      WrapCylinder Thirdmd_ext_l: xyz_body_rotation=(-0.714189 -1.28282 -0.203331)
          translation=(0.0182485 -0.0781806 0.0474462) quadrant=-y radius=0.0019209 length=0.0096045
      WrapCylinder Fourthpm_FDS_l: xyz_body_rotation=(-0.696212 -0.976861 -1.21876)
          translation=(-0.00480225 -0.0836552 0.027757) quadrant=y radius=0.007203375 length=0.0096045
      WrapCylinder Fourthpm_FDP_l: xyz_body_rotation=(-0.696212 -0.976861 -1.21876)
          translation=(-0.00480225 -0.0836552 0.027757) quadrant=y radius=0.0076836 length=0.0096045
      WrapCylinder Fourthpm_ext_l: xyz_body_rotation=(-0.696212 -0.976861 -1.21876)
          translation=(-0.00480225 -0.0836552 0.027757) quadrant=-y radius=0.005282475 length=0.0096045
      WrapCylinder Fourthmd_flex_l: xyz_body_rotation=(-0.75311 -0.925897 -0.167377)
          translation=(0.00902823 -0.074723 0.0450451) quadrant=y radius=0.00480225 length=0.0096045
      WrapCylinder Fourthmd_ext_l: xyz_body_rotation=(-0.75311 -0.925897 -0.167377)
          translation=(0.00902823 -0.074723 0.0450451) quadrant=-y radius=0.0019209 length=0.0096045
      WrapCylinder Fifthpm_FDS_l: xyz_body_rotation=(-0.977035 -0.825192 -1.51687)
          translation=(-0.0147909 -0.0752993 0.0315988) quadrant=y radius=0.007203375 length=0.0096045
      WrapCylinder Fifthpm_FDP_l: xyz_body_rotation=(-0.977035 -0.825192 -1.79612)
          translation=(-0.0146949 -0.0754914 0.0315988) quadrant=y radius=0.0076836 length=0.0096045
      WrapCylinder Fifthpm_ext_l: xyz_body_rotation=(-0.977035 -0.825192 -1.08053)
          translation=(-0.0145988 -0.0753953 0.0315028) quadrant=-y radius=0.005282475 length=0.0096045
      WrapCylinder Fifthmd_flex_l: xyz_body_rotation=(-0.979304 -0.65031 -0.620814)
          translation=(0.000672315 -0.0711693 0.0438926) quadrant=y radius=0.00480225 length=0.0096045
      WrapCylinder Fifthmd_ext_l: xyz_body_rotation=(-0.979304 -0.65031 -0.620814)
          translation=(0.000672315 -0.0711693 0.0438926) quadrant=-y radius=0.0019209 length=0.0096045
    Body auxt1: mass=0 mass_center=(0 0 0) inertia=(0 0 0 0 0 0)
    Body cerv7: mass=0.1587881 mass_center=(-0.00728165 0 0) inertia=(0.000131178 0.000256393 0.000131178 0 0 0)
        meshes=rotatedcerv7.vtp
    Body aux7: mass=0 mass_center=(0 0 0) inertia=(0 0 0 0 0 0)
    Body cerv6: mass=0.1732233 mass_center=(-0.00737045 0 0) inertia=(0.000143103 0.000280244 0.000143103 0 0 0)
        meshes=cerv6.vtp
    Body aux6: mass=0 mass_center=(0 0 0) inertia=(0 0 0 0 0 0)
    Body cerv5: mass=0.1660057 mass_center=(-0.00719285 0 0) inertia=(0.00013714 0.000268319 0.00013714 0 0 0)
        meshes=cerv5.vtp
    Body aux5: mass=0 mass_center=(0 0 0) inertia=(0 0 0 0 0 0)
    Body cerv4: mass=0.1660057 mass_center=(-0.00701525 0 0) inertia=(0.00013714 0.000262356 0.00013714 0 0 0)
        meshes=cerv4.vtp
    Body aux4: mass=0 mass_center=(0 0 0) inertia=(0 0 0 0 0 0)
    Body cerv3: mass=0.1732233 mass_center=(-0.00692645 0 0) inertia=(0.000143103 0.000274281 0.000143103 0 0 0)
        meshes=cerv3.vtp
    Body aux3: mass=0 mass_center=(0 0 0) inertia=(0 0 0 0 0 0)
    Body cerv2: mass=0.180441 mass_center=(-0.00683765 0 0) inertia=(0.000149066 0.000286207 0.000149066 0 0 0)
        meshes=cerv2.vtp
    Body aux2: mass=0 mass_center=(0 0 0) inertia=(0 0 0 0 0 0)
    Body cerv1: mass=0.1587881 mass_center=(-0.00683765 0 0) inertia=(0.000131178 0.000250431 0.000131178 0 0 0)
        meshes=cerv1.vtp
    Body aux1: mass=0 mass_center=(0 0 0) inertia=(0 0 0 0 0 0)
    Body skull: mass=3.210045 mass_center=(0.0259322 0.0412994 0) inertia=(0.577808 0.70942 0.770411 0 0 0)
        meshes=skull.vtp
    Body jaw: mass=0 mass_center=(0 0 0) inertia=(0 0 0 0 0 0) meshes=jaw.vtp
  JointSet:
    CustomJoint ground_pelvis: socket_parent_frame=ground_offset socket_child_frame=pelvis_offset
      Coordinate pelvis_tilt: default_value=0 range=(-1.570796 1.570796) clamped=true
      Coordinate pelvis_list: default_value=0 range=(-1.570796 1.570796) clamped=true
      Coordinate pelvis_rotation: default_value=0 range=(-1.570796 1.570796) clamped=true
      Coordinate pelvis_tx: default_value=0 range=(-5 5) clamped=true
      Coordinate pelvis_ty: default_value=0.93 range=(-1 2) clamped=true
      Coordinate pelvis_tz: default_value=0 range=(-3 3) clamped=true
      PhysicalOffsetFrame ground_offset: socket_parent=../../../ground translation=(0 0 0) [meters]
      PhysicalOffsetFrame pelvis_offset: socket_parent=../../../bodyset/pelvis translation=(0 0 0)
      SpatialTransform:
        TransformAxis rotation1: coordinates=pelvis_tilt axis=(0 0 1) LinearFunction(coefficients=1 0)
        TransformAxis rotation2: coordinates=pelvis_list axis=(1 0 0) LinearFunction(coefficients=1 0)
        TransformAxis rotation3: coordinates=pelvis_rotation axis=(0 1 0) LinearFunction(coefficients=1 0)
        TransformAxis translation1: coordinates=pelvis_tx axis=(1 0 0) LinearFunction(coefficients=1 0)
        TransformAxis translation2: coordinates=pelvis_ty axis=(0 1 0) LinearFunction(coefficients=1 0)
        TransformAxis translation3: coordinates=pelvis_tz axis=(0 0 1) LinearFunction(coefficients=1 0)
    WeldJoint gndsacrum: socket_parent_frame=pelvis_offset socket_child_frame=sacrum_offset
      PhysicalOffsetFrame pelvis_offset: socket_parent=../../../bodyset/pelvis translation=(0 -0.0463457 0)
      PhysicalOffsetFrame sacrum_offset: socket_parent=../../../bodyset/sacrum translation=(0 0 0)
    CustomJoint hip_r: socket_parent_frame=pelvis_offset socket_child_frame=femur_r_offset
      Coordinate hip_flexion_r: default_value=0 range=(-0.5235988 2.094395) clamped=true
      Coordinate hip_adduction_r: default_value=0 range=(-0.8726646 0.5235988) clamped=true
      Coordinate hip_rotation_r: default_value=0 range=(-0.6981317 0.6981317) clamped=true
      PhysicalOffsetFrame pelvis_offset: socket_parent=../../../bodyset/pelvis
          translation=(-0.0532276 -0.0742382 0.0730749)
      PhysicalOffsetFrame femur_r_offset: socket_parent=../../../bodyset/femur_r translation=(0 0 0)
      SpatialTransform: axes_held_at_zero=(translation1 translation2 translation3)
        TransformAxis rotation1: coordinates=hip_flexion_r axis=(0 0 1)
          SimmSpline: x=(-6.28319 6.28319) y=(-6.28319 6.28319)
        TransformAxis rotation2: coordinates=hip_adduction_r axis=(1 0 0)
          SimmSpline: x=(-6.28319 6.28319) y=(-6.28319 6.28319)
        TransformAxis rotation3: coordinates=hip_rotation_r axis=(0 1 0)
          SimmSpline: x=(-6.28319 6.28319) y=(-6.28319 6.28319)
    WeldJoint femur_coord_r: socket_parent_frame=femur_r_offset socket_child_frame=femur_wlkr_r_offset
      PhysicalOffsetFrame femur_r_offset: socket_parent=../../../bodyset/femur_r
          translation=(-0.00833076 -0.420101 -0.00311175) orientation=(-1.64157 1.44618 1.5708) [radians]
      PhysicalOffsetFrame femur_wlkr_r_offset: socket_parent=../../../bodyset/femur_wlkr_r translation=(0 0 0)
    CustomJoint walker_knee_r: socket_parent_frame=femur_wlkr_r_offset socket_child_frame=tibia_wlkr_r_offset
      Coordinate knee_angle_r: default_value=0 range=(0 1.745329) clamped=true
      PhysicalOffsetFrame femur_wlkr_r_offset: socket_parent=../../../bodyset/femur_wlkr_r translation=(0 0 0)
      PhysicalOffsetFrame tibia_wlkr_r_offset: socket_parent=../../../bodyset/tibia_wlkr_r translation=(0 0 0)
      SpatialTransform: axes_held_at_zero=translation3
        TransformAxis rotation1: coordinates=knee_angle_r axis=(1 0 0) LinearFunction(coefficients=1 0)
        TransformAxis rotation2: coordinates=knee_angle_r axis=(0 0 1)
          SimmSpline: x=(0 0.174533 0.349066 0.523599 0.698132 0.872665 1.0472 1.22173 1.39626 1.5708 1.74533 1.91986 2.0944)
              y=(0 0.0126809 0.0226969 0.0296054 0.0332049 0.0335354 0.0308779 0.0257548 0.0189295 0.011407 0.00443314 -0.00050475 -0.0016782)
        TransformAxis rotation3: coordinates=knee_angle_r axis=(0 1 0)
          SimmSpline: x=(0 0.174533 0.349066 0.523599 0.698132 0.872665 1.0472 1.22173 1.39626 1.5708 1.74533 1.91986 2.0944)
              y=(0 0.059461 0.109399 0.150618 0.18392 0.210107 0.229983 0.24435 0.254012 0.25977 0.262428 0.262788 0.261654)
        TransformAxis translation1: coordinates=knee_angle_r axis=(0 1 0)
          MultiplierFunction: scale=1
            SimmSpline: x=(0 0.174533 0.349066 0.523599 0.698132 0.872665 1.0472 1.22173 1.39626 1.5708 1.74533 1.91986 2.0944)
                y=(0 0.000479 0.000835 0.001086 0.001251 0.001346 0.001391 0.001403 0.0014 0.0014 0.001421 0.001481 0.001599)
        TransformAxis translation2: coordinates=knee_angle_r axis=(0 0 1)
          MultiplierFunction: scale=1
            SimmSpline: x=(0 0.174533 0.349066 0.523599 0.698132 0.872665 1.0472 1.22173 1.39626 1.5708 1.74533 1.91986 2.0944)
                y=(0 0.000988 0.001899 0.002734 0.003492 0.004173 0.004777 0.005305 0.005756 0.00613 0.006427 0.006648 0.006792)
    WeldJoint tibia_coord_r: socket_parent_frame=tibia_wlkr_r_offset socket_child_frame=tibia_r_offset
      PhysicalOffsetFrame tibia_wlkr_r_offset: socket_parent=../../../bodyset/tibia_wlkr_r
          translation=(-0.001731 0.002389 0.008452) orientation=(1.69541 -1.50002 1.5708)
      PhysicalOffsetFrame tibia_r_offset: socket_parent=../../../bodyset/tibia_r translation=(0 0 0)
    WeldJoint femoral_shaft_r: socket_parent_frame=femur_r_offset socket_child_frame=shaft_axis_r_offset
      PhysicalOffsetFrame femur_r_offset: socket_parent=../../../bodyset/femur_r
          translation=(-0.0157244 -0.0354443 0.0393212) orientation=(0.111701 0 0.0366519)
      PhysicalOffsetFrame shaft_axis_r_offset: socket_parent=../../../bodyset/shaft_axis_r translation=(0 0 0)
    CustomJoint patellofemoral_r: socket_parent_frame=femur_r_offset socket_child_frame=patella_r_offset
      Coordinate knee_angle_r_beta: default_value=0 range=(-99999.9 99999.9) clamped=false
      PhysicalOffsetFrame femur_r_offset: socket_parent=../../../bodyset/femur_r translation=(0 0 0)
      PhysicalOffsetFrame patella_r_offset: socket_parent=../../../bodyset/patella_r translation=(0 0 0)
      SpatialTransform: axes_held_at_zero=(rotation2 rotation3 translation3)
        TransformAxis rotation1: coordinates=knee_angle_r_beta axis=(0 0 1)
          SimmSpline: x=(0 0.174533 0.349066 0.523599 0.698132 0.872665 1.0472 1.22173 1.39626 1.5708 1.74533 1.91986 2.0944)
              y=(0.00113686 -0.00629212 -0.105582 -0.253683 -0.414245 -0.579047 -0.747244 -0.91799 -1.09044 -1.26379 -1.43763 -1.61186 -1.78634)
        TransformAxis translation1: coordinates=knee_angle_r_beta axis=(1 0 0)
          MultiplierFunction: scale=1.02976
            SimmSpline f9: x=(0 0.174533 0.349066 0.523599 0.698132 0.872665 1.0472 1.22173 1.39626 1.5708 1.74533 1.91986 2.0944)
                y=(0.04435 0.040692 0.035581 0.029012 0.021473 0.013523 0.005483 -0.002412 -0.009959 -0.016903 -0.022926 -0.027739 -0.030815)
        TransformAxis translation2: coordinates=knee_angle_r_beta axis=(0 1 0)
          MultiplierFunction: scale=1.02976
            SimmSpline f10: x=(0 0.174533 0.349066 0.523599 0.698132 0.872665 1.0472 1.22173 1.39626 1.5708 1.74533 1.91986 2.0944)
                y=(-0.418712 -0.426965 -0.43422 -0.440152 -0.444617 -0.447495 -0.448724 -0.448337 -0.446353 -0.442826 -0.438035 -0.432448 -0.426632)
    CustomJoint ankle_r: socket_parent_frame=tibia_r_offset socket_child_frame=talus_r_offset
      Coordinate ankle_angle_r: default_value=0 range=(-0.6981317 0.5235988) clamped=true
      PhysicalOffsetFrame tibia_r_offset: socket_parent=../../../bodyset/tibia_r translation=(-0.0102894 -0.411578 0)
      PhysicalOffsetFrame talus_r_offset: socket_parent=../../../bodyset/talus_r translation=(0 0 0)
      SpatialTransform: axes_held_at_zero=(rotation2 rotation3 translation1 translation2 translation3)
        TransformAxis rotation1: coordinates=ankle_angle_r axis=(-0.105014 -0.1740221 0.9791263)
          SimmSpline: x=(-6.28319 6.28319) y=(-6.28319 6.28319)
    CustomJoint subtalar_r: socket_parent_frame=talus_r_offset socket_child_frame=calcn_r_offset
      Coordinate subtalar_angle_r: default_value=0 range=(-0.3490659 0.3490659) clamped=true locked=true
      PhysicalOffsetFrame talus_r_offset: socket_parent=../../../bodyset/talus_r
          translation=(-0.0501816 -0.0431642 0.00814924)
      PhysicalOffsetFrame calcn_r_offset: socket_parent=../../../bodyset/calcn_r translation=(0 0 0)
      SpatialTransform: axes_held_at_zero=(rotation2 rotation3 translation1 translation2 translation3)
        TransformAxis rotation1: coordinates=subtalar_angle_r axis=(0.78718 0.604747 -0.120949)
          SimmSpline: x=(-6.28319 6.28319) y=(-6.28319 6.28319)
    CustomJoint mtp_r: socket_parent_frame=calcn_r_offset socket_child_frame=toes_r_offset
      Coordinate mtp_angle_r: default_value=0 range=(-0.5235988 0.5235988) clamped=true locked=true
      PhysicalOffsetFrame calcn_r_offset: socket_parent=../../../bodyset/calcn_r
          translation=(0.18904 -0.00211454 0.00114185)
      PhysicalOffsetFrame toes_r_offset: socket_parent=../../../bodyset/toes_r translation=(0 0 0)
      SpatialTransform: axes_held_at_zero=(rotation2 rotation3 translation1 translation2 translation3)
        TransformAxis rotation1: coordinates=mtp_angle_r axis=(0.5809542 0 -0.8139363)
          SimmSpline: x=(-6.28319 6.28319) y=(-6.28319 6.28319)
    CustomJoint hip_l: socket_parent_frame=pelvis_offset socket_child_frame=femur_l_offset
      Coordinate hip_flexion_l: default_value=0 range=(-0.5235988 2.094395) clamped=true
      Coordinate hip_adduction_l: default_value=0 range=(-0.8726646 0.5235988) clamped=true
      Coordinate hip_rotation_l: default_value=0 range=(-0.6981317 0.6981317) clamped=true
      PhysicalOffsetFrame pelvis_offset: socket_parent=../../../bodyset/pelvis
          translation=(-0.0532276 -0.0742382 -0.0730749)
      PhysicalOffsetFrame femur_l_offset: socket_parent=../../../bodyset/femur_l translation=(0 0 0)
      SpatialTransform: axes_held_at_zero=(translation1 translation2 translation3)
        TransformAxis rotation1: coordinates=hip_flexion_l axis=(0 0 1) LinearFunction(coefficients=1 0)
        TransformAxis rotation2: coordinates=hip_adduction_l axis=(1 0 0)
          SimmSpline: x=(-6.28319 6.28319) y=(6.28319 -6.28319)
        TransformAxis rotation3: coordinates=hip_rotation_l axis=(0 1 0)
          SimmSpline: x=(-6.28319 6.28319) y=(6.28319 -6.28319)
    WeldJoint femur_coord_l: socket_parent_frame=femur_l_offset socket_child_frame=femur_wlkr_l_offset
      PhysicalOffsetFrame femur_l_offset: socket_parent=../../../bodyset/femur_l
          translation=(-0.00833076 -0.420101 0.00311175) orientation=(1.64157 -1.44618 1.5708)
      PhysicalOffsetFrame femur_wlkr_l_offset: socket_parent=../../../bodyset/femur_wlkr_l translation=(0 0 0)
    CustomJoint walker_knee_l: socket_parent_frame=femur_wlkr_l_offset socket_child_frame=tibia_wlkr_l_offset
      Coordinate knee_angle_l: default_value=0 range=(0 1.745329) clamped=true
      PhysicalOffsetFrame femur_wlkr_l_offset: socket_parent=../../../bodyset/femur_wlkr_l translation=(0 0 0)
      PhysicalOffsetFrame tibia_wlkr_l_offset: socket_parent=../../../bodyset/tibia_wlkr_l translation=(0 0 0)
      SpatialTransform: axes_held_at_zero=translation3
        TransformAxis rotation1: coordinates=knee_angle_l axis=(1 0 0)
          SimmSpline: x=(-6.28319 6.28319) y=(6.28319 -6.28319)
        TransformAxis rotation2: coordinates=knee_angle_l axis=(0 0 1)
          SimmSpline: x=(0 0.174533 0.349066 0.523599 0.698132 0.872665 1.0472 1.22173 1.39626 1.5708 1.74533 1.91986 2.0944)
              y=(0 0.0126809 0.0226969 0.0296054 0.0332049 0.0335354 0.0308779 0.0257548 0.0189295 0.011407 0.00443314 -0.00050475 -0.0016782)
        TransformAxis rotation3: coordinates=knee_angle_l axis=(0 1 0)
          SimmSpline: x=(0 0.174533 0.349066 0.523599 0.698132 0.872665 1.0472 1.22173 1.39626 1.5708 1.74533 1.91986 2.0944)
              y=(0 -0.059461 -0.109399 -0.150618 -0.18392 -0.210107 -0.229983 -0.24435 -0.254012 -0.25977 -0.262428 -0.262788 -0.261654)
        TransformAxis translation1: coordinates=knee_angle_l axis=(0 1 0)
          MultiplierFunction: scale=1
            SimmSpline: x=(0 0.174533 0.349066 0.523599 0.698132 0.872665 1.0472 1.22173 1.39626 1.5708 1.74533 1.91986 2.0944)
                y=(0 0.000479 0.000835 0.001086 0.001251 0.001346 0.001391 0.001403 0.0014 0.0014 0.001421 0.001481 0.001599)
        TransformAxis translation2: coordinates=knee_angle_l axis=(0 0 1)
          MultiplierFunction: scale=1
            SimmSpline: x=(0 0.174533 0.349066 0.523599 0.698132 0.872665 1.0472 1.22173 1.39626 1.5708 1.74533 1.91986 2.0944)
                y=(0 -0.000988 -0.001899 -0.002734 -0.003492 -0.004173 -0.004777 -0.005305 -0.005756 -0.00613 -0.006427 -0.006648 -0.006792)
    WeldJoint tibia_coord_l: socket_parent_frame=tibia_wlkr_l_offset socket_child_frame=tibia_l_offset
      PhysicalOffsetFrame tibia_wlkr_l_offset: socket_parent=../../../bodyset/tibia_wlkr_l
          translation=(-0.001731 0.002389 -0.008452) orientation=(-1.69541 1.50002 1.5708)
      PhysicalOffsetFrame tibia_l_offset: socket_parent=../../../bodyset/tibia_l translation=(0 0 0)
    WeldJoint femoral_shaft_l: socket_parent_frame=femur_l_offset socket_child_frame=shaft_axis_l_offset
      PhysicalOffsetFrame femur_l_offset: socket_parent=../../../bodyset/femur_l
          translation=(-0.0157244 -0.0354443 -0.0393212) orientation=(-0.111701 0 0.0366519)
      PhysicalOffsetFrame shaft_axis_l_offset: socket_parent=../../../bodyset/shaft_axis_l translation=(0 0 0)
    CustomJoint patellofemoral_l: socket_parent_frame=femur_l_offset socket_child_frame=patella_l_offset
      Coordinate knee_angle_l_beta: default_value=0 range=(-99999.9 99999.9) clamped=false
      PhysicalOffsetFrame femur_l_offset: socket_parent=../../../bodyset/femur_l translation=(0 0 0)
      PhysicalOffsetFrame patella_l_offset: socket_parent=../../../bodyset/patella_l translation=(0 0 0)
      SpatialTransform: axes_held_at_zero=(rotation2 rotation3 translation3)
        TransformAxis rotation1: coordinates=knee_angle_l_beta axis=(0 0 1)
          SimmSpline: x=(0 0.174533 0.349066 0.523599 0.698132 0.872665 1.0472 1.22173 1.39626 1.5708 1.74533 1.91986 2.0944)
              y=(0.00113686 -0.00629212 -0.105582 -0.253683 -0.414245 -0.579047 -0.747244 -0.91799 -1.09044 -1.26379 -1.43763 -1.61186 -1.78634)
        TransformAxis translation1: coordinates=knee_angle_l_beta axis=(1 0 0)
          MultiplierFunction: scale=1.02976
            SimmSpline f23: x=(0 0.174533 0.349066 0.523599 0.698132 0.872665 1.0472 1.22173 1.39626 1.5708 1.74533 1.91986 2.0944)
                y=(0.04435 0.040692 0.035581 0.029012 0.021473 0.013523 0.005483 -0.002412 -0.009959 -0.016903 -0.022926 -0.027739 -0.030815)
        TransformAxis translation2: coordinates=knee_angle_l_beta axis=(0 1 0)
          MultiplierFunction: scale=1.02976
            SimmSpline f24: x=(0 0.174533 0.349066 0.523599 0.698132 0.872665 1.0472 1.22173 1.39626 1.5708 1.74533 1.91986 2.0944)
                y=(-0.418712 -0.426965 -0.43422 -0.440152 -0.444617 -0.447495 -0.448724 -0.448337 -0.446353 -0.442826 -0.438035 -0.432448 -0.426632)
    CustomJoint ankle_l: socket_parent_frame=tibia_l_offset socket_child_frame=talus_l_offset
      Coordinate ankle_angle_l: default_value=0 range=(-0.6981317 0.5235988) clamped=true
      PhysicalOffsetFrame tibia_l_offset: socket_parent=../../../bodyset/tibia_l translation=(-0.0102894 -0.411578 0)
      PhysicalOffsetFrame talus_l_offset: socket_parent=../../../bodyset/talus_l translation=(0 0 0)
      SpatialTransform: axes_held_at_zero=(rotation2 rotation3 translation1 translation2 translation3)
        TransformAxis rotation1: coordinates=ankle_angle_l axis=(-0.105014 -0.1740221 -0.9791263)
          SimmSpline: x=(-6.28319 6.28319) y=(6.28319 -6.28319)
    CustomJoint subtalar_l: socket_parent_frame=talus_l_offset socket_child_frame=calcn_l_offset
      Coordinate subtalar_angle_l: default_value=0 range=(-0.3490659 0.3490659) clamped=true locked=true
      PhysicalOffsetFrame talus_l_offset: socket_parent=../../../bodyset/talus_l
          translation=(-0.0501816 -0.0431642 -0.00814924)
      PhysicalOffsetFrame calcn_l_offset: socket_parent=../../../bodyset/calcn_l translation=(0 0 0)
      SpatialTransform: axes_held_at_zero=(rotation2 rotation3 translation1 translation2 translation3)
        TransformAxis rotation1: coordinates=subtalar_angle_l axis=(0.78718 0.604747 0.120949)
          SimmSpline: x=(-6.28319 6.28319) y=(6.28319 -6.28319)
    CustomJoint mtp_l: socket_parent_frame=calcn_l_offset socket_child_frame=toes_l_offset
      Coordinate mtp_angle_l: default_value=0 range=(-0.5235988 0.5235988) clamped=true locked=true
      PhysicalOffsetFrame calcn_l_offset: socket_parent=../../../bodyset/calcn_l
          translation=(0.18904 -0.00211454 -0.00114185)
      PhysicalOffsetFrame toes_l_offset: socket_parent=../../../bodyset/toes_l translation=(0 0 0)
      SpatialTransform: axes_held_at_zero=(rotation2 rotation3 translation1 translation2 translation3)
        TransformAxis rotation1: coordinates=mtp_angle_l axis=(0.5809542 0 0.8139363)
          SimmSpline: x=(-6.28319 6.28319) y=(6.28319 -6.28319)
    CustomJoint L5_S1_IVDjnt: socket_parent_frame=sacrum_offset socket_child_frame=lumbar5_offset
      Coordinate flex_extension: default_value=0 range=(-1.22173 0.4537856) clamped=false
      Coordinate lat_bending: default_value=0 range=(-0.4363323 0.4363323) clamped=false
      Coordinate axial_rotation: default_value=0 range=(-0.7853982 0.7853982) clamped=false
      PhysicalOffsetFrame sacrum_offset: socket_parent=../../../bodyset/sacrum translation=(-0.098 0.071 0)
      PhysicalOffsetFrame lumbar5_offset: socket_parent=../../../bodyset/lumbar5 translation=(0 0 0)
      SpatialTransform: axes_held_at_zero=(translation1 translation2 translation3)
        TransformAxis rotation1: coordinates=flex_extension axis=(0 0 1) LinearFunction(coefficients=0.125 0)
        TransformAxis rotation2: coordinates=lat_bending axis=(1 0 0) LinearFunction(coefficients=0.1356 0)
        TransformAxis rotation3: coordinates=axial_rotation axis=(0 1 0) LinearFunction(coefficients=0.03033 0)
    CustomJoint L4_L5_IVDjnt: socket_parent_frame=lumbar5_offset socket_child_frame=lumbar4_offset
      Coordinate L4_L5_FE: default_value=0.06534513 range=(-99999.9 99999.9) clamped=false
      Coordinate L4_L5_LB: default_value=0 range=(-99999.9 99999.9) clamped=false
      Coordinate L4_L5_AR: default_value=0 range=(-99999.9 99999.9) clamped=false
      PhysicalOffsetFrame lumbar5_offset: socket_parent=../../../bodyset/lumbar5 translation=(0.00908912 0.0269038 0)
      PhysicalOffsetFrame lumbar4_offset: socket_parent=../../../bodyset/lumbar4
          translation=(0.000908912 -0.00227228 0)
      SpatialTransform: axes_held_at_zero=(translation1 translation2 translation3)
        TransformAxis rotation1: coordinates=L4_L5_FE axis=(0 0 1) LinearFunction(coefficients=1 0)
        TransformAxis rotation2: coordinates=L4_L5_LB axis=(1 0 0) LinearFunction(coefficients=1 0)
        TransformAxis rotation3: coordinates=L4_L5_AR axis=(0 1 0) LinearFunction(coefficients=1 0)
    CustomJoint L3_L4_IVDjnt: socket_parent_frame=lumbar4_offset socket_child_frame=lumbar3_offset
      Coordinate L3_L4_FE: default_value=0.09291054 range=(-99999.9 99999.9) clamped=false
      Coordinate L3_L4_LB: default_value=0 range=(-99999.9 99999.9) clamped=false
      Coordinate L3_L4_AR: default_value=0 range=(-99999.9 99999.9) clamped=false
      PhysicalOffsetFrame lumbar4_offset: socket_parent=../../../bodyset/lumbar4 translation=(0 0.0290852 0)
      PhysicalOffsetFrame lumbar3_offset: socket_parent=../../../bodyset/lumbar3
          translation=(-0.000545347 -0.00109069 0)
      SpatialTransform: axes_held_at_zero=(translation1 translation2 translation3)
        TransformAxis rotation1: coordinates=L3_L4_FE axis=(0 0 1) LinearFunction(coefficients=1 0)
        TransformAxis rotation2: coordinates=L3_L4_LB axis=(1 0 0) LinearFunction(coefficients=1 0)
        TransformAxis rotation3: coordinates=L3_L4_AR axis=(0 1 0) LinearFunction(coefficients=1 0)
    CustomJoint L2_L3_IVDjnt: socket_parent_frame=lumbar3_offset socket_child_frame=lumbar2_offset
      Coordinate L2_L3_FE: default_value=0.1119118 range=(-99999.9 99999.9) clamped=false
      Coordinate L2_L3_LB: default_value=0 range=(-99999.9 99999.9) clamped=false
      Coordinate L2_L3_AR: default_value=0 range=(-99999.9 99999.9) clamped=false
      PhysicalOffsetFrame lumbar3_offset: socket_parent=../../../bodyset/lumbar3 translation=(-0.00727129 0.028358 0)
      PhysicalOffsetFrame lumbar2_offset: socket_parent=../../../bodyset/lumbar2
          translation=(-0.00118158 -0.00354475 0)
      SpatialTransform: axes_held_at_zero=(translation1 translation2 translation3)
        TransformAxis rotation1: coordinates=L2_L3_FE axis=(0 0 1) LinearFunction(coefficients=1 0)
        TransformAxis rotation2: coordinates=L2_L3_LB axis=(1 0 0) LinearFunction(coefficients=1 0)
        TransformAxis rotation3: coordinates=L2_L3_AR axis=(0 1 0) LinearFunction(coefficients=1 0)
    CustomJoint L1_L2_IVDjnt: socket_parent_frame=lumbar2_offset socket_child_frame=lumbar1_offset
      Coordinate L1_L2_FE: default_value=0.1334955 range=(-99999.9 99999.9) clamped=false
      Coordinate L1_L2_LB: default_value=0 range=(-99999.9 99999.9) clamped=false
      Coordinate L1_L2_AR: default_value=0 range=(-99999.9 99999.9) clamped=false
      PhysicalOffsetFrame lumbar2_offset: socket_parent=../../../bodyset/lumbar2 translation=(-0.00908912 0.0227228 0)
      PhysicalOffsetFrame lumbar1_offset: socket_parent=../../../bodyset/lumbar1 translation=(0.00127248 -0.00345386 0)
      SpatialTransform: axes_held_at_zero=(translation1 translation2 translation3)
        TransformAxis rotation1: coordinates=L1_L2_FE axis=(0 0 1) LinearFunction(coefficients=1 0)
        TransformAxis rotation2: coordinates=L1_L2_LB axis=(1 0 0) LinearFunction(coefficients=1 0)
        TransformAxis rotation3: coordinates=L1_L2_AR axis=(0 1 0) LinearFunction(coefficients=1 0)
    WeldJoint torsojnt: socket_parent_frame=lumbar1_offset socket_child_frame=torso_offset
      PhysicalOffsetFrame lumbar1_offset: socket_parent=../../../bodyset/lumbar1 translation=(0.00227228 -0.0808931 0)
      PhysicalOffsetFrame torso_offset: socket_parent=../../../bodyset/torso translation=(0 0 0)
    WeldJoint ribcagejt: socket_parent_frame=torso_offset socket_child_frame=thorax_offset
      PhysicalOffsetFrame torso_offset: socket_parent=../../../bodyset/torso translation=(0.0172693 0.326117 0)
      PhysicalOffsetFrame thorax_offset: socket_parent=../../../bodyset/thorax translation=(0 0 0)
    CustomJoint sternoclavicular: socket_parent_frame=thorax_offset socket_child_frame=clavicle_offset
      Coordinate sternoclavicular_r2: default_value=-0.1267109 range=(-99999.9 99999.9) clamped=false
      Coordinate sternoclavicular_r3: default_value=0.05366888 range=(-99999.9 99999.9) clamped=false
      PhysicalOffsetFrame thorax_offset: socket_parent=../../../bodyset/thorax
          translation=(0.0055215 0.00605843 0.02223)
      PhysicalOffsetFrame clavicle_offset: socket_parent=../../../bodyset/clavicle translation=(0 0 0)
      SpatialTransform: axes_held_at_zero=(rotation3 translation1 translation2 translation3)
        TransformAxis rotation1: coordinates=sternoclavicular_r2 axis=(0.0153 0.9892987 -0.1451)
            LinearFunction(coefficients=1 0)
        TransformAxis rotation2: coordinates=sternoclavicular_r3 axis=(-0.9944725 0 -0.104997)
            LinearFunction(coefficients=1 0)
    CustomJoint unrotscap: socket_parent_frame=clavicle_offset socket_child_frame=clavphant_offset
      Coordinate unrotscap_r3: default_value=-0.05366888 range=(-99999.9 99999.9) clamped=false
      Coordinate unrotscap_r2: default_value=0.1267109 range=(-99999.9 99999.9) clamped=false
      PhysicalOffsetFrame clavicle_offset: socket_parent=../../../bodyset/clavicle
          translation=(-0.0166131 0.0232676 0.157129)
      PhysicalOffsetFrame clavphant_offset: socket_parent=../../../bodyset/clavphant translation=(0 0 0)
      SpatialTransform: axes_held_at_zero=(rotation3 translation1 translation2 translation3)
        TransformAxis rotation1: coordinates=unrotscap_r3 axis=(-0.9944725 0 -0.104997)
            LinearFunction(coefficients=1 0)
        TransformAxis rotation2: coordinates=unrotscap_r2 axis=(0.0153 0.9892987 -0.1451)
            LinearFunction(coefficients=1 0)
    CustomJoint acromioclavicular: socket_parent_frame=clavphant_offset socket_child_frame=scapula_offset
      Coordinate acromioclavicular_r2: default_value=-0.02565634 range=(-99999.9 99999.9) clamped=false
      Coordinate acromioclavicular_r3: default_value=0.2073451 range=(-99999.9 99999.9) clamped=false
      Coordinate acromioclavicular_r1: default_value=0.09320058 range=(-99999.9 99999.9) clamped=false
      PhysicalOffsetFrame clavphant_offset: socket_parent=../../../bodyset/clavphant translation=(0 0 0)
      PhysicalOffsetFrame scapula_offset: socket_parent=../../../bodyset/scapula translation=(0 0 0)
      SpatialTransform: axes_held_at_zero=(translation1 translation2 translation3)
        TransformAxis rotation1: coordinates=acromioclavicular_r2 axis=(0.1570949 0.9472686 -0.2792909)
            LinearFunction(coefficients=1 0)
        TransformAxis rotation2: coordinates=acromioclavicular_r3 axis=(-0.754084 0.297594 0.585487)
            LinearFunction(coefficients=1 0)
        TransformAxis rotation3: coordinates=acromioclavicular_r1 axis=(0.6376998 0.1186 0.7610998)
            LinearFunction(coefficients=1 0)
    CustomJoint unrothum: socket_parent_frame=scapula_offset socket_child_frame=scapphant_offset
      Coordinate unrothum_r1: default_value=-0.09320058 range=(-99999.9 99999.9) clamped=false
      Coordinate unrothum_r3: default_value=-0.2073451 range=(-99999.9 99999.9) clamped=false
      Coordinate unrothum_r2: default_value=0.02565634 range=(-99999.9 99999.9) clamped=false
      PhysicalOffsetFrame scapula_offset: socket_parent=../../../bodyset/scapula
          translation=(-0.0091723 -0.0326553 0.00864405)
      PhysicalOffsetFrame scapphant_offset: socket_parent=../../../bodyset/scapphant translation=(0 0 0)
      SpatialTransform: axes_held_at_zero=(translation1 translation2 translation3)
        TransformAxis rotation1: coordinates=unrothum_r1 axis=(0.6376998 0.1186 0.7610998)
            LinearFunction(coefficients=1 0)
        TransformAxis rotation2: coordinates=unrothum_r3 axis=(-0.754084 0.297594 0.585487)
            LinearFunction(coefficients=1 0)
        TransformAxis rotation3: coordinates=unrothum_r2 axis=(0.1570949 0.9472686 -0.2792909)
            LinearFunction(coefficients=1 0)
    CustomJoint shoulder0: socket_parent_frame=scapphant_offset socket_child_frame=humphant_offset
      Coordinate elv_angle: default_value=-1.282977 range=(-1.570796 2.268928) clamped=false
      PhysicalOffsetFrame scapphant_offset: socket_parent=../../../bodyset/scapphant translation=(0 0 0)
      PhysicalOffsetFrame humphant_offset: socket_parent=../../../bodyset/humphant translation=(0 0 0)
      SpatialTransform: axes_held_at_zero=(rotation2 rotation3 translation1 translation2 translation3)
        TransformAxis rotation1: coordinates=elv_angle axis=(0.0048 0.9990892 0.04240001)
            LinearFunction(coefficients=1 0)
    CustomJoint shoulder1: socket_parent_frame=humphant_offset socket_child_frame=humphant1_offset
      Coordinate shoulder_elv: default_value=-0.852228 range=(0 3.141593) clamped=false
      Coordinate shoulder1_r2: default_value=0 range=(-99999.9 99999.9) clamped=false
      PhysicalOffsetFrame humphant_offset: socket_parent=../../../bodyset/humphant translation=(0 0 0)
      PhysicalOffsetFrame humphant1_offset: socket_parent=../../../bodyset/humphant1 translation=(0 0 0)
      SpatialTransform: axes_held_at_zero=(rotation3 translation1 translation2 translation3)
        TransformAxis rotation1: coordinates=shoulder_elv axis=(-0.9982614 0.0023 0.05889802)
            LinearFunction(coefficients=1 0)
        TransformAxis rotation2: coordinates=shoulder1_r2 axis=(0.0048 0.9990892 0.04240001)
            LinearFunction(coefficients=1 0)
    CustomJoint shoulder2: socket_parent_frame=humphant1_offset socket_child_frame=humerus_offset
      Coordinate shoulder_rot: default_value=1.505157 range=(-1.570796 0.3490659) clamped=false
      PhysicalOffsetFrame humphant1_offset: socket_parent=../../../bodyset/humphant1 translation=(0 0 0)
      PhysicalOffsetFrame humerus_offset: socket_parent=../../../bodyset/humerus translation=(0 0 0)
      SpatialTransform: axes_held_at_zero=(rotation2 rotation3 translation1 translation2 translation3)
        TransformAxis rotation1: coordinates=shoulder_rot axis=(0.0048 0.9990892 0.04240001)
            LinearFunction(coefficients=1 0)
    CustomJoint con_DELT: socket_parent_frame=humerus_offset socket_child_frame=DELT2pt2a_offset
      Coordinate con_DELT2tx: default_value=-0.00281667 range=(-99999.9 99999.9) clamped=false
      Coordinate con_DELT2ty: default_value=-0.01301667 range=(-99999.9 99999.9) clamped=false
      Coordinate con_DELT2tz: default_value=-0.00094998 range=(-99999.9 99999.9) clamped=false
      PhysicalOffsetFrame humerus_offset: socket_parent=../../../bodyset/humerus translation=(0 0 0)
      PhysicalOffsetFrame DELT2pt2a_offset: socket_parent=../../../bodyset/DELT2pt2a translation=(0 0 0)
      SpatialTransform: axes_held_at_zero=(rotation1 rotation2 rotation3)
        TransformAxis translation1: coordinates=con_DELT2tx axis=(1 0 0) LinearFunction(coefficients=1 0)
        TransformAxis translation2: coordinates=con_DELT2ty axis=(0 1 0) LinearFunction(coefficients=1 0)
        TransformAxis translation3: coordinates=con_DELT2tz axis=(0 0 1) LinearFunction(coefficients=1 0)
    CustomJoint elbow: socket_parent_frame=humerus_offset socket_child_frame=ulna_offset
      Coordinate elbow_flexion: default_value=1.858648 range=(0 2.268928) clamped=false
      PhysicalOffsetFrame humerus_offset: socket_parent=../../../bodyset/humerus
          translation=(0.00456198 -0.21718 -0.00919874)
      PhysicalOffsetFrame ulna_offset: socket_parent=../../../bodyset/ulna translation=(0 0 0)
      SpatialTransform: axes_held_at_zero=(rotation2 rotation3 translation1 translation2 translation3)
        TransformAxis rotation1: coordinates=elbow_flexion axis=(0.04940001 0.03660001 0.9981083)
            LinearFunction(coefficients=1 0)
    CustomJoint radioulnar: socket_parent_frame=ulna_offset socket_child_frame=radius_offset
      Coordinate pro_sup: default_value=0.399256 range=(-1.570796 1.570796) clamped=false
      PhysicalOffsetFrame ulna_offset: socket_parent=../../../bodyset/ulna
          translation=(0.000418185 -0.0120259 0.0208988)
      PhysicalOffsetFrame radius_offset: socket_parent=../../../bodyset/radius translation=(0 0 0)
      SpatialTransform: axes_held_at_zero=(rotation2 rotation3 translation1 translation2 translation3)
        TransformAxis rotation1: coordinates=pro_sup axis=(-0.01716099 0.9926656 -0.119668)
            LinearFunction(coefficients=1 0)
    CustomJoint con_BIC: socket_parent_frame=radius_offset socket_child_frame=BICpt_offset
      Coordinate con_BICtx: default_value=0 range=(-99999.9 99999.9) clamped=false
      Coordinate con_BICty: default_value=0 range=(-99999.9 99999.9) clamped=false
      Coordinate con_BICtz: default_value=0 range=(-99999.9 99999.9) clamped=false
      PhysicalOffsetFrame radius_offset: socket_parent=../../../bodyset/radius translation=(0 0 0)
      PhysicalOffsetFrame BICpt_offset: socket_parent=../../../bodyset/BICpt translation=(0 0 0)
      SpatialTransform: axes_held_at_zero=(rotation1 rotation2 rotation3)
        TransformAxis translation1: coordinates=con_BICtx axis=(1 0 0) LinearFunction(coefficients=1 0)
        TransformAxis translation2: coordinates=con_BICty axis=(0 1 0) LinearFunction(coefficients=1 0)
        TransformAxis translation3: coordinates=con_BICtz axis=(0 0 1) LinearFunction(coefficients=1 0)
    CustomJoint radiocarpal: socket_parent_frame=radius_offset socket_child_frame=proximal_row_offset
      Coordinate deviation: default_value=-0.2458358 range=(-0.1745329 0.4363323) clamped=false
      Coordinate flexion: default_value=0.1657217 range=(-1.22173 1.22173) clamped=false
      PhysicalOffsetFrame radius_offset: socket_parent=../../../bodyset/radius
          translation=(0.0188183 -0.253002 0.0261365)
      PhysicalOffsetFrame proximal_row_offset: socket_parent=../../../bodyset/proximal_row translation=(0 0 0)
      SpatialTransform: axes_held_at_zero=(rotation2 translation1 translation2 translation3)
        TransformAxis rotation1: coordinates=deviation axis=(-0.819064 -0.135611 -0.557444)
          SimmSpline: x=(-0.174533 0 0.436332) y=(-0.174533 0 0.436332)
        TransformAxis rotation3: coordinates=flexion axis=(0.9564267 -0.2522069 0.147104)
          SimmSpline: x=(-1.5708 1.5708) y=(-0.785398 0.785398)
    CustomJoint wrist_hand: socket_parent_frame=proximal_row_offset socket_child_frame=hand_offset
      Coordinate wrist_hand_r1: default_value=0 range=(-99999.9 99999.9) clamped=false
      Coordinate wrist_hand_r3: default_value=0 range=(-99999.9 99999.9) clamped=false
      PhysicalOffsetFrame proximal_row_offset: socket_parent=../../../bodyset/proximal_row
          translation=(0.00383412 -0.0144586 0.00223497)
      PhysicalOffsetFrame hand_offset: socket_parent=../../../bodyset/hand translation=(0 0 0)
      SpatialTransform: axes_held_at_zero=(rotation3 translation1 translation2 translation3)
        TransformAxis rotation1: coordinates=wrist_hand_r1 axis=(0.8991357 -0.3490529 -0.2640399)
            LinearFunction(coefficients=1 0)
        TransformAxis rotation2: coordinates=wrist_hand_r3 axis=(0.9971185 0.01069999 -0.07510096)
            LinearFunction(coefficients=1 0)
    CustomJoint sternoclavicular_0: socket_parent_frame=thorax_offset socket_child_frame=clavicle_l_offset
      Coordinate sternoclavicular_r2_l: default_value=-0.1267109 range=(-99999.9 99999.9) clamped=false
      Coordinate sternoclavicular_r3_l: default_value=0.05366888 range=(-99999.9 99999.9) clamped=false
      PhysicalOffsetFrame thorax_offset: socket_parent=../../../bodyset/thorax
          translation=(0.00552151 0.00605843 -0.0222301)
      PhysicalOffsetFrame clavicle_l_offset: socket_parent=../../../bodyset/clavicle_l translation=(0 0 0)
      SpatialTransform: axes_held_at_zero=(rotation3 translation1 translation2 translation3)
        TransformAxis rotation1: coordinates=sternoclavicular_r2_l axis=(-0.0153 -0.9892987 -0.1451)
            LinearFunction(coefficients=1 0)
        TransformAxis rotation2: coordinates=sternoclavicular_r3_l axis=(0.9944725 0 -0.104997)
            LinearFunction(coefficients=1 0)
    CustomJoint unrotsca_l: socket_parent_frame=clavicle_l_offset socket_child_frame=clavphant_l_offset
      Coordinate unrotscap_r3_l: default_value=-0.05366888 range=(-99999.9 99999.9) clamped=false
      Coordinate unrotscap_r2_l: default_value=0.1267109 range=(-99999.9 99999.9) clamped=false
      PhysicalOffsetFrame clavicle_l_offset: socket_parent=../../../bodyset/clavicle_l
          translation=(-0.0166131 0.0232676 -0.157129)
      PhysicalOffsetFrame clavphant_l_offset: socket_parent=../../../bodyset/clavphant_l translation=(0 0 0)
      SpatialTransform: axes_held_at_zero=(rotation3 translation1 translation2 translation3)
        TransformAxis rotation1: coordinates=unrotscap_r3_l axis=(0.9944725 0 -0.104997)
            LinearFunction(coefficients=1 0)
        TransformAxis rotation2: coordinates=unrotscap_r2_l axis=(-0.0153 -0.9892987 -0.1451)
            LinearFunction(coefficients=1 0)
    CustomJoint acromioclavicular_l: socket_parent_frame=clavphant_l_offset socket_child_frame=scapula_l_offset
      Coordinate acromioclavicular_r2_l: default_value=-0.02565634 range=(-99999.9 99999.9) clamped=false
      Coordinate acromioclavicular_r3_l: default_value=0.2073451 range=(-99999.9 99999.9) clamped=false
      Coordinate acromioclavicular_r1_l: default_value=0.09320058 range=(-99999.9 99999.9) clamped=false
      PhysicalOffsetFrame clavphant_l_offset: socket_parent=../../../bodyset/clavphant_l translation=(0 0 0)
      PhysicalOffsetFrame scapula_l_offset: socket_parent=../../../bodyset/scapula_l translation=(0 0 0)
      SpatialTransform: axes_held_at_zero=(translation1 translation2 translation3)
        TransformAxis rotation1: coordinates=acromioclavicular_r2_l axis=(-0.1570949 -0.9472686 -0.2792909)
            LinearFunction(coefficients=1 0)
        TransformAxis rotation2: coordinates=acromioclavicular_r3_l axis=(0.754084 -0.297594 0.585487)
            LinearFunction(coefficients=1 0)
        TransformAxis rotation3: coordinates=acromioclavicular_r1_l axis=(-0.6376998 -0.1186 0.7610998)
            LinearFunction(coefficients=1 0)
    CustomJoint unrothum_l: socket_parent_frame=scapula_l_offset socket_child_frame=scapphant_l_offset
      Coordinate unrothum_r1_l: default_value=-0.09320058 range=(-99999.9 99999.9) clamped=false
      Coordinate unrothum_r3_l: default_value=-0.2073451 range=(-99999.9 99999.9) clamped=false
      Coordinate unrothum_r2_l: default_value=0.02565634 range=(-99999.9 99999.9) clamped=false
      PhysicalOffsetFrame scapula_l_offset: socket_parent=../../../bodyset/scapula_l
          translation=(-0.0091723 -0.0326553 -0.00864405)
      PhysicalOffsetFrame scapphant_l_offset: socket_parent=../../../bodyset/scapphant_l translation=(0 0 0)
      SpatialTransform: axes_held_at_zero=(translation1 translation2 translation3)
        TransformAxis rotation1: coordinates=unrothum_r1_l axis=(-0.6376998 -0.1186 0.7610998)
            LinearFunction(coefficients=1 0)
        TransformAxis rotation2: coordinates=unrothum_r3_l axis=(0.754084 -0.297594 0.585487)
            LinearFunction(coefficients=1 0)
        TransformAxis rotation3: coordinates=unrothum_r2_l axis=(-0.1570949 -0.9472686 -0.2792909)
            LinearFunction(coefficients=1 0)
    CustomJoint shoulder0_l: socket_parent_frame=scapphant_l_offset socket_child_frame=humphant_l_offset
      Coordinate elv_angle_l: default_value=-1.210997 range=(-1.570796 2.268928) clamped=false
      PhysicalOffsetFrame scapphant_l_offset: socket_parent=../../../bodyset/scapphant_l translation=(0 0 0)
      PhysicalOffsetFrame humphant_l_offset: socket_parent=../../../bodyset/humphant_l translation=(0 0 0)
      SpatialTransform: axes_held_at_zero=(rotation2 rotation3 translation1 translation2 translation3)
        TransformAxis rotation1: coordinates=elv_angle_l axis=(-0.0048 -0.9990892 0.04240001)
            LinearFunction(coefficients=1 0)
    CustomJoint shoulder1_l: socket_parent_frame=humphant_l_offset socket_child_frame=humphant1_l_offset
      Coordinate shoulder_elv_l: default_value=-1.13073 range=(0 3.141593) clamped=false
      Coordinate shoulder1_r2_l: default_value=0 range=(-99999.9 99999.9) clamped=false
      PhysicalOffsetFrame humphant_l_offset: socket_parent=../../../bodyset/humphant_l translation=(0 0 0)
      PhysicalOffsetFrame humphant1_l_offset: socket_parent=../../../bodyset/humphant1_l translation=(0 0 0)
      SpatialTransform: axes_held_at_zero=(rotation3 translation1 translation2 translation3)
        TransformAxis rotation1: coordinates=shoulder_elv_l axis=(0.9982614 -0.0023 0.05889802)
            LinearFunction(coefficients=1 0)
        TransformAxis rotation2: coordinates=shoulder1_r2_l axis=(-0.0048 -0.9990892 0.04240001)
            LinearFunction(coefficients=1 0)
    CustomJoint shoulder2_l: socket_parent_frame=humphant1_l_offset socket_child_frame=humerus_l_offset
      Coordinate shoulder_rot_l: default_value=1.604682 range=(-1.570796 0.3490659) clamped=false
      PhysicalOffsetFrame humphant1_l_offset: socket_parent=../../../bodyset/humphant1_l translation=(0 0 0)
      PhysicalOffsetFrame humerus_l_offset: socket_parent=../../../bodyset/humerus_l translation=(0 0 0)
      SpatialTransform: axes_held_at_zero=(rotation2 rotation3 translation1 translation2 translation3)
        TransformAxis rotation1: coordinates=shoulder_rot_l axis=(-0.0048 -0.9990892 0.04240001)
            LinearFunction(coefficients=1 0)
    CustomJoint con_DELT_l: socket_parent_frame=humerus_l_offset socket_child_frame=DELT2pt2a_l_offset
      Coordinate con_DELT2tx_l: default_value=-0.00281667 range=(-99999.9 99999.9) clamped=false
      Coordinate con_DELT2ty_l: default_value=-0.01301667 range=(-99999.9 99999.9) clamped=false
      Coordinate con_DELT2tz_l: default_value=-0.00094998 range=(-99999.9 99999.9) clamped=false
      PhysicalOffsetFrame humerus_l_offset: socket_parent=../../../bodyset/humerus_l translation=(0 0 0)
      PhysicalOffsetFrame DELT2pt2a_l_offset: socket_parent=../../../bodyset/DELT2pt2a_l translation=(0 0 0)
      SpatialTransform: axes_held_at_zero=(rotation1 rotation2 rotation3)
        TransformAxis translation1: coordinates=con_DELT2tx_l axis=(1 0 0) LinearFunction(coefficients=1 0)
        TransformAxis translation2: coordinates=con_DELT2ty_l axis=(0 1 0) LinearFunction(coefficients=1 0)
        TransformAxis translation3: coordinates=con_DELT2tz_l axis=(0 0 -1) LinearFunction(coefficients=1 0)
    CustomJoint elbow_l: socket_parent_frame=humerus_l_offset socket_child_frame=ulna_l_offset
      Coordinate elbow_flexion_l: default_value=1.787725 range=(0 2.268928) clamped=false
      PhysicalOffsetFrame humerus_l_offset: socket_parent=../../../bodyset/humerus_l
          translation=(0.00456198 -0.21718 0.00919874)
      PhysicalOffsetFrame ulna_l_offset: socket_parent=../../../bodyset/ulna_l translation=(0 0 0)
      SpatialTransform: axes_held_at_zero=(rotation2 rotation3 translation1 translation2 translation3)
        TransformAxis rotation1: coordinates=elbow_flexion_l axis=(-0.04940001 -0.03660001 0.9981083)
            LinearFunction(coefficients=1 0)
    CustomJoint radioulnar_l: socket_parent_frame=ulna_l_offset socket_child_frame=radius_l_offset
      Coordinate pro_sup_l: default_value=0.6257135 range=(-1.570796 1.570796) clamped=false
      PhysicalOffsetFrame ulna_l_offset: socket_parent=../../../bodyset/ulna_l
          translation=(0.000418185 -0.0120259 -0.0208988)
      PhysicalOffsetFrame radius_l_offset: socket_parent=../../../bodyset/radius_l translation=(0 0 0)
      SpatialTransform: axes_held_at_zero=(rotation2 rotation3 translation1 translation2 translation3)
        TransformAxis rotation1: coordinates=pro_sup_l axis=(0.01716099 -0.9926656 -0.119668)
            LinearFunction(coefficients=1 0)
    CustomJoint con_BIC_l: socket_parent_frame=radius_l_offset socket_child_frame=BICpt_l_offset
      Coordinate con_BICtx_l: default_value=0 range=(-99999.9 99999.9) clamped=false
      Coordinate con_BICty_l: default_value=0 range=(-99999.9 99999.9) clamped=false
      Coordinate con_BICtz_l: default_value=0 range=(-99999.9 99999.9) clamped=false
      PhysicalOffsetFrame radius_l_offset: socket_parent=../../../bodyset/radius_l translation=(0 0 0)
      PhysicalOffsetFrame BICpt_l_offset: socket_parent=../../../bodyset/BICpt_l translation=(0 0 0)
      SpatialTransform: axes_held_at_zero=(rotation1 rotation2 rotation3)
        TransformAxis translation1: coordinates=con_BICtx_l axis=(1 0 0) LinearFunction(coefficients=1 0)
        TransformAxis translation2: coordinates=con_BICty_l axis=(0 1 0) LinearFunction(coefficients=1 0)
        TransformAxis translation3: coordinates=con_BICtz_l axis=(0 0 -1) LinearFunction(coefficients=1 0)
    CustomJoint radiocarpal_l: socket_parent_frame=radius_l_offset socket_child_frame=proximal_row_l_offset
      Coordinate deviation_l: default_value=-0.204885 range=(-0.1745329 0.4363323) clamped=false
      Coordinate flexion_l: default_value=0.4083665 range=(-1.22173 1.22173) clamped=false
      PhysicalOffsetFrame radius_l_offset: socket_parent=../../../bodyset/radius_l
          translation=(0.0188183 -0.253002 -0.0261365)
      PhysicalOffsetFrame proximal_row_l_offset: socket_parent=../../../bodyset/proximal_row_l translation=(0 0 0)
      SpatialTransform: axes_held_at_zero=(rotation2 translation1 translation2 translation3)
        TransformAxis rotation1: coordinates=deviation_l axis=(0.819064 0.135611 -0.557444)
          SimmSpline: x=(-0.174533 0 0.436332) y=(-0.174533 0 0.436332)
        TransformAxis rotation3: coordinates=flexion_l axis=(-0.9564267 0.2522069 0.147104)
          SimmSpline: x=(-1.5708 1.5708) y=(-0.785398 0.785398)
    CustomJoint wrist_hand_l: socket_parent_frame=proximal_row_l_offset socket_child_frame=hand_l_offset
      Coordinate wrist_hand_r1_l: default_value=0 range=(-99999.9 99999.9) clamped=false
      Coordinate wrist_hand_r3_l: default_value=0 range=(-99999.9 99999.9) clamped=false
      PhysicalOffsetFrame proximal_row_l_offset: socket_parent=../../../bodyset/proximal_row_l
          translation=(0.00383412 -0.0144586 -0.00223497)
      PhysicalOffsetFrame hand_l_offset: socket_parent=../../../bodyset/hand_l translation=(0 0 0)
      SpatialTransform: axes_held_at_zero=(rotation3 translation1 translation2 translation3)
        TransformAxis rotation1: coordinates=wrist_hand_r1_l axis=(-0.8991357 0.3490529 -0.2640399)
            LinearFunction(coefficients=1 0)
        TransformAxis rotation2: coordinates=wrist_hand_r3_l axis=(-0.9971185 -0.01069999 -0.07510096)
            LinearFunction(coefficients=1 0)
    CustomJoint auxt1jnt: socket_parent_frame=torso_offset socket_child_frame=auxt1_offset
      Coordinate pitch2: default_value=0.1308997 range=(-0.5759587 0.837758) clamped=true locked=true
      Coordinate roll2: default_value=4.88814e-26 range=(-0.5759587 0.5759587) clamped=true locked=true
      Coordinate yaw2: default_value=3.248245e-26 range=(-0.4712389 0.4712389) clamped=true locked=true
      PhysicalOffsetFrame torso_offset: socket_parent=../../../bodyset/torso translation=(-0.020905 0.355839 0)
      PhysicalOffsetFrame auxt1_offset: socket_parent=../../../bodyset/auxt1 translation=(0 0 0)
      SpatialTransform: axes_held_at_zero=(translation1 translation2 translation3)
        TransformAxis rotation1: coordinates=pitch2 axis=(0 0 1)
          SimmSpline: x=(-1.74533 1.74533) y=(-0.172788 0.172788)
        TransformAxis rotation2: coordinates=roll2 axis=(1 0 0)
          SimmSpline: x=(-1.74533 1.74533) y=(-0.136136 0.136136)
        TransformAxis rotation3: coordinates=yaw2 axis=(0 1 0)
          SimmSpline: x=(-1.74533 1.74533) y=(-0.109956 0.109956)
    WeldJoint cerv7jnt: socket_parent_frame=auxt1_offset socket_child_frame=cerv7_offset
      PhysicalOffsetFrame auxt1_offset: socket_parent=../../../bodyset/auxt1 translation=(-0.00668268 0.00552493 0)
      PhysicalOffsetFrame cerv7_offset: socket_parent=../../../bodyset/cerv7 translation=(0 0 0)
    CustomJoint aux7jnt: socket_parent_frame=cerv7_offset socket_child_frame=aux7_offset
      Coordinate aux7jnt_r3: default_value=0 range=(-99999.9 99999.9) clamped=false
      Coordinate aux7jnt_r1: default_value=0 range=(-99999.9 99999.9) clamped=false
      Coordinate aux7jnt_r2: default_value=0 range=(-99999.9 99999.9) clamped=false
      PhysicalOffsetFrame cerv7_offset: socket_parent=../../../bodyset/cerv7 translation=(0.0117714 0.0109935 0)
      PhysicalOffsetFrame aux7_offset: socket_parent=../../../bodyset/aux7 translation=(0 0 0)
      SpatialTransform: axes_held_at_zero=(translation1 translation2 translation3)
        TransformAxis rotation1: coordinates=aux7jnt_r3 axis=(0 0 1) LinearFunction(coefficients=1 0)
        TransformAxis rotation2: coordinates=aux7jnt_r1 axis=(1 0 0) LinearFunction(coefficients=1 0)
        TransformAxis rotation3: coordinates=aux7jnt_r2 axis=(0 1 0) LinearFunction(coefficients=1 0)
    WeldJoint cerv6jnt: socket_parent_frame=aux7_offset socket_child_frame=cerv6_offset
      PhysicalOffsetFrame aux7_offset: socket_parent=../../../bodyset/aux7 translation=(-0.00920236 0.00397151 0)
      PhysicalOffsetFrame cerv6_offset: socket_parent=../../../bodyset/cerv6 translation=(0 0 0)
    CustomJoint aux6jnt: socket_parent_frame=cerv6_offset socket_child_frame=aux6_offset
      Coordinate aux6jnt_r3: default_value=0 range=(-99999.9 99999.9) clamped=false
      Coordinate aux6jnt_r1: default_value=0 range=(-99999.9 99999.9) clamped=false
      Coordinate aux6jnt_r2: default_value=0 range=(-99999.9 99999.9) clamped=false
      PhysicalOffsetFrame cerv6_offset: socket_parent=../../../bodyset/cerv6 translation=(0.00874686 0.00865806 0)
      PhysicalOffsetFrame aux6_offset: socket_parent=../../../bodyset/aux6 translation=(0 0 0)
      SpatialTransform: axes_held_at_zero=(translation1 translation2 translation3)
        TransformAxis rotation1: coordinates=aux6jnt_r3 axis=(0 0 1) LinearFunction(coefficients=1 0)
        TransformAxis rotation2: coordinates=aux6jnt_r1 axis=(1 0 0) LinearFunction(coefficients=1 0)
        TransformAxis rotation3: coordinates=aux6jnt_r2 axis=(0 1 0) LinearFunction(coefficients=1 0)
    WeldJoint cerv5jnt: socket_parent_frame=aux6_offset socket_child_frame=cerv5_offset
      PhysicalOffsetFrame aux6_offset: socket_parent=../../../bodyset/aux6 translation=(-0.00553959 0.00796255 0)
      PhysicalOffsetFrame cerv5_offset: socket_parent=../../../bodyset/cerv5 translation=(0 0 0)
    CustomJoint aux5jnt: socket_parent_frame=cerv5_offset socket_child_frame=aux5_offset
      Coordinate aux5jnt_r3: default_value=0 range=(-99999.9 99999.9) clamped=false
      Coordinate aux5jnt_r1: default_value=0 range=(-99999.9 99999.9) clamped=false
      Coordinate aux5jnt_r2: default_value=0 range=(-99999.9 99999.9) clamped=false
      PhysicalOffsetFrame cerv5_offset: socket_parent=../../../bodyset/cerv5 translation=(0.0074859 0.00661565 0)
      PhysicalOffsetFrame aux5_offset: socket_parent=../../../bodyset/aux5 translation=(0 0 0)
      SpatialTransform: axes_held_at_zero=(translation1 translation2 translation3)
        TransformAxis rotation1: coordinates=aux5jnt_r3 axis=(0 0 1) LinearFunction(coefficients=1 0)
        TransformAxis rotation2: coordinates=aux5jnt_r1 axis=(1 0 0) LinearFunction(coefficients=1 0)
        TransformAxis rotation3: coordinates=aux5jnt_r2 axis=(0 1 0) LinearFunction(coefficients=1 0)
    WeldJoint cerv4jnt: socket_parent_frame=aux5_offset socket_child_frame=cerv4_offset
      PhysicalOffsetFrame aux5_offset: socket_parent=../../../bodyset/aux5 translation=(-0.00490454 0.0114504 0)
      PhysicalOffsetFrame cerv4_offset: socket_parent=../../../bodyset/cerv4 translation=(0 0 0)
    CustomJoint aux4jnt: socket_parent_frame=cerv4_offset socket_child_frame=aux4_offset
      Coordinate aux4jnt_r3: default_value=0 range=(-99999.9 99999.9) clamped=false
      Coordinate aux4jnt_r1: default_value=0 range=(-99999.9 99999.9) clamped=false
      Coordinate aux4jnt_r2: default_value=0 range=(-99999.9 99999.9) clamped=false
      PhysicalOffsetFrame cerv4_offset: socket_parent=../../../bodyset/cerv4 translation=(0.00650021 0.00566548 0)
      PhysicalOffsetFrame aux4_offset: socket_parent=../../../bodyset/aux4 translation=(0 0 0)
      SpatialTransform: axes_held_at_zero=(translation1 translation2 translation3)
        TransformAxis rotation1: coordinates=aux4jnt_r3 axis=(0 0 1) LinearFunction(coefficients=1 0)
        TransformAxis rotation2: coordinates=aux4jnt_r1 axis=(1 0 0) LinearFunction(coefficients=1 0)
        TransformAxis rotation3: coordinates=aux4jnt_r2 axis=(0 1 0) LinearFunction(coefficients=1 0)
    WeldJoint cerv3jnt: socket_parent_frame=aux4_offset socket_child_frame=cerv3_offset
      PhysicalOffsetFrame aux4_offset: socket_parent=../../../bodyset/aux4 translation=(-0.00460167 0.00881254 0)
      PhysicalOffsetFrame cerv3_offset: socket_parent=../../../bodyset/cerv3 translation=(0 0 0)
    CustomJoint aux3jnt: socket_parent_frame=cerv3_offset socket_child_frame=aux3_offset
      Coordinate aux3jnt_r3: default_value=0 range=(-99999.9 99999.9) clamped=false
      Coordinate aux3jnt_r1: default_value=0 range=(-99999.9 99999.9) clamped=false
      Coordinate aux3jnt_r2: default_value=0 range=(-99999.9 99999.9) clamped=false
      PhysicalOffsetFrame cerv3_offset: socket_parent=../../../bodyset/cerv3 translation=(0.00466203 0.00449331 0)
      PhysicalOffsetFrame aux3_offset: socket_parent=../../../bodyset/aux3 translation=(0 0 0)
      SpatialTransform: axes_held_at_zero=(translation1 translation2 translation3)
        TransformAxis rotation1: coordinates=aux3jnt_r3 axis=(0 0 1) LinearFunction(coefficients=1 0)
        TransformAxis rotation2: coordinates=aux3jnt_r1 axis=(1 0 0) LinearFunction(coefficients=1 0)
        TransformAxis rotation3: coordinates=aux3jnt_r2 axis=(0 1 0) LinearFunction(coefficients=1 0)
    WeldJoint cerv2jnt: socket_parent_frame=aux3_offset socket_child_frame=cerv2_offset
      PhysicalOffsetFrame aux3_offset: socket_parent=../../../bodyset/aux3 translation=(-0.00530511 0.0109717 0)
      PhysicalOffsetFrame cerv2_offset: socket_parent=../../../bodyset/cerv2 translation=(0 0 0)
    CustomJoint aux2jnt: socket_parent_frame=cerv2_offset socket_child_frame=aux2_offset
      Coordinate pitch1: default_value=0.06981317 range=(-0.2792527 0.418879) clamped=true locked=true
      Coordinate roll1: default_value=0 range=(-0.1047198 0.1047198) clamped=true locked=true
      Coordinate yaw1: default_value=1.886494e-26 range=(-0.6632251 0.6632251) clamped=true locked=true
      PhysicalOffsetFrame cerv2_offset: socket_parent=../../../bodyset/cerv2 translation=(0.00611837 0.0188968 0)
      PhysicalOffsetFrame aux2_offset: socket_parent=../../../bodyset/aux2 translation=(0 0 0)
      SpatialTransform: axes_held_at_zero=(translation1 translation2 translation3)
        TransformAxis rotation1: coordinates=pitch1 axis=(0 0 1)
          SimmSpline: x=(-1.74533 1.74533) y=(-0.774926 0.774926)
        TransformAxis rotation2: coordinates=roll1 axis=(1 0 0)
          SimmSpline: x=(-1.74533 1.74533) y=(-0.872665 0.872665)
        TransformAxis rotation3: coordinates=yaw1 axis=(0 1 0)
          SimmSpline: x=(-1.74533 1.74533) y=(-1.5516 1.5516)
    WeldJoint cerv1jnt: socket_parent_frame=aux2_offset socket_child_frame=cerv1_offset
      PhysicalOffsetFrame aux2_offset: socket_parent=../../../bodyset/aux2 translation=(-0.0414737 -0.00343904 0)
      PhysicalOffsetFrame cerv1_offset: socket_parent=../../../bodyset/cerv1 translation=(0 0 0)
    CustomJoint aux1jnt: socket_parent_frame=cerv1_offset socket_child_frame=aux1_offset
      Coordinate aux1jnt_r3: default_value=0 range=(-99999.9 99999.9) clamped=false
      Coordinate aux1jnt_r1: default_value=0 range=(-99999.9 99999.9) clamped=false
      Coordinate aux1jnt_r2: default_value=0 range=(-99999.9 99999.9) clamped=false
      PhysicalOffsetFrame cerv1_offset: socket_parent=../../../bodyset/cerv1 translation=(0.0384951 0.0132491 0)
      PhysicalOffsetFrame aux1_offset: socket_parent=../../../bodyset/aux1 translation=(0 0 0)
      SpatialTransform: axes_held_at_zero=(translation1 translation2 translation3)
        TransformAxis rotation1: coordinates=aux1jnt_r3 axis=(0 0 1) LinearFunction(coefficients=1 0)
        TransformAxis rotation2: coordinates=aux1jnt_r1 axis=(1 0 0) LinearFunction(coefficients=1 0)
        TransformAxis rotation3: coordinates=aux1jnt_r2 axis=(0 1 0) LinearFunction(coefficients=1 0)
    WeldJoint skulljnt: socket_parent_frame=aux1_offset socket_child_frame=skull_offset
      PhysicalOffsetFrame aux1_offset: socket_parent=../../../bodyset/aux1 translation=(0 0 0)
      PhysicalOffsetFrame skull_offset: socket_parent=../../../bodyset/skull translation=(0 0 0)
    WeldJoint jawjnt: socket_parent_frame=skull_offset socket_child_frame=jaw_offset
      PhysicalOffsetFrame skull_offset: socket_parent=../../../bodyset/skull translation=(0 0 0)
      PhysicalOffsetFrame jaw_offset: socket_parent=../../../bodyset/jaw translation=(0 0 0)
  ConstraintSet:
    CoordinateCouplerConstraint patellofemoral_knee_angle_r_con: independent_coordinate_names=knee_angle_r
        dependent_coordinate_name=knee_angle_r_beta scale_factor=1
        coupled_coordinates_function=LinearFunction(coefficients=1 0)
    CoordinateCouplerConstraint patellofemoral_knee_angle_l_con: independent_coordinate_names=knee_angle_l
        dependent_coordinate_name=knee_angle_l_beta scale_factor=1
        coupled_coordinates_function=LinearFunction(coefficients=1 0)
    CoordinateCouplerConstraint L4_L5_FE_con: independent_coordinate_names=flex_extension
        dependent_coordinate_name=L4_L5_FE scale_factor=1
        coupled_coordinates_function=LinearFunction(coefficients=0.144 0)
    CoordinateCouplerConstraint L4_L5_AR_con: independent_coordinate_names=axial_rotation
        dependent_coordinate_name=L4_L5_AR scale_factor=1
        coupled_coordinates_function=LinearFunction(coefficients=0.0422222 0)
    CoordinateCouplerConstraint L4_L5_LB_con: independent_coordinate_names=lat_bending
        dependent_coordinate_name=L4_L5_LB scale_factor=1
        coupled_coordinates_function=LinearFunction(coefficients=0.181086 0)
    CoordinateCouplerConstraint L3_L4_FE_con: independent_coordinate_names=flex_extension
        dependent_coordinate_name=L3_L4_FE scale_factor=1
        coupled_coordinates_function=LinearFunction(coefficients=0.204745 0)
    CoordinateCouplerConstraint L3_L4_AR_con: independent_coordinate_names=axial_rotation
        dependent_coordinate_name=L3_L4_AR scale_factor=1
        coupled_coordinates_function=LinearFunction(coefficients=0.0422239 0)
    CoordinateCouplerConstraint L3_L4_LB_con: independent_coordinate_names=lat_bending
        dependent_coordinate_name=L3_L4_LB scale_factor=1
        coupled_coordinates_function=LinearFunction(coefficients=0.245332 0)
    CoordinateCouplerConstraint L2_L3_FE_con: independent_coordinate_names=flex_extension
        dependent_coordinate_name=L2_L3_FE scale_factor=1
        coupled_coordinates_function=LinearFunction(coefficients=0.246618 0)
    CoordinateCouplerConstraint L2_L3_AR_con: independent_coordinate_names=axial_rotation
        dependent_coordinate_name=L2_L3_AR scale_factor=1
        coupled_coordinates_function=LinearFunction(coefficients=0.0333333 0)
    CoordinateCouplerConstraint L2_L3_LB_con: independent_coordinate_names=lat_bending
        dependent_coordinate_name=L2_L3_LB scale_factor=1
        coupled_coordinates_function=LinearFunction(coefficients=0.250128 0)
    CoordinateCouplerConstraint L1_L2_FE_con: independent_coordinate_names=flex_extension
        dependent_coordinate_name=L1_L2_FE scale_factor=1
        coupled_coordinates_function=LinearFunction(coefficients=0.294182 0)
    CoordinateCouplerConstraint L1_L2_AR_con: independent_coordinate_names=axial_rotation
        dependent_coordinate_name=L1_L2_AR scale_factor=1
        coupled_coordinates_function=LinearFunction(coefficients=0.0288889 0)
    CoordinateCouplerConstraint L1_L2_LB_con: independent_coordinate_names=lat_bending
        dependent_coordinate_name=L1_L2_LB scale_factor=1
        coupled_coordinates_function=LinearFunction(coefficients=0.188 0)
    CoordinateCouplerConstraint sternoclavicular_r2_con: independent_coordinate_names=shoulder_elv
        dependent_coordinate_name=sternoclavicular_r2 scale_factor=1
      coupled_coordinates_function: SimmSpline: x=(0 2.61799) y=(0 -0.633555)
    CoordinateCouplerConstraint sternoclavicular_r3_con: independent_coordinate_names=shoulder_elv
        dependent_coordinate_name=sternoclavicular_r3 scale_factor=1
      coupled_coordinates_function: SimmSpline: x=(0 3.14159) y=(0 0.322013)
    CoordinateCouplerConstraint unrotscap_r2_con: independent_coordinate_names=shoulder_elv
        dependent_coordinate_name=unrotscap_r2 scale_factor=1
      coupled_coordinates_function: SimmSpline: x=(0 2.61799) y=(0 0.633555)
    CoordinateCouplerConstraint unrotscap_r3_con: independent_coordinate_names=shoulder_elv
        dependent_coordinate_name=unrotscap_r3 scale_factor=1
      coupled_coordinates_function: SimmSpline: x=(0 3.14159) y=(0 -0.322013)
    CoordinateCouplerConstraint acromioclavicular_r1_con: independent_coordinate_names=shoulder_elv
        dependent_coordinate_name=acromioclavicular_r1 scale_factor=1
      coupled_coordinates_function: SimmSpline: x=(0 2.61799) y=(0 0.466003)
    CoordinateCouplerConstraint acromioclavicular_r2_con: independent_coordinate_names=shoulder_elv
        dependent_coordinate_name=acromioclavicular_r2 scale_factor=1
      coupled_coordinates_function: SimmSpline: x=(0 2.61799) y=(0 -0.128282)
    CoordinateCouplerConstraint acromioclavicular_r3_con: independent_coordinate_names=shoulder_elv
        dependent_coordinate_name=acromioclavicular_r3 scale_factor=1
      coupled_coordinates_function: SimmSpline: x=(0 2.61799) y=(0 1.03673)
    CoordinateCouplerConstraint unrothum_r1_con: independent_coordinate_names=shoulder_elv
        dependent_coordinate_name=unrothum_r1 scale_factor=1
      coupled_coordinates_function: SimmSpline: x=(0 2.61799) y=(0 -0.466003)
    CoordinateCouplerConstraint unrothum_r2_con: independent_coordinate_names=shoulder_elv
        dependent_coordinate_name=unrothum_r2 scale_factor=1
      coupled_coordinates_function: SimmSpline: x=(0 2.61799) y=(0 0.128282)
    CoordinateCouplerConstraint unrothum_r3_con: independent_coordinate_names=shoulder_elv
        dependent_coordinate_name=unrothum_r3 scale_factor=1
      coupled_coordinates_function: SimmSpline: x=(0 2.61799) y=(0 -1.03673)
    CoordinateCouplerConstraint shoulder1_r2_con: independent_coordinate_names=elv_angle
        dependent_coordinate_name=shoulder1_r2 scale_factor=1
      coupled_coordinates_function: SimmSpline: x=(-1.5708 3.14159) y=(1.5708 -3.14159)
    CoordinateCouplerConstraint con_DELT2tx_con: independent_coordinate_names=shoulder_elv
        dependent_coordinate_name=con_DELT2tx scale_factor=0.778661
      coupled_coordinates_function: SimmSpline: x=(0 3.14159) y=(0 -0.0169)
    CoordinateCouplerConstraint con_DELT2ty_con: independent_coordinate_names=shoulder_elv
        dependent_coordinate_name=con_DELT2ty scale_factor=0.778661
      coupled_coordinates_function: SimmSpline: x=(0 3.14159) y=(0 -0.0781)
    CoordinateCouplerConstraint con_DELT2tz_con: independent_coordinate_names=shoulder_elv
        dependent_coordinate_name=con_DELT2tz scale_factor=0.778661
      coupled_coordinates_function: SimmSpline: x=(0 1.22229 3.14159) y=(0 -0.005395 -0.0363)
    CoordinateCouplerConstraint con_BICtx_con: independent_coordinate_names=elbow_flexion
        dependent_coordinate_name=con_BICtx scale_factor=1.088512
      coupled_coordinates_function: SimmSpline: x=(0 3.14159) y=(0 -0.0169)
    CoordinateCouplerConstraint con_BICty_con: independent_coordinate_names=elbow_flexion
        dependent_coordinate_name=con_BICty scale_factor=1.088512
      coupled_coordinates_function: SimmSpline: x=(0 3.14159) y=(0 -0.0781)
    CoordinateCouplerConstraint con_BICtz_con: independent_coordinate_names=elbow_flexion
        dependent_coordinate_name=con_BICtz scale_factor=1.088512
      coupled_coordinates_function: SimmSpline: x=(0 1.22229 3.14159) y=(0 -0.005395 -0.0363)
    CoordinateCouplerConstraint wrist_hand_r1_con: independent_coordinate_names=deviation
        dependent_coordinate_name=wrist_hand_r1 scale_factor=1
      coupled_coordinates_function: SimmSpline f18: x=(-0.174533 0 0.436332) y=(-0.261799 0 0.436332)
    CoordinateCouplerConstraint wrist_hand_r3_con: independent_coordinate_names=flexion
        dependent_coordinate_name=wrist_hand_r3 scale_factor=1
      coupled_coordinates_function: SimmSpline f19: x=(-1.22173 1.22173) y=(-0.610865 0.610865)
    CoordinateCouplerConstraint sternoclavicular_r2_con_l: independent_coordinate_names=shoulder_elv_l
        dependent_coordinate_name=sternoclavicular_r2_l scale_factor=1
      coupled_coordinates_function: SimmSpline: x=(0 2.61799) y=(0 -0.633555)
    CoordinateCouplerConstraint sternoclavicular_r3_con_l: independent_coordinate_names=shoulder_elv_l
        dependent_coordinate_name=sternoclavicular_r3_l scale_factor=1
      coupled_coordinates_function: SimmSpline: x=(0 3.14159) y=(0 0.322013)
    CoordinateCouplerConstraint unrotscap_r2_con_l: independent_coordinate_names=shoulder_elv_l
        dependent_coordinate_name=unrotscap_r2_l scale_factor=1
      coupled_coordinates_function: SimmSpline: x=(0 2.61799) y=(0 0.633555)
    CoordinateCouplerConstraint unrotscap_r3_con_l: independent_coordinate_names=shoulder_elv_l
        dependent_coordinate_name=unrotscap_r3_l scale_factor=1
      coupled_coordinates_function: SimmSpline: x=(0 3.14159) y=(0 -0.322013)
    CoordinateCouplerConstraint acromioclavicular_r1_con_l: independent_coordinate_names=shoulder_elv_l
        dependent_coordinate_name=acromioclavicular_r1_l scale_factor=1
      coupled_coordinates_function: SimmSpline: x=(0 2.61799) y=(0 0.466003)
    CoordinateCouplerConstraint acromioclavicular_r2_con_l: independent_coordinate_names=shoulder_elv_l
        dependent_coordinate_name=acromioclavicular_r2_l scale_factor=1
      coupled_coordinates_function: SimmSpline: x=(0 2.61799) y=(0 -0.128282)
    CoordinateCouplerConstraint acromioclavicular_r3_con_l: independent_coordinate_names=shoulder_elv_l
        dependent_coordinate_name=acromioclavicular_r3_l scale_factor=1
      coupled_coordinates_function: SimmSpline: x=(0 2.61799) y=(0 1.03673)
    CoordinateCouplerConstraint unrothum_r1_con_l: independent_coordinate_names=shoulder_elv_l
        dependent_coordinate_name=unrothum_r1_l scale_factor=1
      coupled_coordinates_function: SimmSpline: x=(0 2.61799) y=(0 -0.466003)
    CoordinateCouplerConstraint unrothum_r2_con_l: independent_coordinate_names=shoulder_elv_l
        dependent_coordinate_name=unrothum_r2_l scale_factor=1
      coupled_coordinates_function: SimmSpline: x=(0 2.61799) y=(0 0.128282)
    CoordinateCouplerConstraint unrothum_r3_con_l: independent_coordinate_names=shoulder_elv_l
        dependent_coordinate_name=unrothum_r3_l scale_factor=1
      coupled_coordinates_function: SimmSpline: x=(0 2.61799) y=(0 -1.03673)
    CoordinateCouplerConstraint shoulder1_r2_con_l: independent_coordinate_names=elv_angle_l
        dependent_coordinate_name=shoulder1_r2_l scale_factor=1
      coupled_coordinates_function: SimmSpline: x=(-1.5708 3.14159) y=(1.5708 -3.14159)
    CoordinateCouplerConstraint con_DELT2tx_con_l: independent_coordinate_names=shoulder_elv_l
        dependent_coordinate_name=con_DELT2tx_l scale_factor=0.778661
      coupled_coordinates_function: SimmSpline: x=(0 3.14159) y=(0 -0.0169)
    CoordinateCouplerConstraint con_DELT2ty_con_l: independent_coordinate_names=shoulder_elv_l
        dependent_coordinate_name=con_DELT2ty_l scale_factor=0.778661
      coupled_coordinates_function: SimmSpline: x=(0 3.14159) y=(0 -0.0781)
    CoordinateCouplerConstraint con_DELT2tz_con_l: independent_coordinate_names=shoulder_elv_l
        dependent_coordinate_name=con_DELT2tz_l scale_factor=0.778661
      coupled_coordinates_function: SimmSpline: x=(0 1.22229 3.14159) y=(0 -0.005395 -0.0363)
    CoordinateCouplerConstraint con_BICtx_con_l: independent_coordinate_names=elbow_flexion_l
        dependent_coordinate_name=con_BICtx_l scale_factor=1.088512
      coupled_coordinates_function: SimmSpline: x=(0 3.14159) y=(0 -0.0169)
    CoordinateCouplerConstraint con_BICty_con_l: independent_coordinate_names=elbow_flexion_l
        dependent_coordinate_name=con_BICty_l scale_factor=1.088512
      coupled_coordinates_function: SimmSpline: x=(0 3.14159) y=(0 -0.0781)
    CoordinateCouplerConstraint con_BICtz_con_l: independent_coordinate_names=elbow_flexion_l
        dependent_coordinate_name=con_BICtz_l scale_factor=1.088512
      coupled_coordinates_function: SimmSpline: x=(0 1.22229 3.14159) y=(0 -0.005395 -0.0363)
    CoordinateCouplerConstraint wrist_hand_r1_con_l: independent_coordinate_names=deviation_l
        dependent_coordinate_name=wrist_hand_r1_l scale_factor=1
      coupled_coordinates_function: SimmSpline f18: x=(-0.174533 0 0.436332) y=(-0.261799 0 0.436332)
    CoordinateCouplerConstraint wrist_hand_r3_con_l: independent_coordinate_names=flexion_l
        dependent_coordinate_name=wrist_hand_r3_l scale_factor=1
      coupled_coordinates_function: SimmSpline f19: x=(-1.22173 1.22173) y=(-0.610865 0.610865)
    CoordinateCouplerConstraint aux7jnt_r1_con: independent_coordinate_names=roll2 dependent_coordinate_name=aux7jnt_r1
      coupled_coordinates_function: SimmSpline: x=(-1.74533 1.74533) y=(-0.23911 0.23911)
    CoordinateCouplerConstraint aux7jnt_r2_con: independent_coordinate_names=yaw2 dependent_coordinate_name=aux7jnt_r2
      coupled_coordinates_function: SimmSpline: x=(-1.74533 1.74533) y=(-0.328122 0.328122)
    CoordinateCouplerConstraint aux7jnt_r3_con: independent_coordinate_names=pitch2
        dependent_coordinate_name=aux7jnt_r3
      coupled_coordinates_function: SimmSpline: x=(-1.74533 1.74533) y=(-0.326377 0.326377)
    CoordinateCouplerConstraint aux6jnt_r1_con: independent_coordinate_names=roll2 dependent_coordinate_name=aux6jnt_r1
      coupled_coordinates_function: SimmSpline: x=(-1.74533 1.74533) y=(-0.274017 0.274017)
    CoordinateCouplerConstraint aux6jnt_r2_con: independent_coordinate_names=yaw2 dependent_coordinate_name=aux6jnt_r2
      coupled_coordinates_function: SimmSpline: x=(-1.74533 1.74533) y=(-0.382227 0.382227)
    CoordinateCouplerConstraint aux6jnt_r3_con: independent_coordinate_names=pitch2
        dependent_coordinate_name=aux6jnt_r3
      coupled_coordinates_function: SimmSpline: x=(-1.74533 1.74533) y=(-0.383972 0.383972)
    CoordinateCouplerConstraint aux5jnt_r1_con: independent_coordinate_names=roll2 dependent_coordinate_name=aux5jnt_r1
      coupled_coordinates_function: SimmSpline: x=(-1.74533 1.74533) y=(-0.376991 0.376991)
    CoordinateCouplerConstraint aux5jnt_r2_con: independent_coordinate_names=yaw2 dependent_coordinate_name=aux5jnt_r2
      coupled_coordinates_function: SimmSpline: x=(-1.74533 1.74533) y=(-0.382227 0.382227)
    CoordinateCouplerConstraint aux5jnt_r3_con: independent_coordinate_names=pitch2
        dependent_coordinate_name=aux5jnt_r3
      coupled_coordinates_function: SimmSpline: x=(-1.74533 1.74533) y=(-0.383972 0.383972)
    CoordinateCouplerConstraint aux4jnt_r1_con: independent_coordinate_names=roll2 dependent_coordinate_name=aux4jnt_r1
      coupled_coordinates_function: SimmSpline: x=(-1.74533 1.74533) y=(-0.376991 0.376991)
    CoordinateCouplerConstraint aux4jnt_r2_con: independent_coordinate_names=yaw2 dependent_coordinate_name=aux4jnt_r2
      coupled_coordinates_function: SimmSpline: x=(-1.74533 1.74533) y=(-0.382227 0.382227)
    CoordinateCouplerConstraint aux4jnt_r3_con: independent_coordinate_names=pitch2
        dependent_coordinate_name=aux4jnt_r3
      coupled_coordinates_function: SimmSpline: x=(-1.74533 1.74533) y=(-0.287979 0.287979)
    CoordinateCouplerConstraint aux3jnt_r1_con: independent_coordinate_names=roll2 dependent_coordinate_name=aux3jnt_r1
      coupled_coordinates_function: SimmSpline: x=(-1.74533 1.74533) y=(-0.342085 0.342085)
    CoordinateCouplerConstraint aux3jnt_r2_con: independent_coordinate_names=yaw2 dependent_coordinate_name=aux3jnt_r2
      coupled_coordinates_function: SimmSpline: x=(-1.74533 1.74533) y=(-0.164061 0.164061)
    CoordinateCouplerConstraint aux3jnt_r3_con: independent_coordinate_names=pitch2
        dependent_coordinate_name=aux3jnt_r3
      coupled_coordinates_function: SimmSpline: x=(-1.74533 1.74533) y=(-0.191986 0.191986)
    CoordinateCouplerConstraint aux1jnt_r1_con: independent_coordinate_names=roll1 dependent_coordinate_name=aux1jnt_r1
      coupled_coordinates_function: SimmSpline: x=(-1.74533 1.74533) y=(-0.872665 0.872665)
    CoordinateCouplerConstraint aux1jnt_r2_con: independent_coordinate_names=yaw1 dependent_coordinate_name=aux1jnt_r2
      coupled_coordinates_function: SimmSpline: x=(-1.74533 1.74533) y=(-0.193732 0.193732)
    CoordinateCouplerConstraint aux1jnt_r3_con: independent_coordinate_names=pitch1
        dependent_coordinate_name=aux1jnt_r3
      coupled_coordinates_function: SimmSpline: x=(-1.74533 1.74533) y=(-0.970403 0.970403)
  ForceSet:
    Schutte1993Muscle_Deprecated [values shared by the 90 below unless stated]: max_contraction_velocity=10
        time_scale=0.1 activation1=7.6 activation2=2.5 damping=0.05
      tendon_force_length_curve: SimmSpline: x=(-10 -0.002 -0.001 0 0.00131 0.00281 0.00431 0.00581 0.00731 0.00881 0.0103 0.0118 0.0123 9.2 9.201 9.202 20)
          y=(0 0 0 0 0.0108 0.0257 0.0435 0.0652 0.0915 0.123 0.161 0.208 0.227 345 345 345 345)
      active_force_length_curve: SimmSpline: x=(-5.30769 -4.30769 -1.92308 -0.884615 -0.269231 0.230769 0.461538 0.52725 0.62875 0.71875 0.86125 1.045 1.2175 1.43875 1.5 1.61539 2 2.96154 3.69231 5.46154 9.9019)
          y=(0.012188 0.021899 0.036466 0.052493 0.075312 0.114158 0.157859 0.226667 0.636667 0.856667 0.95 0.993333 0.77 0.246667 0.193821 0.133252 0.072683 0.044417 0.036341 0.021899 0.007332)
      passive_force_length_curve: SimmSpline: x=(-5 0.998 0.999 1 1.1 1.2 1.3 1.4 1.5 1.6 1.601 1.602 5)
          y=(0 0 0 0 0.035 0.12 0.26 0.55 1.17 2 2 2 2)
    Schutte1993Muscle_Deprecated addbrev_r: max_isometric_force=607.4 optimal_fiber_length=0.1049445
        tendon_slack_length=0.03664404 pennation_angle_at_optimal=0.1064651 [radians]
      PathPoint P1: pelvis (-0.0180655 -0.0889081 0.0145657)
      PathPoint P2: femur_r (-0.00205952 -0.121511 0.0281754)
      PathWrap: wrap_object=AB_at_femshaft_r method=hybrid
    Schutte1993Muscle_Deprecated addlong_r: max_isometric_force=799 optimal_fiber_length=0.1108985
        tendon_slack_length=0.1332422 pennation_angle_at_optimal=0.1239184
      PathPoint P1: pelvis (-0.0071694 -0.0840843 0.0178573)
      PathPoint P2: femur_r (0.0115951 -0.246493 0.0179123)
      PathWrap: wrap_object=AL_at_femshaft_r method=hybrid
    Schutte1993Muscle_Deprecated addmagDist_r: max_isometric_force=648.4 optimal_fiber_length=0.185019
        tendon_slack_length=0.09397129 pennation_angle_at_optimal=0.2408554
      PathPoint P1: pelvis (-0.0700293 -0.120754 0.0376629)
      PathPoint P2: femur_r (0.0115848 -0.270311 0.0218388)
      PathWrap: wrap_object=AMdist_at_femshaft_r method=hybrid
    Schutte1993Muscle_Deprecated addmagIsch_r: max_isometric_force=648.4 optimal_fiber_length=0.1611167
        tendon_slack_length=0.2279563 pennation_angle_at_optimal=0.2076942
      PathPoint P1: pelvis (-0.0847653 -0.122731 0.0394507)
      PathPoint P2: femur_r (0.00495315 -0.399516 -0.0370355)
      PathWrap: wrap_object=AMisch_at_condyles_r method=hybrid
    Schutte1993Muscle_Deprecated addmagMid_r: max_isometric_force=648.4 optimal_fiber_length=0.1440997
        tendon_slack_length=0.05023082 pennation_angle_at_optimal=0.2565634
      PathPoint P1: pelvis (-0.0498074 -0.114209 0.0269941)
      PathPoint P2: femur_r (0.00249201 -0.167233 0.0330638)
      PathWrap: wrap_object=AMmid_at_femshaft_r method=hybrid
    Schutte1993Muscle_Deprecated addmagProx_r: max_isometric_force=648.4 optimal_fiber_length=0.1073184
        tendon_slack_length=0.04369972 pennation_angle_at_optimal=0.3874631
      PathPoint P1: pelvis (-0.0293018 -0.101724 0.0129107)
      PathPoint P2: femur_r (-0.0157244 -0.0812068 0.036232)
      PathWrap: wrap_object=AMprox_at_femshaft_r method=hybrid
    Schutte1993Muscle_Deprecated bflh_r: max_isometric_force=1410.4 optimal_fiber_length=0.1011827
        tendon_slack_length=0.3338198 pennation_angle_at_optimal=0.2024582
      PathPoint P1: pelvis (-0.0983664 -0.112649 0.0554256)
      PathPoint P2: tibia_r (-0.0326175 -0.0437302 0.0322912)
      PathWrap: wrap_object=BFLH_at_gastroc_r method=hybrid
    Schutte1993Muscle_Deprecated bfsh_r: max_isometric_force=315.8 optimal_fiber_length=0.1135859
        tendon_slack_length=0.1070982 pennation_angle_at_optimal=0.2146755
      PathPoint P1: femur_r (0.00514881 -0.217382 0.0264781)
      PathPoint P2: tibia_r (-0.0309713 -0.0431129 0.0308368)
      PathWrap: wrap_object=BFLH_at_gastroc_r method=hybrid
    Schutte1993Muscle_Deprecated edl_r: max_isometric_force=345.4 optimal_fiber_length=0.07200345
        tendon_slack_length=0.3816287 pennation_angle_at_optimal=0.1884956
      PathPoint P1: tibia_r (-0.0164631 -0.119049 0.0198791)
      PathPoint P2: tibia_r (0.0168747 -0.386884 0.0108607)
      PathPoint P3: calcn_r (0.0971632 0.0380617 0.000845816)
      PathPoint P4: calcn_r (0.170855 0.00581499 0.0137445)
      PathPoint P5: toes_r (0.000317181 0.00496917 0.0161762)
      PathPoint P6: toes_r (0.0468371 -0.000422908 0.0264318)
    Schutte1993Muscle_Deprecated ehl_r: max_isometric_force=165 optimal_fiber_length=0.07779562
        tendon_slack_length=0.344776 pennation_angle_at_optimal=0.164061
      PathPoint P1: tibia_r (-0.0144052 -0.159487 0.0183275)
      PathPoint P2: tibia_r (0.0073055 -0.29932 0.0159032)
      PathPoint P3: tibia_r (0.0205788 -0.379991 -0.00271518)
      PathPoint P4: calcn_r (0.102555 0.0411278 -0.0223084)
      PathPoint P5: calcn_r (0.136705 0.0326697 -0.0271719)
      PathPoint P6: calcn_r (0.183331 0.0146961 -0.0296036)
      PathPoint P7: toes_r (0.0315067 0.00433481 -0.0259031)
      PathPoint P8: toes_r (0.0595243 0.00359472 -0.0196652)
    Schutte1993Muscle_Deprecated fdl_r: max_isometric_force=274.4 optimal_fiber_length=0.04641401
        tendon_slack_length=0.3930621 pennation_angle_at_optimal=0.2373648
      PathPoint P1: tibia_r (-0.00236657 -0.188503 -0.00174548)
      PathPoint P2: tibia_r (-0.0181094 -0.375051 -0.0120245)
      PathPoint P3: calcn_r (0.046097 0.033304 -0.0296036)
      PathPoint P4: calcn_r (0.0748548 0.018608 -0.0278062)
      PathPoint P5: calcn_r (0.175295 -0.00856389 0.0122643)
      PathPoint P6: toes_r (-0.00200881 -0.00824671 0.0155419)
      PathPoint P7: toes_r (0.0301322 -0.00750662 0.0227313)
      PathPoint P8: toes_r (0.0466256 -0.00634362 0.0255859)
    Schutte1993Muscle_Deprecated fhl_r: max_isometric_force=436.8 optimal_fiber_length=0.05487559
        tendon_slack_length=0.3706966 pennation_angle_at_optimal=0.2949606
      PathPoint P1: tibia_r (-0.0318973 -0.222561 0.0193942)
      PathPoint P2: tibia_r (-0.0249004 -0.377727 -0.00736979)
      PathPoint P3: calcn_r (0.0395419 0.0291807 -0.0254802)
      PathPoint P4: calcn_r (0.109745 0.00718944 -0.0270661)
      PathPoint P5: calcn_r (0.182485 -0.00560353 -0.0284406)
      PathPoint P6: toes_r (0.0163877 -0.00676653 -0.0280177)
      PathPoint P7: toes_r (0.0594186 -0.0107842 -0.0191366)
    Schutte1993Muscle_Deprecated gaslat_r: max_isometric_force=606.4 optimal_fiber_length=0.06046155
        tendon_slack_length=0.3927944 pennation_angle_at_optimal=0.2094395
      PathPoint P1: femur_r (-0.00308928 -0.39275 0.0313438)
      PathPoint P2: calcn_r (0.00465199 0.0327754 -0.00560353)
      PathWrap: wrap_object=Gastroc_at_shank_r method=hybrid
      PathWrap pathwrap_0: wrap_object=Gastroc_at_condyles_r method=hybrid
    Schutte1993Muscle_Deprecated gasmed_r: max_isometric_force=1308 optimal_fiber_length=0.05240675
        tendon_slack_length=0.4118554 pennation_angle_at_optimal=0.1727876
      PathPoint P1: femur_r (0.00823808 -0.390073 -0.0235361)
      PathPoint P2: calcn_r (0.00465199 0.0327754 -0.00560353)
      PathWrap: wrap_object=Gastroc_at_shank_r method=hybrid
      PathWrap pathwrap_0: wrap_object=Gastroc_at_condyles_r method=hybrid
    Schutte1993Muscle_Deprecated gem_r: max_isometric_force=109 optimal_fiber_length=0.0251843
        tendon_slack_length=0.04092449 pennation_angle_at_optimal=0
      PathPoint P1: pelvis (-0.0979596 -0.0722614 0.0634369)
      PathPoint P2: femur_r (-0.0146226 -0.00339821 0.0501274)
    Schutte1993Muscle_Deprecated glmax1_r: max_isometric_force=1092.2 optimal_fiber_length=0.1448608
        tendon_slack_length=0.04917202 pennation_angle_at_optimal=0.3822271
      PathPoint P1: pelvis (-0.116432 0.0326311 0.0532503)
      PathPoint P2: pelvis (-0.118891 -0.022889 0.0736802)
      PathPoint P3: femur_r (-0.0457212 -0.0335701 0.0341726)
      PathPoint P4: femur_r (-0.0285243 -0.0582844 0.0531826)
      PathWrap: wrap_object=Gmax_at_pelvis_r method=hybrid
    Schutte1993Muscle_Deprecated glmax2_r: max_isometric_force=1561 optimal_fiber_length=0.1551901
        tendon_slack_length=0.07250116 pennation_angle_at_optimal=0.3822271
      PathPoint P1: pelvis (-0.124566 0.00822873 0.0436973)
      PathPoint P2: pelvis (-0.12712 -0.0576012 0.0768961)
      PathPoint P3: femur_r (-0.0463391 -0.060138 0.0285149)
      PathPoint P4: femur_r (-0.0160642 -0.104623 0.0474117)
      PathWrap: wrap_object=Gmax_at_pelvis_r method=hybrid
    Schutte1993Muscle_Deprecated glmax3_r: max_isometric_force=1052.2 optimal_fiber_length=0.1674633
        tendon_slack_length=0.07060616 pennation_angle_at_optimal=0.3822271
      PathPoint P1: pelvis (-0.122958 -0.0496561 0.00851248)
      PathPoint P2: pelvis (-0.120405 -0.119458 0.0411436)
      PathPoint P3: femur_r (-0.0289362 -0.115848 0.0106365)
      PathPoint P4: femur_r (-0.00617856 -0.146123 0.0465064)
      PathWrap: wrap_object=Gmax_at_pelvis_r method=hybrid
    Schutte1993Muscle_Deprecated glmed1_r: max_isometric_force=1762.2 optimal_fiber_length=0.07128467
        tendon_slack_length=0.05494657 pennation_angle_at_optimal=0.3577925
      PathPoint P1: pelvis (-0.0420894 0.0231728 0.110851)
      PathPoint P2: femur_r (-0.0224488 -0.0120482 0.0628007)
    Schutte1993Muscle_Deprecated glmed2_r: max_isometric_force=1233 optimal_fiber_length=0.07228712
        tendon_slack_length=0.06508799 pennation_angle_at_optimal=0.3577925
      PathPoint P1: pelvis (-0.0803956 0.0298882 0.0638435)
      PathPoint P2: femur_r (-0.0265677 -0.00597261 0.0596324)
    Schutte1993Muscle_Deprecated glmed3_r: max_isometric_force=1404 optimal_fiber_length=0.07360676
        tendon_slack_length=0.04619251 pennation_angle_at_optimal=0.3577925
      PathPoint P1: pelvis (-0.108959 -0.00690455 0.0497507)
      PathPoint P2: femur_r (-0.0318196 -0.00483988 0.0586139)
    Schutte1993Muscle_Deprecated glmin1_r: max_isometric_force=360 optimal_fiber_length=0.06864444
        tendon_slack_length=0.01615163 pennation_angle_at_optimal=0.1745329
      PathPoint P1: pelvis (-0.0438866 -0.0140929 0.0985555)
      PathPoint P2: femur_r (-0.00741426 -0.0107094 0.0633665)
    Schutte1993Muscle_Deprecated glmin2_r: max_isometric_force=190 optimal_fiber_length=0.05689731
        tendon_slack_length=0.02641661 pennation_angle_at_optimal=0
      PathPoint P1: pelvis (-0.0582633 -0.0134308 0.0918401)
      PathPoint P2: femur_r (-0.00988569 -0.0107094 0.0633665)
    Schutte1993Muscle_Deprecated glmin3_r: max_isometric_force=430 optimal_fiber_length=0.03885328
        tendon_slack_length=0.0521452 pennation_angle_at_optimal=0.01745329
      PathPoint P1: pelvis (-0.074626 -0.0146604 0.0754773)
      PathPoint P2: femur_r (-0.0139018 -0.00854701 0.0622349)
    Schutte1993Muscle_Deprecated grac_r: max_isometric_force=274.6 optimal_fiber_length=0.2364773
        tendon_slack_length=0.1723232 pennation_angle_at_optimal=0.143117
      PathPoint P1: pelvis (-0.0447945 -0.122315 0.0232296)
      PathPoint P2: tibia_r (-0.0189532 -0.0489263 -0.0287131)
      PathPoint P3: tibia_r (0.00183153 -0.0716352 -0.0152536)
      PathWrap: wrap_object=GR_at_condyles_r method=hybrid
    Schutte1993Muscle_Deprecated iliacus_r: max_isometric_force=1243.8 optimal_fiber_length=0.103675
        tendon_slack_length=0.09142073 pennation_angle_at_optimal=0.2495821
      PathPoint P1: pelvis (-0.0572228 0.0292262 0.0797335)
      PathPoint P2: pelvis (-0.0127687 -0.0526828 0.0715049)
      PathPoint P3: femur_r (-0.00236845 -0.0581814 0.0157285)
      PathPoint P4: femur_r (-0.012563 -0.0655957 0.0221782)
      PathWrap: wrap_object=IL_at_brim_r method=hybrid range=(2 3)
    Schutte1993Muscle_Deprecated patlig_r: max_isometric_force=1 optimal_fiber_length=0.05158647
        tendon_slack_length=0.005158647 pennation_angle_at_optimal=0 activation1=0 activation2=0
      PathPoint P1: tibia_r (0.0290162 -0.0595759 0.00552735)
      PathPoint P2: patella_r (0.00216078 0.00154341 0.000102894)
    Schutte1993Muscle_Deprecated pect_r: max_isometric_force=354 optimal_fiber_length=0.1358622
        tendon_slack_length=0.00102152 pennation_angle_at_optimal=0
      PathPoint P1: pelvis (-0.0219433 -0.0787404 0.0428367)
      PathPoint P2: femur_r (-0.00820719 -0.087715 0.027191)
      PathWrap: wrap_object=PECT_at_femshaft_r method=hybrid
    Schutte1993Muscle_Deprecated perbrev_r: max_isometric_force=305.9 optimal_fiber_length=0.04713877
        tendon_slack_length=0.1537721 pennation_angle_at_optimal=0.2007129
      PathPoint P1: tibia_r (-0.0250033 -0.260529 0.0243397)
      PathPoint P2: tibia_r (-0.0348813 -0.40057 0.0241457)
      PathPoint P3: tibia_r (-0.0293249 -0.41199 0.0247276)
      PathPoint P4: calcn_r (0.0497974 0.0285463 0.0246344)
      PathPoint P5: calcn_r (0.0715772 0.0231542 0.0362644)
    Schutte1993Muscle_Deprecated perlong_r: max_isometric_force=653.3 optimal_fiber_length=0.05274762
        tendon_slack_length=0.3457669 pennation_angle_at_optimal=0.2460914
      PathPoint P1: tibia_r (-0.0205788 -0.141274 0.0273458)
      PathPoint P2: tibia_r (-0.0326175 -0.40129 0.022982)
      PathPoint P3: tibia_r (-0.0279873 -0.413019 0.023273)
      PathPoint P4: calcn_r (0.0463085 0.0243172 0.0233657)
      PathPoint P5: calcn_r (0.0720001 0.0112071 0.0300265)
      PathPoint P6: calcn_r (0.0900795 0.00729517 0.0124758)
      PathPoint P7: calcn_r (0.12719 0.0089868 -0.0194538)
    Schutte1993Muscle_Deprecated pertert_r: max_isometric_force=90 optimal_fiber_length=0.08182806
        tendon_slack_length=0.1035798 pennation_angle_at_optimal=0.2268928
      PathPoint P1: tibia_r (-0.0153312 -0.255693 0.0215277)
      PathPoint P2: tibia_r (0.0111126 -0.393058 0.0218185)
      PathPoint P3: calcn_r (0.0906081 0.0241058 0.0316124)
    Schutte1993Muscle_Deprecated piri_r: max_isometric_force=296 optimal_fiber_length=0.02566263
        tendon_slack_length=0.1135078 pennation_angle_at_optimal=0.1745329
      PathPoint P1: pelvis (-0.0962951 -0.00617628 0.0127781)
      PathPoint P2: pelvis (-0.0964936 -0.0289992 0.0576201)
      PathPoint P3: femur_r (-0.0152404 -0.00370714 0.0494485)
    Schutte1993Muscle_Deprecated psoas_r: max_isometric_force=959.4 optimal_fiber_length=0.1130612
        tendon_slack_length=0.09381469 pennation_angle_at_optimal=0.1867502
      PathPoint P1: pelvis (-0.0573172 0.0586414 0.0368874)
      PathPoint P2: pelvis (-0.0193895 -0.0618573 0.0620464)
      PathPoint P3: femur_r (-0.0135928 -0.0480898 0.0052051)
      PathPoint P4: femur_r (-0.0241993 -0.0539595 0.00995759)
      PathWrap: wrap_object=PS_at_brim_r method=hybrid range=(2 3)
    Schutte1993Muscle_Deprecated quadfem_r: max_isometric_force=254 optimal_fiber_length=0.05580463
        tendon_slack_length=0.02480206 pennation_angle_at_optimal=0
      PathPoint P1: pelvis (-0.105857 -0.108515 0.0488615)
      PathPoint P2: femur_r (-0.0368139 -0.0365771 0.0408714)
    Schutte1993Muscle_Deprecated recfem_r: max_isometric_force=1697.6 optimal_fiber_length=0.07757837
        tendon_slack_length=0.3536511 pennation_angle_at_optimal=0.2426008
      PathPoint P1: pelvis (-0.0226999 -0.0366982 0.0882459)
      PathPoint P2: patella_r (0.0102894 0.0504183 0.000720261)
      PathPoint P3: patella_r (0.0124502 0.044965 -0.00102894)
      PathWrap: wrap_object=KnExt_at_fem_r method=hybrid
    Schutte1993Muscle_Deprecated sart_r: max_isometric_force=227 optimal_fiber_length=0.4111537
        tendon_slack_length=0.1122256 pennation_angle_at_optimal=0.02268928
      PathPoint P1: pelvis (-0.0184437 -0.014755 0.0998797)
      PathPoint P2: femur_r (-0.00308928 -0.367418 -0.047638)
      PathPoint P3: tibia_r (-0.0258265 -0.0412608 -0.0353943)
      PathPoint P4: tibia_r (-0.0163602 -0.0616337 -0.0256002)
      PathPoint P5: tibia_r (0.0139937 -0.0833445 -0.00252124)
    Schutte1993Muscle_Deprecated semimem_r: max_isometric_force=2325.4 optimal_fiber_length=0.07155376
        tendon_slack_length=0.3608799 pennation_angle_at_optimal=0.2635447
      PathPoint P1: pelvis (-0.0933535 -0.107825 0.058074)
      PathPoint P2: tibia_r (-0.0298394 -0.0429071 -0.0190063)
      PathWrap: wrap_object=SM_at_condyles_r method=hybrid
    Schutte1993Muscle_Deprecated semiten_r: max_isometric_force=603.8 optimal_fiber_length=0.2003177
        tendon_slack_length=0.2542893 pennation_angle_at_optimal=0.2251475
      PathPoint P1: pelvis (-0.0981772 -0.118513 0.0487102)
      PathPoint P2: tibia_r (-0.032103 -0.0522704 -0.0222063)
      PathPoint P3: tibia_r (0.00195499 -0.0795374 -0.0113456)
      PathWrap: wrap_object=ST_at_condyles_r method=hybrid
    Schutte1993Muscle_Deprecated soleus_r: max_isometric_force=3585.9 optimal_fiber_length=0.04515147
        tendon_slack_length=0.2888668 pennation_angle_at_optimal=0.4939282
      PathPoint P1: tibia_r (-0.00781998 -0.0942513 0.00950315)
      PathPoint P2: calcn_r (0.00465199 0.0327754 -0.00560353)
    Schutte1993Muscle_Deprecated tfl_r: max_isometric_force=310 optimal_fiber_length=0.09664824
        tendon_slack_length=0.4578074 pennation_angle_at_optimal=0.05235988
      PathPoint P1: pelvis (-0.0294153 0.0202408 0.117378)
      PathPoint P2: femur_r (0.0302749 -0.10246 0.0675532)
      PathPoint P3: femur_r (0.0110184 -0.417052 0.036662)
      PathPoint P4: tibia_r (0.0111126 -0.0421868 0.033552)
    Schutte1993Muscle_Deprecated tibant_r: max_isometric_force=673.7 optimal_fiber_length=0.07057066
        tendon_slack_length=0.2490121 pennation_angle_at_optimal=0.1675516
      PathPoint P1: tibia_r (0.0158458 -0.134998 0.0157093)
      PathPoint P2: tibia_r (0.0258265 -0.196117 0.0124123)
      PathPoint P3: tibia_r (0.0239744 -0.376492 -0.0128002)
      PathPoint P4: calcn_r (0.123278 0.0188194 -0.0322468)
    Schutte1993Muscle_Deprecated tibpost_r: max_isometric_force=905.6 optimal_fiber_length=0.03891366
        tendon_slack_length=0.2901024 pennation_angle_at_optimal=0.2391101
      PathPoint P1: tibia_r (-0.00421868 -0.134175 0.00998805)
      PathPoint P2: tibia_r (-0.0168747 -0.37608 -0.01697)
      PathPoint P3: calcn_r (0.0440882 0.0353128 -0.0302379)
      PathPoint P4: calcn_r (0.0816213 0.0168106 -0.0297093)
    Schutte1993Muscle_Deprecated vasint_r: max_isometric_force=1024.2 optimal_fiber_length=0.1025873
        tendon_slack_length=0.109509 pennation_angle_at_optimal=0.07853982
      PathPoint P1: femur_r (0.029863 -0.198126 0.0350779)
      PathPoint P2: femur_r (0.0344969 -0.214602 0.032249)
      PathPoint P3: patella_r (0.00596788 0.0493893 -0.000617366)
      PathWrap: wrap_object=KnExt_at_fem_r method=hybrid
    Schutte1993Muscle_Deprecated vaslat_r: max_isometric_force=2255.4 optimal_fiber_length=0.102879
        tendon_slack_length=0.13455 pennation_angle_at_optimal=0.3211406
      PathPoint P1: femur_r (0.00494285 -0.190918 0.0394909)
      PathPoint P2: femur_r (0.0277005 -0.26681 0.0462801)
      PathPoint P3: patella_r (0.0105981 0.0435245 0.0145081)
      PathWrap: wrap_object=KnExt_at_fem_r method=hybrid
    Schutte1993Muscle_Deprecated vasmed_r: max_isometric_force=1443.7 optimal_fiber_length=0.09997116
        tendon_slack_length=0.1156691 pennation_angle_at_optimal=0.5166175
      PathPoint P1: femur_r (0.0144166 -0.216146 0.0212731)
      PathPoint P2: femur_r (0.0366594 -0.28514 0.00101839)
      PathPoint P3: patella_r (0.00648235 0.045788 -0.017492)
      PathWrap: wrap_object=KnExt_at_fem_r method=hybrid
    Schutte1993Muscle_Deprecated addbrev_l: max_isometric_force=607.4 optimal_fiber_length=0.1049445
        tendon_slack_length=0.03664404 pennation_angle_at_optimal=0.1064651
      PathPoint P1: pelvis (-0.0180655 -0.0889081 -0.0145657)
      PathPoint P2: femur_l (-0.00205952 -0.121511 -0.0281754)
      PathWrap: wrap_object=AB_at_femshaft_l method=hybrid
    Schutte1993Muscle_Deprecated addlong_l: max_isometric_force=799 optimal_fiber_length=0.1108985
        tendon_slack_length=0.1332422 pennation_angle_at_optimal=0.1239184
      PathPoint P1: pelvis (-0.0071694 -0.0840843 -0.0178573)
      PathPoint P2: femur_l (0.0115951 -0.246493 -0.0179123)
      PathWrap: wrap_object=AL_at_femshaft_l method=hybrid
    Schutte1993Muscle_Deprecated addmagDist_l: max_isometric_force=648.4 optimal_fiber_length=0.185019
        tendon_slack_length=0.09397129 pennation_angle_at_optimal=0.2408554
      PathPoint P1: pelvis (-0.0700293 -0.120754 -0.0376629)
      PathPoint P2: femur_l (0.0115848 -0.270311 -0.0218388)
      PathWrap: wrap_object=AMdist_at_femshaft_l method=hybrid
    Schutte1993Muscle_Deprecated addmagIsch_l: max_isometric_force=648.4 optimal_fiber_length=0.1611167
        tendon_slack_length=0.2279563 pennation_angle_at_optimal=0.2076942
      PathPoint P1: pelvis (-0.0847653 -0.122731 -0.0394507)
      PathPoint P2: femur_l (0.00495315 -0.399516 0.0370355)
      PathWrap: wrap_object=AMisch_at_condyles_l method=hybrid
    Schutte1993Muscle_Deprecated addmagMid_l: max_isometric_force=648.4 optimal_fiber_length=0.1440997
        tendon_slack_length=0.05023082 pennation_angle_at_optimal=0.2565634
      PathPoint P1: pelvis (-0.0498074 -0.114209 -0.0269941)
      PathPoint P2: femur_l (0.00249201 -0.167233 -0.0330638)
      PathWrap: wrap_object=AMmid_at_femshaft_l method=hybrid
    Schutte1993Muscle_Deprecated addmagProx_l: max_isometric_force=648.4 optimal_fiber_length=0.1073184
        tendon_slack_length=0.04369972 pennation_angle_at_optimal=0.3874631
      PathPoint P1: pelvis (-0.0293018 -0.101724 -0.0129107)
      PathPoint P2: femur_l (-0.0157244 -0.0812068 -0.036232)
      PathWrap: wrap_object=AMprox_at_femshaft_l method=hybrid
    Schutte1993Muscle_Deprecated bflh_l: max_isometric_force=1410.4 optimal_fiber_length=0.1011827
        tendon_slack_length=0.3338198 pennation_angle_at_optimal=0.2024582
      PathPoint P1: pelvis (-0.0983664 -0.112649 -0.0554256)
      PathPoint P2: tibia_l (-0.0326175 -0.0437302 -0.0322912)
      PathWrap: wrap_object=BFLH_at_gastroc_l method=hybrid
    Schutte1993Muscle_Deprecated bfsh_l: max_isometric_force=315.8 optimal_fiber_length=0.1135859
        tendon_slack_length=0.1070982 pennation_angle_at_optimal=0.2146755
      PathPoint P1: femur_l (0.00514881 -0.217382 -0.0264781)
      PathPoint P2: tibia_l (-0.0309713 -0.0431129 -0.0308368)
      PathWrap: wrap_object=BFLH_at_gastroc_l method=hybrid
    Schutte1993Muscle_Deprecated edl_l: max_isometric_force=345.4 optimal_fiber_length=0.07200345
        tendon_slack_length=0.3816287 pennation_angle_at_optimal=0.1884956
      PathPoint P1: tibia_l (-0.0164631 -0.119049 -0.0198791)
      PathPoint P2: tibia_l (0.0168747 -0.386884 -0.0108607)
      PathPoint P3: calcn_l (0.0971632 0.0380617 -0.000845816)
      PathPoint P4: calcn_l (0.170855 0.00581499 -0.0137445)
      PathPoint P5: toes_l (0.000317181 0.00496917 -0.0161762)
      PathPoint P6: toes_l (0.0468371 -0.000422908 -0.0264318)
    Schutte1993Muscle_Deprecated ehl_l: max_isometric_force=165 optimal_fiber_length=0.07779562
        tendon_slack_length=0.344776 pennation_angle_at_optimal=0.164061
      PathPoint P1: tibia_l (-0.0144052 -0.159487 -0.0183275)
      PathPoint P2: tibia_l (0.0073055 -0.29932 -0.0159032)
      PathPoint P3: tibia_l (0.0205788 -0.379991 0.00271518)
      PathPoint P4: calcn_l (0.102555 0.0411278 0.0223084)
      PathPoint P5: calcn_l (0.136705 0.0326697 0.0271719)
      PathPoint P6: calcn_l (0.183331 0.0146961 0.0296036)
      PathPoint P7: toes_l (0.0315067 0.00433481 0.0259031)
      PathPoint P8: toes_l (0.0595243 0.00359472 0.0196652)
    Schutte1993Muscle_Deprecated fdl_l: max_isometric_force=274.4 optimal_fiber_length=0.04641401
        tendon_slack_length=0.3930621 pennation_angle_at_optimal=0.2373648
      PathPoint P1: tibia_l (-0.00236657 -0.188503 0.00174548)
      PathPoint P2: tibia_l (-0.0181094 -0.375051 0.0120245)
      PathPoint P3: calcn_l (0.046097 0.033304 0.0296036)
      PathPoint P4: calcn_l (0.0748548 0.018608 0.0278062)
      PathPoint P5: calcn_l (0.175295 -0.00856389 -0.0122643)
      PathPoint P6: toes_l (-0.00200881 -0.00824671 -0.0155419)
      PathPoint P7: toes_l (0.0301322 -0.00750662 -0.0227313)
      PathPoint P8: toes_l (0.0466256 -0.00634362 -0.0255859)
    Schutte1993Muscle_Deprecated fhl_l: max_isometric_force=436.8 optimal_fiber_length=0.05487559
        tendon_slack_length=0.3706966 pennation_angle_at_optimal=0.2949606
      PathPoint P1: tibia_l (-0.0318973 -0.222561 -0.0193942)
      PathPoint P2: tibia_l (-0.0249004 -0.377727 0.00736979)
      PathPoint P3: calcn_l (0.0395419 0.0291807 0.0254802)
      PathPoint P4: calcn_l (0.109745 0.00718944 0.0270661)
      PathPoint P5: calcn_l (0.182485 -0.00560353 0.0284406)
      PathPoint P6: toes_l (0.0163877 -0.00676653 0.0280177)
      PathPoint P7: toes_l (0.0594186 -0.0107842 0.0191366)
    Schutte1993Muscle_Deprecated gaslat_l: max_isometric_force=606.4 optimal_fiber_length=0.06046155
        tendon_slack_length=0.3927944 pennation_angle_at_optimal=0.2094395
      PathPoint P1: femur_l (-0.00308928 -0.39275 -0.0313438)
      PathPoint P2: calcn_l (0.00465199 0.0327754 0.00560353)
      PathWrap: wrap_object=Gastroc_at_shank_l method=hybrid
      PathWrap pathwrap_0: wrap_object=Gastroc_at_condyles_l method=hybrid
    Schutte1993Muscle_Deprecated gasmed_l: max_isometric_force=1308 optimal_fiber_length=0.05240675
        tendon_slack_length=0.4118554 pennation_angle_at_optimal=0.1727876
      PathPoint P1: femur_l (0.00823808 -0.390073 0.0235361)
      PathPoint P2: calcn_l (0.00465199 0.0327754 0.00560353)
      PathWrap: wrap_object=Gastroc_at_shank_l method=hybrid
      PathWrap pathwrap_0: wrap_object=Gastroc_at_condyles_l method=hybrid
    Schutte1993Muscle_Deprecated gem_l: max_isometric_force=109 optimal_fiber_length=0.0251843
        tendon_slack_length=0.04092449 pennation_angle_at_optimal=0
      PathPoint P1: pelvis (-0.0979596 -0.0722614 -0.0634369)
      PathPoint P2: femur_l (-0.0146226 -0.00339821 -0.0501274)
    Schutte1993Muscle_Deprecated glmax1_l: max_isometric_force=1092.2 optimal_fiber_length=0.1448608
        tendon_slack_length=0.04917202 pennation_angle_at_optimal=0.3822271
      PathPoint P1: pelvis (-0.116432 0.0326311 -0.0532503)
      PathPoint P2: pelvis (-0.118891 -0.022889 -0.0736802)
      PathPoint P3: femur_l (-0.0457212 -0.0335701 -0.0341726)
      PathPoint P4: femur_l (-0.0285243 -0.0582844 -0.0531826)
      PathWrap: wrap_object=Gmax_at_pelvis_l method=hybrid
    Schutte1993Muscle_Deprecated glmax2_l: max_isometric_force=1561 optimal_fiber_length=0.1551901
        tendon_slack_length=0.07250116 pennation_angle_at_optimal=0.3822271
      PathPoint P1: pelvis (-0.124566 0.00822873 -0.0436973)
      PathPoint P2: pelvis (-0.12712 -0.0576012 -0.0768961)
      PathPoint P3: femur_l (-0.0463391 -0.060138 -0.0285149)
      PathPoint P4: femur_l (-0.0160642 -0.104623 -0.0474117)
      PathWrap: wrap_object=Gmax_at_pelvis_l method=hybrid
    Schutte1993Muscle_Deprecated glmax3_l: max_isometric_force=1052.2 optimal_fiber_length=0.1674633
        tendon_slack_length=0.07060616 pennation_angle_at_optimal=0.3822271
      PathPoint P1: pelvis (-0.122958 -0.0496561 -0.00851248)
      PathPoint P2: pelvis (-0.120405 -0.119458 -0.0411436)
      PathPoint P3: femur_l (-0.0289362 -0.115848 -0.0106365)
      PathPoint P4: femur_l (-0.00617856 -0.146123 -0.0465064)
      PathWrap: wrap_object=Gmax_at_pelvis_l method=hybrid
    Schutte1993Muscle_Deprecated glmed1_l: max_isometric_force=1762.2 optimal_fiber_length=0.07128467
        tendon_slack_length=0.05494657 pennation_angle_at_optimal=0.3577925
      PathPoint P1: pelvis (-0.0420894 0.0231728 -0.110851)
      PathPoint P2: femur_l (-0.0224488 -0.0120482 -0.0628007)
    Schutte1993Muscle_Deprecated glmed2_l: max_isometric_force=1233 optimal_fiber_length=0.07228712
        tendon_slack_length=0.06508799 pennation_angle_at_optimal=0.3577925
      PathPoint P1: pelvis (-0.0803956 0.0298882 -0.0638435)
      PathPoint P2: femur_l (-0.0265677 -0.00597261 -0.0596324)
    Schutte1993Muscle_Deprecated glmed3_l: max_isometric_force=1404 optimal_fiber_length=0.07360676
        tendon_slack_length=0.04619251 pennation_angle_at_optimal=0.3577925
      PathPoint P1: pelvis (-0.108959 -0.00690455 -0.0497507)
      PathPoint P2: femur_l (-0.0318196 -0.00483988 -0.0586139)
    Schutte1993Muscle_Deprecated glmin1_l: max_isometric_force=360 optimal_fiber_length=0.06864444
        tendon_slack_length=0.01615163 pennation_angle_at_optimal=0.1745329
      PathPoint P1: pelvis (-0.0438866 -0.0140929 -0.0985555)
      PathPoint P2: femur_l (-0.00741426 -0.0107094 -0.0633665)
    Schutte1993Muscle_Deprecated glmin2_l: max_isometric_force=190 optimal_fiber_length=0.05689731
        tendon_slack_length=0.02641661 pennation_angle_at_optimal=0
      PathPoint P1: pelvis (-0.0582633 -0.0134308 -0.0918401)
      PathPoint P2: femur_l (-0.00988569 -0.0107094 -0.0633665)
    Schutte1993Muscle_Deprecated glmin3_l: max_isometric_force=430 optimal_fiber_length=0.03885328
        tendon_slack_length=0.0521452 pennation_angle_at_optimal=0.01745329
      PathPoint P1: pelvis (-0.074626 -0.0146604 -0.0754773)
      PathPoint P2: femur_l (-0.0139018 -0.00854701 -0.0622349)
    Schutte1993Muscle_Deprecated grac_l: max_isometric_force=274.6 optimal_fiber_length=0.2364773
        tendon_slack_length=0.1723232 pennation_angle_at_optimal=0.143117
      PathPoint P1: pelvis (-0.0447945 -0.122315 -0.0232296)
      PathPoint P2: tibia_l (-0.0189532 -0.0489263 0.0287131)
      PathPoint P3: tibia_l (0.00183153 -0.0716352 0.0152536)
      PathWrap: wrap_object=GR_at_condyles_l method=hybrid
    Schutte1993Muscle_Deprecated iliacus_l: max_isometric_force=1243.8 optimal_fiber_length=0.103675
        tendon_slack_length=0.09142073 pennation_angle_at_optimal=0.2495821
      PathPoint P1: pelvis (-0.0572228 0.0292262 -0.0797335)
      PathPoint P2: pelvis (-0.0127687 -0.0526828 -0.0715049)
      PathPoint P3: femur_l (-0.00236845 -0.0581814 -0.0157285)
      PathPoint P4: femur_l (-0.012563 -0.0655957 -0.0221782)
      PathWrap: wrap_object=IL_at_brim_l method=hybrid range=(2 3)
    Schutte1993Muscle_Deprecated patlig_l: max_isometric_force=1 optimal_fiber_length=0.05158647
        tendon_slack_length=0.005158647 pennation_angle_at_optimal=0 activation1=0 activation2=0
      PathPoint P1: tibia_l (0.0290162 -0.0595759 -0.00552735)
      PathPoint P2: patella_l (0.00216078 0.00154341 -0.000102894)
    Schutte1993Muscle_Deprecated pect_l: max_isometric_force=354 optimal_fiber_length=0.1358622
        tendon_slack_length=0.00102152 pennation_angle_at_optimal=0
      PathPoint P1: pelvis (-0.0219433 -0.0787404 -0.0428367)
      PathPoint P2: femur_l (-0.00820719 -0.087715 -0.027191)
      PathWrap: wrap_object=PECT_at_femshaft_l method=hybrid
    Schutte1993Muscle_Deprecated perbrev_l: max_isometric_force=305.9 optimal_fiber_length=0.04713877
        tendon_slack_length=0.1537721 pennation_angle_at_optimal=0.2007129
      PathPoint P1: tibia_l (-0.0250033 -0.260529 -0.0243397)
      PathPoint P2: tibia_l (-0.0348813 -0.40057 -0.0241457)
      PathPoint P3: tibia_l (-0.0293249 -0.41199 -0.0247276)
      PathPoint P4: calcn_l (0.0497974 0.0285463 -0.0246344)
      PathPoint P5: calcn_l (0.0715772 0.0231542 -0.0362644)
    Schutte1993Muscle_Deprecated perlong_l: max_isometric_force=653.3 optimal_fiber_length=0.05274762
        tendon_slack_length=0.3457669 pennation_angle_at_optimal=0.2460914
      PathPoint P1: tibia_l (-0.0205788 -0.141274 -0.0273458)
      PathPoint P2: tibia_l (-0.0326175 -0.40129 -0.022982)
      PathPoint P3: tibia_l (-0.0279873 -0.413019 -0.023273)
      PathPoint P4: calcn_l (0.0463085 0.0243172 -0.0233657)
      PathPoint P5: calcn_l (0.0720001 0.0112071 -0.0300265)
      PathPoint P6: calcn_l (0.0900795 0.00729517 -0.0124758)
      PathPoint P7: calcn_l (0.12719 0.0089868 0.0194538)
    Schutte1993Muscle_Deprecated pertert_l: max_isometric_force=90 optimal_fiber_length=0.08182806
        tendon_slack_length=0.1035798 pennation_angle_at_optimal=0.2268928
      PathPoint P1: tibia_l (-0.0153312 -0.255693 -0.0215277)
      PathPoint P2: tibia_l (0.0111126 -0.393058 -0.0218185)
      PathPoint P3: calcn_l (0.0906081 0.0241058 -0.0316124)
    Schutte1993Muscle_Deprecated piri_l: max_isometric_force=296 optimal_fiber_length=0.02566263
        tendon_slack_length=0.1135078 pennation_angle_at_optimal=0.1745329
      PathPoint P1: pelvis (-0.0962951 -0.00617628 -0.0127781)
      PathPoint P2: pelvis (-0.0964936 -0.0289992 -0.0576201)
      PathPoint P3: femur_l (-0.0152404 -0.00370714 -0.0494485)
    Schutte1993Muscle_Deprecated psoas_l: max_isometric_force=959.4 optimal_fiber_length=0.1130612
        tendon_slack_length=0.09381469 pennation_angle_at_optimal=0.1867502
      PathPoint P1: pelvis (-0.0573172 0.0586414 -0.0368874)
      PathPoint P2: pelvis (-0.0193895 -0.0618573 -0.0620464)
      PathPoint P3: femur_l (-0.0135928 -0.0480898 -0.0052051)
      PathPoint P4: femur_l (-0.0241993 -0.0539595 -0.00995759)
      PathWrap: wrap_object=PS_at_brim_l method=hybrid range=(2 3)
    Schutte1993Muscle_Deprecated quadfem_l: max_isometric_force=254 optimal_fiber_length=0.05580463
        tendon_slack_length=0.02480206 pennation_angle_at_optimal=0
      PathPoint P1: pelvis (-0.105857 -0.108515 -0.0488615)
      PathPoint P2: femur_l (-0.0368139 -0.0365771 -0.0408714)
    Schutte1993Muscle_Deprecated recfem_l: max_isometric_force=1697.6 optimal_fiber_length=0.07757837
        tendon_slack_length=0.3536511 pennation_angle_at_optimal=0.2426008
      PathPoint P1: pelvis (-0.0226999 -0.0366982 -0.0882459)
      PathPoint P2: patella_l (0.0102894 0.0504183 -0.000720261)
      PathPoint P3: patella_l (0.0124502 0.044965 0.00102894)
      PathWrap: wrap_object=KnExt_at_fem_l method=hybrid
    Schutte1993Muscle_Deprecated sart_l: max_isometric_force=227 optimal_fiber_length=0.4111537
        tendon_slack_length=0.1122256 pennation_angle_at_optimal=0.02268928
      PathPoint P1: pelvis (-0.0184437 -0.014755 -0.0998797)
      PathPoint P2: femur_l (-0.00308928 -0.367418 0.047638)
      PathPoint P3: tibia_l (-0.0258265 -0.0412608 0.0353943)
      PathPoint P4: tibia_l (-0.0163602 -0.0616337 0.0256002)
      PathPoint P5: tibia_l (0.0139937 -0.0833445 0.00252124)
    Schutte1993Muscle_Deprecated semimem_l: max_isometric_force=2325.4 optimal_fiber_length=0.07155376
        tendon_slack_length=0.3608799 pennation_angle_at_optimal=0.2635447
      PathPoint P1: pelvis (-0.0933535 -0.107825 -0.058074)
      PathPoint P2: tibia_l (-0.0298394 -0.0429071 0.0190063)
      PathWrap: wrap_object=SM_at_condyles_l method=hybrid
    Schutte1993Muscle_Deprecated semiten_l: max_isometric_force=603.8 optimal_fiber_length=0.2003177
        tendon_slack_length=0.2542893 pennation_angle_at_optimal=0.2251475
      PathPoint P1: pelvis (-0.0981772 -0.118513 -0.0487102)
      PathPoint P2: tibia_l (-0.032103 -0.0522704 0.0222063)
      PathPoint P3: tibia_l (0.00195499 -0.0795374 0.0113456)
      PathWrap: wrap_object=ST_at_condyles_l method=hybrid
    Schutte1993Muscle_Deprecated soleus_l: max_isometric_force=3585.9 optimal_fiber_length=0.04515147
        tendon_slack_length=0.2888668 pennation_angle_at_optimal=0.4939282
      PathPoint P1: tibia_l (-0.00781998 -0.0942513 -0.00950315)
      PathPoint P2: calcn_l (0.00465199 0.0327754 0.00560353)
    Schutte1993Muscle_Deprecated tfl_l: max_isometric_force=310 optimal_fiber_length=0.09664824
        tendon_slack_length=0.4578074 pennation_angle_at_optimal=0.05235988
      PathPoint P1: pelvis (-0.0294153 0.0202408 -0.117378)
      PathPoint P2: femur_l (0.0302749 -0.10246 -0.0675532)
      PathPoint P3: femur_l (0.0110184 -0.417052 -0.036662)
      PathPoint P4: tibia_l (0.0111126 -0.0421868 -0.033552)
    Schutte1993Muscle_Deprecated tibant_l: max_isometric_force=673.7 optimal_fiber_length=0.07057066
        tendon_slack_length=0.2490121 pennation_angle_at_optimal=0.1675516
      PathPoint P1: tibia_l (0.0158458 -0.134998 -0.0157093)
      PathPoint P2: tibia_l (0.0258265 -0.196117 -0.0124123)
      PathPoint P3: tibia_l (0.0239744 -0.376492 0.0128002)
      PathPoint P4: calcn_l (0.123278 0.0188194 0.0322468)
    Schutte1993Muscle_Deprecated tibpost_l: max_isometric_force=905.6 optimal_fiber_length=0.03891366
        tendon_slack_length=0.2901024 pennation_angle_at_optimal=0.2391101
      PathPoint P1: tibia_l (-0.00421868 -0.134175 -0.00998805)
      PathPoint P2: tibia_l (-0.0168747 -0.37608 0.01697)
      PathPoint P3: calcn_l (0.0440882 0.0353128 0.0302379)
      PathPoint P4: calcn_l (0.0816213 0.0168106 0.0297093)
    Schutte1993Muscle_Deprecated vasint_l: max_isometric_force=1024.2 optimal_fiber_length=0.1025873
        tendon_slack_length=0.109509 pennation_angle_at_optimal=0.07853982
      PathPoint P1: femur_l (0.029863 -0.198126 -0.0350779)
      PathPoint P2: femur_l (0.0344969 -0.214602 -0.032249)
      PathPoint P3: patella_l (0.00596788 0.0493893 0.000617366)
      PathWrap: wrap_object=KnExt_at_fem_l method=hybrid
    Schutte1993Muscle_Deprecated vaslat_l: max_isometric_force=2255.4 optimal_fiber_length=0.102879
        tendon_slack_length=0.13455 pennation_angle_at_optimal=0.3211406
      PathPoint P1: femur_l (0.00494285 -0.190918 -0.0394909)
      PathPoint P2: femur_l (0.0277005 -0.26681 -0.0462801)
      PathPoint P3: patella_l (0.0105981 0.0435245 -0.0145081)
      PathWrap: wrap_object=KnExt_at_fem_l method=hybrid
    Schutte1993Muscle_Deprecated vasmed_l: max_isometric_force=1443.7 optimal_fiber_length=0.09997116
        tendon_slack_length=0.1156691 pennation_angle_at_optimal=0.5166175
      PathPoint P1: femur_l (0.0144166 -0.216146 -0.0212731)
      PathPoint P2: femur_l (0.0366594 -0.28514 -0.00101839)
      PathPoint P3: patella_l (0.00648235 0.045788 0.017492)
      PathWrap: wrap_object=KnExt_at_fem_l method=hybrid
    Thelen2003Muscle rect_abd_r: optimal_force=1 max_isometric_force=348.76 optimal_fiber_length=0.2007112
        tendon_slack_length=0.01524616 pennation_angle_at_optimal=0 [radians] max_contraction_velocity=10
        FmaxTendonStrain=0.033 FmaxMuscleStrain=0.6 KshapeActive=0.5 KshapePassive=4 Af=0.3 Flen=1.8
        activation_time_constant=0.01 [seconds] deactivation_time_constant=0.04 [seconds]
      PathPoint P1: pelvis (-0.0387622 0 -0.00996502)
      PathPoint P2: torso (0.0768733 0.194296 -0.0300737)
    Thelen2003Muscle rect_abd_l: optimal_force=1 max_isometric_force=348.76 optimal_fiber_length=0.2007112
        tendon_slack_length=0.01524616 pennation_angle_at_optimal=0 max_contraction_velocity=10 FmaxTendonStrain=0.033
        FmaxMuscleStrain=0.6 KshapeActive=0.5 KshapePassive=4 Af=0.3 Flen=1.8 activation_time_constant=0.01
        deactivation_time_constant=0.04
      PathPoint P1: pelvis (-0.0387622 0 0.00996502)
      PathPoint P2: torso (0.0768733 0.194296 0.0300737)
    Thelen2003Muscle ercspn_r: optimal_force=1 max_isometric_force=2500 optimal_fiber_length=0.07534009
        tendon_slack_length=0.1952345 pennation_angle_at_optimal=0.2286 max_contraction_velocity=10
        FmaxTendonStrain=0.033 FmaxMuscleStrain=0.6 KshapeActive=0.45 KshapePassive=4 Af=0.3 Flen=1.4
        activation_time_constant=0.01 deactivation_time_constant=0.04
      PathPoint P1: pelvis (-0.130503 0.0114097 0.0209325)
      PathPoint P2: torso (-0.0684667 0.20108 0.0494535)
    Thelen2003Muscle ercspn_l: optimal_force=1 max_isometric_force=2500 optimal_fiber_length=0.07534009
        tendon_slack_length=0.1952345 pennation_angle_at_optimal=0.2286 max_contraction_velocity=10
        FmaxTendonStrain=0.033 FmaxMuscleStrain=0.6 KshapeActive=0.45 KshapePassive=4 Af=0.3 Flen=1.4
        activation_time_constant=0.01 deactivation_time_constant=0.04
      PathPoint P1: pelvis (-0.130503 0.0114097 -0.0209325)
      PathPoint P2: torso (-0.0684667 0.20108 -0.0494535)
    CoordinateLimitForce shoulder_elv_ligaments: coordinate=shoulder_elv upper_stiffness=100 [N*m/degree]
        upper_limit=150 [degrees] lower_stiffness=100 [N*m/degree] lower_limit=30 [degrees] damping=0
        transition=542.8423 [degrees]
    CoordinateLimitForce shoulder_elv_damping: coordinate=shoulder_elv upper_stiffness=1e-8 upper_limit=190
        lower_stiffness=1e-8 lower_limit=190 damping=0.001745 transition=1
    CoordinateLimitForce elv_angle_ligaments: coordinate=elv_angle upper_stiffness=100 upper_limit=100
        lower_stiffness=100 lower_limit=-60 damping=0 transition=545.4471
    CoordinateLimitForce elv_angle_damping: coordinate=elv_angle upper_stiffness=1e-8 upper_limit=190
        lower_stiffness=1e-8 lower_limit=190 damping=0.001745 transition=1
    CoordinateLimitForce shoulder_rot_ligaments: coordinate=shoulder_rot upper_stiffness=100 upper_limit=-10
        lower_stiffness=100 lower_limit=-60 damping=0 transition=485.466
    CoordinateLimitForce shoulder_rot_damping: coordinate=shoulder_rot upper_stiffness=1e-8 upper_limit=190
        lower_stiffness=1e-8 lower_limit=190 damping=0.001745 transition=1
    CoordinateLimitForce elbow_flexion_ligaments: coordinate=elbow_flexion upper_stiffness=0.3037 upper_limit=85
        lower_stiffness=100 lower_limit=14 damping=0 transition=139.5813
    CoordinateLimitForce elbow_flexion_damping: coordinate=elbow_flexion upper_stiffness=1e-8 upper_limit=190
        lower_stiffness=1e-8 lower_limit=190 damping=0.001745 transition=1
    CoordinateLimitForce pro_sup_ligaments: coordinate=pro_sup upper_stiffness=50 upper_limit=60 lower_stiffness=50
        lower_limit=-60 damping=0 transition=430.1186
    CoordinateLimitForce pro_sup_damping: coordinate=pro_sup upper_stiffness=1e-8 upper_limit=190 lower_stiffness=1e-8
        lower_limit=190 damping=0.001745 transition=1
    CoordinateLimitForce deviation_ligaments: coordinate=deviation upper_stiffness=52.5961 upper_limit=20
        lower_stiffness=487.176 lower_limit=-6 damping=0 transition=39.1586
    CoordinateLimitForce deviation_damping: coordinate=deviation upper_stiffness=1e-8 upper_limit=190
        lower_stiffness=1e-8 lower_limit=190 damping=0.001745 transition=1
    CoordinateLimitForce flexion_ligaments: coordinate=flexion upper_stiffness=200 upper_limit=60
        lower_stiffness=135.3232 lower_limit=-60 damping=0 transition=92.916
    CoordinateLimitForce flexion_damping: coordinate=flexion upper_stiffness=1e-8 upper_limit=190 lower_stiffness=1e-8
        lower_limit=190 damping=0.00043633 transition=1
    CoordinateLimitForce shoulder_elv_l_ligaments: coordinate=shoulder_elv_l upper_stiffness=100 upper_limit=150
        lower_stiffness=100 lower_limit=30 damping=0 transition=542.8423
    CoordinateLimitForce shoulder_elv_l_damping: coordinate=shoulder_elv_l upper_stiffness=1e-8 upper_limit=190
        lower_stiffness=1e-8 lower_limit=190 damping=0.001745 transition=1
    CoordinateLimitForce elv_angle_l_ligaments: coordinate=elv_angle_l upper_stiffness=100 upper_limit=100
        lower_stiffness=100 lower_limit=-60 damping=0 transition=545.4471
    CoordinateLimitForce elv_angle_l_damping: coordinate=elv_angle_l upper_stiffness=1e-8 upper_limit=190
        lower_stiffness=1e-8 lower_limit=190 damping=0.001745 transition=1
    CoordinateLimitForce shoulder_rot_l_ligaments: coordinate=shoulder_rot_l upper_stiffness=100 upper_limit=-10
        lower_stiffness=100 lower_limit=-60 damping=0 transition=485.466
    CoordinateLimitForce shoulder_rot_l_damping: coordinate=shoulder_rot_l upper_stiffness=1e-8 upper_limit=190
        lower_stiffness=1e-8 lower_limit=190 damping=0.001745 transition=1
    CoordinateLimitForce elbow_flexion_l_ligaments: coordinate=elbow_flexion_l upper_stiffness=0.3037 upper_limit=85
        lower_stiffness=100 lower_limit=14 damping=0 transition=139.5813
    CoordinateLimitForce elbow_flexion_l_damping: coordinate=elbow_flexion_l upper_stiffness=1e-8 upper_limit=190
        lower_stiffness=1e-8 lower_limit=190 damping=0.001745 transition=1
    CoordinateLimitForce pro_sup_l_ligaments_l: coordinate=pro_sup_l upper_stiffness=50 upper_limit=60
        lower_stiffness=50 lower_limit=-60 damping=0 transition=430.1186
    CoordinateLimitForce pro_sup_l_damping: coordinate=pro_sup_l upper_stiffness=1e-8 upper_limit=190
        lower_stiffness=1e-8 lower_limit=190 damping=0.001745 transition=1
    CoordinateLimitForce deviation_l_ligaments: coordinate=deviation_l upper_stiffness=52.5961 upper_limit=20
        lower_stiffness=487.176 lower_limit=-6 damping=0 transition=39.1586
    CoordinateLimitForce deviation_l_damping: coordinate=deviation_l upper_stiffness=1e-8 upper_limit=190
        lower_stiffness=1e-8 lower_limit=190 damping=0.001745 transition=1
    CoordinateLimitForce flexion_l_ligaments: coordinate=flexion_l upper_stiffness=200 upper_limit=60
        lower_stiffness=135.3232 lower_limit=-60 damping=0 transition=92.916
    CoordinateLimitForce flexion_l_damping: coordinate=flexion_l upper_stiffness=1e-8 upper_limit=190
        lower_stiffness=1e-8 lower_limit=190 damping=0.00043633 transition=1
  MarkerSet:
    Marker CLAV: torso (0.0272605 0.348922 -0.00802422)
    Marker STRN: torso (0.109185 0.143682 0.00820222)
    Marker RSHO: torso (-0.00583362 0.383867 0.136834)
    Marker LSHO: torso (-0.00440634 0.39019 -0.146251)
    Marker C7: torso (-0.100931 0.396805 -0.00342597)
    Marker T10: torso (-0.0638462 0.0650859 -0.0119783)
    Marker RBAK: torso (-0.128008 0.317179 0.0935181)
    Marker RASI: pelvis (0.0220948 0.0163428 0.117557)
    Marker LASI: pelvis (0.0229461 0.0210476 -0.116039)
    Marker RPSI: pelvis (-0.156512 0.0229333 0.0552652)
    Marker LPSI: pelvis (-0.159988 0.0219592 -0.0453269)
    Marker LGTR: femur_l (-0.00702707 -0.0344552 -0.109114)
    Marker LHJC: femur_l (0.0283425 -0.00892506 -0.0119106)
    Marker lt_thighOrigin: femur_l (0.0421273 -0.183854 -0.0733384)
    Marker lt_thighX: femur_l (0.0388398 -0.085183 -0.0892503)
    Marker lt_thighY: femur_l (-0.0419815 -0.195186 -0.126228)
    Marker lt_thighZ: femur_l (-0.0118624 -0.17221 0.0100253)
    Marker LKNE: femur_l (-0.0121683 -0.41865 -0.0646352)
    Marker LMFC: femur_l (-0.00636546 -0.423734 0.0569203)
    Marker LLTP: tibia_l (-0.0190611 -0.0338356 -0.0666476)
    Marker LMTP: tibia_l (-0.0114546 -0.0355454 0.0513989)
    Marker lt_shankOrigin: tibia_l (0.00868818 -0.204377 -0.040498)
    Marker lt_shankX: tibia_l (0.0212023 -0.105256 -0.0362093)
    Marker lt_shankY: tibia_l (-0.0581573 -0.192759 -0.11396)
    Marker lt_shankZ: tibia_l (-0.0646268 -0.198051 0.0272138)
    Marker LANK: tibia_l (-0.00866003 -0.39573 -0.0385523)
    Marker LMMA: tibia_l (0.00313437 -0.388596 0.0381895)
    Marker LHEE: calcn_l (-0.0167712 0.0327088 0.017822)
    Marker LMT5: calcn_l (0.163208 -0.00575354 -0.0703737)
    Marker LTOE: calcn_l (0.212633 0.0262794 -0.0117409)
    Marker RGTR: femur_r (-0.0104715 -0.031905 0.0991533)
    Marker RHJC: femur_r (0.0178412 -0.00621836 0.00791267)
    Marker rt_thighOrigin: femur_r (0.0445944 -0.194442 0.0649711)
    Marker rt_thighX: femur_r (0.0389387 -0.0960697 0.0820282)
    Marker rt_thighY: femur_r (-0.0362643 -0.208977 0.121985)
    Marker rt_thighZ: femur_r (0.103159 -0.205009 0.145336)
    Marker RKNE: femur_r (0.00237052 -0.415805 0.0667882)
    Marker RMFC: femur_r (-0.0110033 -0.41883 -0.056219)
    Marker RLTP: tibia_r (-0.00643226 -0.0359529 0.0710481)
    Marker RMTP: tibia_r (-0.0184615 -0.0330907 -0.0491554)
    Marker rt_shankOrigin: tibia_r (0.00954983 -0.221182 0.0363163)
    Marker rt_shankX: tibia_r (0.0244264 -0.122488 0.03014)
    Marker rt_shankY: tibia_r (0.066919 -0.234883 -0.0444367)
    Marker rt_shankZ: tibia_r (-0.0709949 -0.212712 -0.022342)
    Marker RANK: tibia_r (-0.0139651 -0.40141 0.0377897)
    Marker RMMA: tibia_r (0.00643169 -0.385643 -0.0376474)
    Marker RHEE: calcn_r (-0.016428 0.0270971 -0.0185431)
    Marker RMT5: calcn_r (0.157723 -0.011503 0.0648311)
    Marker RTOE: calcn_r (0.219425 0.0270271 0.00639067)
    Marker RUPA: humerus (-0.012821 -0.124295 0.00731021)
    Marker RELB: humerus (0.00879503 -0.224273 0.000588584)
    Marker RFRA: radius (-0.0162831 -0.0735273 0.00566907)
    Marker RWRA: radius (0.071296 -0.225312 0.0252576)
    Marker RWRB: ulna (-0.00491949 -0.245657 0.0289622)
    Marker LUPA: humerus_l (-0.0265425 -0.0103779 -0.0245431)
    Marker LELB: humerus_l (0.0148861 -0.233679 -0.00715305)
    Marker LFRA: radius_l (-0.0141477 -0.170786 0.0134019)
    Marker LWRA: radius_l (0.0544075 -0.22397 -0.0311098)
    Marker LWRB: ulna_l (-0.0223883 -0.243171 -0.0209222)
    Marker RFIN: hand (0.024397 -0.0552519 0.0304098)
    Marker LFIN: hand_l (0.0193302 -0.0409299 -0.035463)
